# OpenSim document version 40500
Model Rajagopal_2015:
  gravity: 0 -9.80665 0
  length_units: meters
  force_units: N
  credits:
    Delp S.L., Loan J.P., Hoy M.G., Zajac F.E., Topp E.L., Rosen J.M., Thelen D.G., Anderson F.C., Seth A., Hamner S.R., Arnold E., Raabe M.E.
  publications:
    Notes: Raabe Full Body model combines Hamner Full Body Model 2010, Christophy 2012 Lumbar DOF torso, and Arnold patella; 3D, 23 DOF gait model created by D.G. Thelen, Univ. of Wisconsin-Madison, and Samuel Hamner, Ajay Seth, Frank C. Anderson, and Scott L. Delp, Stanford University. Lower extremity joint defintions based on Delp et al. (1990). Low back joint and anthropometry based on Anderson and Pandy (1999, 2001). Planar knee model of Yamaguchi and Zajac (1989). Hamner added arms adapted from Holzbaur et al., 2005. Hamner, S.R., Seth, A, Delp, S.L.: Muscle contributions to propulsion and support during running. Journal of Biomechanics, 2010. Delp, S.L., Loan, J.P., Hoy, M.G., Zajac, F.E., Topp E.L., Rosen, J.M.: An interactive graphics-based model of the lower extremity to study orthopaedic surgical procedures, IEEE Transactions on Biomedical Engineering, vol. 37, pp. 757-767, 1990. Yamaguchi G.T., Zajac F.E.: A planar model of the knee joint to characterize the knee extensor mechanism." J . Biomech. vol. 21. pp. 1-10. 1989. Anderson F.C., Pandy M.G.: A dynamic optimization solution for vertical jumping in three dimensions. Computer Methods in Biomechanics and Biomedical Engineering 2:201-231, 1999. Anderson F.C., Pandy M.G.: Dynamic optimization of human walking. Journal of Biomechanical Engineering 123:381-390, 2001. Holzbaur, KR, WM Murray and SL Delp, 2005. A model of the upper extremity for simulating musculoskeletal surgery and analyzing neuromuscular control. Ann Biomed Eng 33(6): 829-840.
  Ground
  BodySet:
    Body pelvis: mass=13.38817 [kg] mass_center=(-0.07925077 0 0) inertia=(0.1468412 0.1244151 0.0827053 0 0 0)
        meshes=(r_pelvis.vtp l_pelvis.vtp)
      PhysicalOffsetFrame pelvis_imu: socket_parent=.. translation=(-0.07925077 0 0) [meters]
          orientation=(-1.579192 0.01838523 -1.587902) [radians]
    Body sacrum: mass=0 mass_center=(0 0 0) inertia=(0 0 0 0 0 0) meshes=sacrum.vtp
    Body femur_r: mass=9.696559 mass_center=(0 -0.1851373 0) inertia=(0.1655541 0.04339767 0.1745798 0 0 0)
        meshes=femur_r.vtp
      PhysicalOffsetFrame femur_r_imu: socket_parent=.. translation=(0 -0.1851373 0)
          orientation=(-1.581843 -0.002103378 -1.610424)
    Body patella_r: mass=0.08986211 mass_center=(0.001960277 0.02875073 0)
        inertia=(3.548471e-6 1.620922e-5 1.620922e-5 0 0 0) meshes=r_patella.vtp
    Body tibia_r: mass=3.553703 mass_center=(0 -0.1977119 0) inertia=(0.05417609 0.005482104 0.05492853 0 0 0)
        meshes=(tibia_r.vtp fibula_r.vtp)
      PhysicalOffsetFrame tibia_r_imu: socket_parent=.. translation=(0 -0.1977119 0)
          orientation=(-1.560691 0.0002544312 -1.574107)
    Body talus_r: mass=0.09585173 mass_center=(0 0 0) inertia=(0.001074922 0.001074922 0.001074922 0 0 0)
        meshes=talus_rv.vtp
    Body calcn_r: mass=2.153343 mass_center=(0.1287527 0.03862581 0) inertia=(0.003998011 0.01113732 0.01170846 0 0 0)
        meshes=foot.vtp
      PhysicalOffsetFrame calcn_r_imu: socket_parent=.. translation=(0.1287527 0.03862581 0)
          orientation=(-1.568029 0.00336748 -1.606713)
    Body toes_r: mass=0.3731313 mass_center=(0.04454843 0.007725162 -0.02253172)
        inertia=(0.0002855722 0.0005711444 0.002855722 0 0 0) meshes=bofoot.vtp
    Body femur_l: mass=9.696559 mass_center=(0 -0.1851373 0) inertia=(0.1655541 0.04339767 0.1745798 0 0 0)
        meshes=femur_l.vtp
      PhysicalOffsetFrame femur_l_imu: socket_parent=.. translation=(0 -0.1851373 0)
          orientation=(-1.567115 0.01287466 -1.598627)
    Body patella_l: mass=0.08986211 mass_center=(0.001960277 0.02875073 0)
        inertia=(3.548471e-6 1.620922e-5 1.620922e-5 0 0 0) meshes=l_patella.vtp
    Body tibia_l: mass=3.553703 mass_center=(0 -0.1977119 0) inertia=(0.05417609 0.005482104 0.05492853 0 0 0)
        meshes=(tibia_l.vtp fibula_l.vtp)
      PhysicalOffsetFrame tibia_l_imu: socket_parent=.. translation=(0 -0.1977119 0)
          orientation=(-1.557233 0.01100298 -1.583814)
    Body talus_l: mass=0.09585173 mass_center=(0 0 0) inertia=(0.001074922 0.001074922 0.001074922 0 0 0)
        meshes=talus_lv.vtp
    Body calcn_l: mass=2.153343 mass_center=(0.1287527 0.03862581 0) inertia=(0.003998011 0.01113732 0.01170846 0 0 0)
        meshes=l_foot.vtp
      PhysicalOffsetFrame calcn_l_imu: socket_parent=.. translation=(0.1287527 0.03862581 0)
          orientation=(-1.565924 0.002464386 -1.578692)
    Body toes_l: mass=0.3731313 mass_center=(0.04454843 0.007725162 0.02253172)
        inertia=(0.0002855722 0.0005711444 0.002855722 0 0 0) meshes=l_bofoot.vtp
    Body lumbar5: mass=1.643069 mass_center=(0.01792432 0.01898235 0) inertia=(0.172733 0.02105894 0.1662101 0 0 0)
        meshes=lumbar5.vtp
    Body lumbar4: mass=1.620549 mass_center=(0.01929354 0.02260798 0) inertia=(0.1659406 0.02004299 0.1600962 0 0 0)
        meshes=lumbar4.vtp
    Body lumbar3: mass=1.504345 mass_center=(0.01856111 0.02414171 0) inertia=(0.1528453 0.01929813 0.1477568 0 0 0)
        meshes=lumbar3.vtp
    Body lumbar2: mass=1.52146 mass_center=(0.02618755 0.02096606 0) inertia=(0.1576992 0.02129902 0.1528531 0 0 0)
        meshes=lumbar2.vtp
    Body lumbar1: mass=1.51065 mass_center=(0.03396077 0.02013094 0.001378461)
        inertia=(0.1576527 0.02338878 0.1530682 0 0 0) meshes=lumbar1.vtp
    Body torso: mass=16.36547 mass_center=(-0.03111861 0.3319318 0) inertia=(1.155705 0.4975525 1.127413 0 0 0)
        meshes=(cerv1sm.vtp cerv2sm.vtp cerv3sm.vtp cerv4sm.vtp cerv5sm.vtp cerv6sm.vtp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)
      PhysicalOffsetFrame torso_imu: socket_parent=.. translation=(-0.03111861 0.3319318 0)
          orientation=(-1.573778 0.01880514 -1.579258)
      WrapCylinder Cylinder: translation=(-0.2157557 0.04149147 0) quadrant=all radius=0.1763388 length=0.2696946
      WrapEllipsoid Chest_r: xyz_body_rotation=(0 -0.4 0.2) translation=(0 0.2178302 0.01037287) quadrant=z
          dimensions=(0.07779651 0.1763388 0.1348473)
      WrapEllipsoid Chest_l: xyz_body_rotation=(0 0.4 0.2) translation=(0 0.2178302 -0.01037287) quadrant=-z
          dimensions=(0.07779651 0.1763388 0.1348473)
    Body Abdomen: mass=0.0009008053 mass_center=(0.008298295 0 0) inertia=(1.725237e-6 5.621558e-7 1.318158e-6 0 0 0)
      WrapEllipsoid Abdomen: translation=(0 0 0) quadrant=x dimensions=(0.01037287 0.08298295 0.05186434)
    Body LB_wrap: mass=0.0009008053 mass_center=(-0.1016541 0.07364737 0)
        inertia=(6.647327e-6 6.647327e-6 2.374624e-6 0 0 0)
      WrapCylinder Cylinder2: translation=(-0.1193917 0.07966363 0) quadrant=all radius=0.07261008 length=0.2696946
    Body humerus_r: mass=1.389348 mass_center=(0 -0.1556395 0) inertia=(0.007309714 0.002521625 0.008204918 0 0 0)
        meshes=humerus_rv.vtp
      PhysicalOffsetFrame humerus_r_imu: socket_parent=.. translation=(0 -0.1556395 0)
          orientation=(-1.574118 0.01731697 -1.58951)
    Body ulna_r: mass=0.5347681 mass_center=(0 -0.124062 0) inertia=(0.00276266 0.0005764092 0.002996768 0 0 0)
        meshes=ulna_rv.vtp
    Body radius_r: mass=0.5347681 mass_center=(0 -0.124062 0) inertia=(0.00276266 0.0005764092 0.002996768 0 0 0)
        meshes=radius_rv.vtp
      PhysicalOffsetFrame radius_r_imu: socket_parent=.. translation=(0 -0.124062 0)
          orientation=(-1.564903 -0.004704747 -1.497916)
    Body hand_r: mass=0.4704072 mass_center=(0 -0.07381842 0) inertia=(0.001077821 0.0006609509 0.001619149 0 0 0)
        meshes=(pisiform_rvs.vtp lunate_rvs.vtp scaphoid_rvs.vtp triquetrum_rvs.vtp hamate_rvs.vtp capitate_rvs.vtp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)
      PhysicalOffsetFrame hand_r_imu: socket_parent=.. translation=(0 -0.07381842 0)
          orientation=(-1.578045 0.009911767 -1.451645)
    Body humerus_l: mass=1.389348 mass_center=(0 -0.1556395 0) inertia=(0.007309714 0.002521625 0.008204918 0 0 0)
        meshes=humerus_lv.vtp
      PhysicalOffsetFrame humerus_l_imu: socket_parent=.. translation=(0 -0.1556395 0)
          orientation=(-1.579223 0.03010046 -1.544488)
    Body ulna_l: mass=0.5347681 mass_center=(0 -0.124062 0) inertia=(0.00276266 0.0005764092 0.002996768 0 0 0)
        meshes=ulna_lv.vtp
    Body radius_l: mass=0.5347681 mass_center=(0 -0.124062 0) inertia=(0.00276266 0.0005764092 0.002996768 0 0 0)
        meshes=radius_lv.vtp
      PhysicalOffsetFrame radius_l_imu: socket_parent=.. translation=(0 -0.124062 0)
          orientation=(-1.592089 0.01407369 -1.623897)
    Body hand_l: mass=0.4704072 mass_center=(0 -0.07381842 0) inertia=(0.001077821 0.0006609509 0.001619149 0 0 0)
        meshes=(pisiform_lvs.vtp lunate_lvs.vtp scaphoid_lvs.vtp triquetrum_lvs.vtp hamate_lvs.vtp capitate_lvs.vtp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)
      PhysicalOffsetFrame hand_l_imu: socket_parent=.. translation=(0 -0.07381842 0)
          orientation=(-1.668345 0.05686922 -1.654014)
  JointSet:
    CustomJoint ground_pelvis: socket_parent_frame=ground_offset socket_child_frame=pelvis_offset
      Coordinate pelvis_tilt: default_value=0 range=(-1.570796 1.570796) clamped=true
      Coordinate pelvis_list: default_value=0 range=(-1.570796 1.570796) clamped=true
      Coordinate pelvis_rotation: default_value=0 range=(-1.570796 1.570796) clamped=true
      Coordinate pelvis_tx: default_value=0 range=(-5 5) clamped=true
      Coordinate pelvis_ty: default_value=5.965334e-9 range=(-1 2) clamped=true
      Coordinate pelvis_tz: default_value=0 range=(-3 3) clamped=true
      PhysicalOffsetFrame ground_offset: socket_parent=/ground translation=(0 0 0)
      PhysicalOffsetFrame pelvis_offset: socket_parent=/bodyset/pelvis translation=(0 0 0)
      SpatialTransform:
        TransformAxis rotation1: coordinates=pelvis_tilt axis=(0 0 1) LinearFunction(coefficients=1 0)
        TransformAxis rotation2: coordinates=pelvis_list axis=(1 0 0) LinearFunction(coefficients=1 0)
        TransformAxis rotation3: coordinates=pelvis_rotation axis=(0 1 0) LinearFunction(coefficients=1 0)
        TransformAxis translation1: coordinates=pelvis_tx axis=(1 0 0) LinearFunction(coefficients=1 0)
        TransformAxis translation2: coordinates=pelvis_ty axis=(0 1 0) LinearFunction(coefficients=1 0)
        TransformAxis translation3: coordinates=pelvis_tz axis=(0 0 1) LinearFunction(coefficients=1 0)
    WeldJoint sacrumjnt: socket_parent_frame=pelvis_offset socket_child_frame=sacrum_offset
      PhysicalOffsetFrame pelvis_offset: socket_parent=/bodyset/pelvis translation=(0.01120944 -0.01905606 0)
      PhysicalOffsetFrame sacrum_offset: socket_parent=/bodyset/sacrum translation=(0 0 0)
    CustomJoint hip_r: socket_parent_frame=pelvis_offset socket_child_frame=femur_r_offset
      Coordinate hip_flexion_r: default_value=0 range=(-2.094395 2.094395) clamped=true
      Coordinate hip_adduction_r: default_value=0 range=(-2.094395 2.094395) clamped=true
      Coordinate hip_rotation_r: default_value=0 range=(-2.094395 2.094395) clamped=true
      PhysicalOffsetFrame pelvis_offset: socket_parent=/bodyset/pelvis translation=(-0.07925077 -0.07409443 0.09359886)
      PhysicalOffsetFrame femur_r_offset: socket_parent=/bodyset/femur_r translation=(0 0 0)
      SpatialTransform: axes_held_at_zero=(translation1 translation2 translation3)
        TransformAxis rotation1: coordinates=hip_flexion_r axis=(0 0 1) LinearFunction(coefficients=1 0)
        TransformAxis rotation2: coordinates=hip_adduction_r axis=(1 0 0) LinearFunction(coefficients=1 0)
        TransformAxis rotation3: coordinates=hip_rotation_r axis=(0 1 0) LinearFunction(coefficients=1 0)
    CustomJoint patellofemoral_r: socket_parent_frame=femur_r_offset socket_child_frame=patella_r_offset
      Coordinate knee_angle_r_beta: default_value=1.522676e-7 range=(-99999.9 99999.9) clamped=false
      PhysicalOffsetFrame femur_r_offset: socket_parent=/bodyset/femur_r translation=(0 0 0)
      PhysicalOffsetFrame patella_r_offset: socket_parent=/bodyset/patella_r translation=(0 0 0)
      SpatialTransform: axes_held_at_zero=(rotation2 rotation3 translation3)
        TransformAxis rotation1: coordinates=knee_angle_r_beta axis=(0 0 1)
          SimmSpline: x=(0 0.174533 0.349066 0.523599 0.698132 0.872665 1.0472 1.22173 1.39626 1.5708 1.74533 1.91986 2.0944)
              y=(0.00113686 -0.00629212 -0.105582 -0.253683 -0.414245 -0.579047 -0.747244 -0.91799 -1.09044 -1.26379 -1.43763 -1.61186 -1.78634)
        TransformAxis translation1: coordinates=knee_angle_r_beta axis=(1 0 0)
          MultiplierFunction: scale=1.089043
            SimmSpline: x=(0 0.174533 0.349066 0.523599 0.698132 0.872665 1.0472 1.22173 1.39626 1.5708 1.74533 1.91986 2.0944)
                y=(0.04435 0.040692 0.035581 0.029012 0.021473 0.013523 0.005483 -0.002412 -0.009959 -0.016903 -0.022926 -0.027739 -0.030815)
        TransformAxis translation2: coordinates=knee_angle_r_beta axis=(0 1 0)
          MultiplierFunction: scale=1.089043
            SimmSpline: x=(0 0.174533 0.349066 0.523599 0.698132 0.872665 1.0472 1.22173 1.39626 1.5708 1.74533 1.91986 2.0944)
                y=(-0.418712 -0.426965 -0.43422 -0.440152 -0.444617 -0.447495 -0.448724 -0.448337 -0.446353 -0.442826 -0.438035 -0.432448 -0.426632)
    CustomJoint knee_r: socket_parent_frame=femur_r_offset socket_child_frame=tibia_r_offset
      Coordinate knee_angle_r: default_value=-1.522676e-7 range=(-2.094395 0.1745329) clamped=true
      PhysicalOffsetFrame femur_r_offset: socket_parent=/bodyset/femur_r translation=(0 0 0)
      PhysicalOffsetFrame tibia_r_offset: socket_parent=/bodyset/tibia_r translation=(0 0 0)
      SpatialTransform: axes_held_at_zero=(rotation2 rotation3 translation3)
        TransformAxis rotation1: coordinates=knee_angle_r axis=(0 0 1) LinearFunction(coefficients=1 0)
        TransformAxis translation1: coordinates=knee_angle_r axis=(1 0 0)
          MultiplierFunction: scale=1.089043
            SimmSpline: x=(-2.0944 -1.74533 -1.39626 -1.0472 -0.698132 -0.349066 -0.174533 0.197344 0.337395 0.490178 1.52146 2.0944)
                y=(-0.0032 0.00179 0.00411 0.0041 0.00212 -0.001 -0.0031 -0.005227 -0.005435 -0.005574 -0.005435 -0.00525)
        TransformAxis translation2: coordinates=knee_angle_r axis=(0 1 0)
          MultiplierFunction: scale=1.089043
            SimmSpline: x=(-2.0944 -1.22173 -0.523599 -0.349066 -0.174533 0.159149 2.0944)
                y=(-0.4226 -0.4082 -0.399 -0.3976 -0.3966 -0.395264 -0.396)
    CustomJoint ankle_r: socket_parent_frame=tibia_r_offset socket_child_frame=talus_r_offset
      Coordinate ankle_angle_r: default_value=0 range=(-1.570796 1.570796) clamped=true
      PhysicalOffsetFrame tibia_r_offset: socket_parent=/bodyset/tibia_r translation=(0 -0.4553622 0)
      PhysicalOffsetFrame talus_r_offset: socket_parent=/bodyset/talus_r translation=(0 0 0)
      SpatialTransform: axes_held_at_zero=(rotation2 rotation3 translation1 translation2 translation3)
        TransformAxis rotation1: coordinates=ankle_angle_r axis=(-0.1050135 -0.1740224 0.9791263)
            LinearFunction(coefficients=1 0)
    CustomJoint subtalar_r: socket_parent_frame=talus_r_offset socket_child_frame=calcn_r_offset
      Coordinate subtalar_angle_r: default_value=0 range=(-1.570796 1.570796) clamped=true locked=true
      PhysicalOffsetFrame talus_r_offset: socket_parent=/bodyset/talus_r
          translation=(-0.05164655 -0.04442429 0.008387137)
      PhysicalOffsetFrame calcn_r_offset: socket_parent=/bodyset/calcn_r translation=(0 0 0)
      SpatialTransform: axes_held_at_zero=(rotation2 rotation3 translation1 translation2 translation3)
        TransformAxis rotation1: coordinates=subtalar_angle_r axis=(0.7871796 0.6047475 -0.1209495)
            LinearFunction(coefficients=1 0)
    CustomJoint mtp_r: socket_parent_frame=calcn_r_offset socket_child_frame=toes_r_offset
      Coordinate mtp_angle_r: default_value=0 range=(-1.570796 1.570796) clamped=true locked=true
      PhysicalOffsetFrame calcn_r_offset: socket_parent=/bodyset/calcn_r
          translation=(0.2302098 -0.002575054 0.001390529)
      PhysicalOffsetFrame toes_r_offset: socket_parent=/bodyset/toes_r translation=(0 0 0)
      SpatialTransform: axes_held_at_zero=(rotation2 rotation3 translation1 translation2 translation3)
        TransformAxis rotation1: coordinates=mtp_angle_r axis=(-0.5809544 0 0.8139361) LinearFunction(coefficients=1 0)
    CustomJoint hip_l: socket_parent_frame=pelvis_offset socket_child_frame=femur_l_offset
      Coordinate hip_flexion_l: default_value=0 range=(-2.094395 2.094395) clamped=true
      Coordinate hip_adduction_l: default_value=0 range=(-2.094395 2.094395) clamped=true
      Coordinate hip_rotation_l: default_value=0 range=(-2.094395 2.094395) clamped=true
      PhysicalOffsetFrame pelvis_offset: socket_parent=/bodyset/pelvis
          translation=(-0.07925077 -0.07409443 -0.09359886)
      PhysicalOffsetFrame femur_l_offset: socket_parent=/bodyset/femur_l translation=(0 0 0)
      SpatialTransform: axes_held_at_zero=(translation1 translation2 translation3)
        TransformAxis rotation1: coordinates=hip_flexion_l axis=(0 0 1) LinearFunction(coefficients=1 0)
        TransformAxis rotation2: coordinates=hip_adduction_l axis=(-1 0 0) LinearFunction(coefficients=1 0)
        TransformAxis rotation3: coordinates=hip_rotation_l axis=(0 -1 0) LinearFunction(coefficients=1 0)
    CustomJoint patellofemoral_l: socket_parent_frame=femur_l_offset socket_child_frame=patella_l_offset
      Coordinate knee_angle_l_beta: default_value=1.522676e-7 range=(-99999.9 99999.9) clamped=false
      PhysicalOffsetFrame femur_l_offset: socket_parent=/bodyset/femur_l translation=(0 0 0)
      PhysicalOffsetFrame patella_l_offset: socket_parent=/bodyset/patella_l translation=(0 0 0)
      SpatialTransform: axes_held_at_zero=(rotation2 rotation3 translation3)
        TransformAxis rotation1: coordinates=knee_angle_l_beta axis=(0 0 1)
          SimmSpline: x=(0 0.174533 0.349066 0.523599 0.698132 0.872665 1.0472 1.22173 1.39626 1.5708 1.74533 1.91986 2.0944)
              y=(0.00113686 -0.00629212 -0.105582 -0.253683 -0.414245 -0.579047 -0.747244 -0.91799 -1.09044 -1.26379 -1.43763 -1.61186 -1.78634)
        TransformAxis translation1: coordinates=knee_angle_l_beta axis=(1 0 0)
          MultiplierFunction: scale=1.089043
            SimmSpline: x=(0 0.174533 0.349066 0.523599 0.698132 0.872665 1.0472 1.22173 1.39626 1.5708 1.74533 1.91986 2.0944)
                y=(0.04435 0.040692 0.035581 0.029012 0.021473 0.013523 0.005483 -0.002412 -0.009959 -0.016903 -0.022926 -0.027739 -0.030815)
        TransformAxis translation2: coordinates=knee_angle_l_beta axis=(0 1 0)
          MultiplierFunction: scale=1.089043
            SimmSpline: x=(0 0.174533 0.349066 0.523599 0.698132 0.872665 1.0472 1.22173 1.39626 1.5708 1.74533 1.91986 2.0944)
                y=(-0.418712 -0.426965 -0.43422 -0.440152 -0.444617 -0.447495 -0.448724 -0.448337 -0.446353 -0.442826 -0.438035 -0.432448 -0.426632)
    CustomJoint knee_l: socket_parent_frame=femur_l_offset socket_child_frame=tibia_l_offset
      Coordinate knee_angle_l: default_value=-1.522676e-7 range=(-2.094395 0.1745329) clamped=true
      PhysicalOffsetFrame femur_l_offset: socket_parent=/bodyset/femur_l translation=(0 0 0)
      PhysicalOffsetFrame tibia_l_offset: socket_parent=/bodyset/tibia_l translation=(0 0 0)
      SpatialTransform: axes_held_at_zero=(rotation2 rotation3 translation3)
        TransformAxis rotation1: coordinates=knee_angle_l axis=(0 0 1) LinearFunction(coefficients=1 0)
        TransformAxis translation1: coordinates=knee_angle_l axis=(1 0 0)
          MultiplierFunction: scale=1.089043
            SimmSpline: x=(-2.0944 -1.74533 -1.39626 -1.0472 -0.698132 -0.349066 -0.174533 0.197344 0.337395 0.490178 1.52146 2.0944)
                y=(-0.0032 0.00179 0.00411 0.0041 0.00212 -0.001 -0.0031 -0.005227 -0.005435 -0.005574 -0.005435 -0.00525)
        TransformAxis translation2: coordinates=knee_angle_l axis=(0 1 0)
          MultiplierFunction: scale=1.089043
            SimmSpline: x=(-2.0944 -1.22173 -0.523599 -0.349066 -0.174533 0.159149 2.0944)
                y=(-0.4226 -0.4082 -0.399 -0.3976 -0.3966 -0.395264 -0.396)
    CustomJoint ankle_l: socket_parent_frame=tibia_l_offset socket_child_frame=talus_l_offset
      Coordinate ankle_angle_l: default_value=0 range=(-1.047198 1.047198) clamped=true
      PhysicalOffsetFrame tibia_l_offset: socket_parent=/bodyset/tibia_l translation=(0 -0.4553622 0)
      PhysicalOffsetFrame talus_l_offset: socket_parent=/bodyset/talus_l translation=(0 0 0)
      SpatialTransform: axes_held_at_zero=(rotation2 rotation3 translation1 translation2 translation3)
        TransformAxis rotation1: coordinates=ankle_angle_l axis=(0.1050135 0.1740224 0.9791263)
            LinearFunction(coefficients=1 0)
    CustomJoint subtalar_l: socket_parent_frame=talus_l_offset socket_child_frame=calcn_l_offset
      Coordinate subtalar_angle_l: default_value=0 range=(-1.570796 1.570796) clamped=true locked=true
      PhysicalOffsetFrame talus_l_offset: socket_parent=/bodyset/talus_l
          translation=(-0.05164655 -0.04442429 -0.008387137)
      PhysicalOffsetFrame calcn_l_offset: socket_parent=/bodyset/calcn_l translation=(0 0 0)
      SpatialTransform: axes_held_at_zero=(rotation2 rotation3 translation1 translation2 translation3)
        TransformAxis rotation1: coordinates=subtalar_angle_l axis=(-0.7871796 -0.6047475 -0.1209495)
            LinearFunction(coefficients=1 0)
    CustomJoint mtp_l: socket_parent_frame=calcn_l_offset socket_child_frame=toes_l_offset
      Coordinate mtp_angle_l: default_value=0 range=(-1.047198 1.047198) clamped=true locked=true
      PhysicalOffsetFrame calcn_l_offset: socket_parent=/bodyset/calcn_l
          translation=(0.2302098 -0.002575054 -0.001390529)
      PhysicalOffsetFrame toes_l_offset: socket_parent=/bodyset/toes_l translation=(0 0 0)
      SpatialTransform: axes_held_at_zero=(rotation2 rotation3 translation1 translation2 translation3)
        TransformAxis rotation1: coordinates=mtp_angle_l axis=(0.5809544 0 0.8139361) LinearFunction(coefficients=1 0)
    CustomJoint L5_S1_IVDjnt: socket_parent_frame=sacrum_offset socket_child_frame=lumbar5_offset
      Coordinate flex_extension: default_value=-5.015339e-8 range=(-1.22173 0.4537856) clamped=true
      Coordinate lat_bending: default_value=0 range=(-0.4363323 0.4363323) clamped=true
      Coordinate axial_rotation: default_value=0 range=(-0.9791297 0.9791297) clamped=true
      PhysicalOffsetFrame sacrum_offset: socket_parent=/bodyset/sacrum translation=(-0.1098526 0.07958706 0)
      PhysicalOffsetFrame lumbar5_offset: socket_parent=/bodyset/lumbar5 translation=(0 0 0)
      SpatialTransform: axes_held_at_zero=(translation1 translation2 translation3)
        TransformAxis rotation1: coordinates=flex_extension axis=(0 0 1) LinearFunction(coefficients=0.0889273 0)
        TransformAxis rotation2: coordinates=lat_bending axis=(1 0 0)
            PiecewiseLinearFunction(x=-1.01875 1.01875, y=-0.138056 0.138056)
        TransformAxis rotation3: coordinates=axial_rotation axis=(0 1 0)
          SimmSpline: x=(-0.97913 0 0.97913) y=(-0.0296706 0 0.0279253)
    CustomJoint L4_L5_IVDjnt: socket_parent_frame=lumbar5_offset socket_child_frame=lumbar4_offset
      Coordinate L4_L5_IVDjnt_r3: default_value=-7.222088e-9 range=(-99999.9 99999.9) clamped=false
      Coordinate L4_L5_IVD_bendjnt_r1: default_value=0 range=(-99999.9 99999.9) clamped=false
      Coordinate L4_L5_IVD_rotjnt_r2: default_value=0 range=(-99999.9 99999.9) clamped=false
      PhysicalOffsetFrame lumbar5_offset: socket_parent=/bodyset/lumbar5 translation=(0.01037287 0.03070369 0)
      PhysicalOffsetFrame lumbar4_offset: socket_parent=/bodyset/lumbar4 translation=(0.001037287 -0.002593217 0)
      SpatialTransform: axes_held_at_zero=(translation1 translation2 translation3)
        TransformAxis rotation1: coordinates=L4_L5_IVDjnt_r3 axis=(0 0 1) LinearFunction(coefficients=1 0)
        TransformAxis rotation2: coordinates=L4_L5_IVD_bendjnt_r1 axis=(1 0 0) LinearFunction(coefficients=1 0)
        TransformAxis rotation3: coordinates=L4_L5_IVD_rotjnt_r2 axis=(0 1 0) LinearFunction(coefficients=1 0)
    CustomJoint L3_L4_IVDjnt: socket_parent_frame=lumbar4_offset socket_child_frame=lumbar3_offset
      Coordinate L3_L4_IVDjnt_r3: default_value=-1.026866e-8 range=(-99999.9 99999.9) clamped=false
      Coordinate L3_L4_IVD_bendjnt_r1: default_value=0 range=(-99999.9 99999.9) clamped=false
      Coordinate L3_L4_IVD_rotjnt_r2: default_value=0 range=(-99999.9 99999.9) clamped=false
      PhysicalOffsetFrame lumbar4_offset: socket_parent=/bodyset/lumbar4 translation=(0 0.03319318 0)
      PhysicalOffsetFrame lumbar3_offset: socket_parent=/bodyset/lumbar3 translation=(-0.0006223721 -0.001244744 0)
      SpatialTransform: axes_held_at_zero=(translation1 translation2 translation3)
        TransformAxis rotation1: coordinates=L3_L4_IVDjnt_r3 axis=(0 0 1) LinearFunction(coefficients=1 0)
        TransformAxis rotation2: coordinates=L3_L4_IVD_bendjnt_r1 axis=(1 0 0) LinearFunction(coefficients=1 0)
        TransformAxis rotation3: coordinates=L3_L4_IVD_rotjnt_r2 axis=(0 1 0) LinearFunction(coefficients=1 0)
    CustomJoint L2_L3_IVD_jnt: socket_parent_frame=lumbar3_offset socket_child_frame=lumbar2_offset
      Coordinate L2_L3_IVDjnt_r3: default_value=-1.236873e-8 range=(-99999.9 99999.9) clamped=false
      Coordinate L2_L3_IVD_bendjnt_r1: default_value=0 range=(-99999.9 99999.9) clamped=false
      Coordinate L2_L3_IVD_rotjnt_r2: default_value=0 range=(-99999.9 99999.9) clamped=false
      PhysicalOffsetFrame lumbar3_offset: socket_parent=/bodyset/lumbar3 translation=(-0.008298295 0.03236335 0)
      PhysicalOffsetFrame lumbar2_offset: socket_parent=/bodyset/lumbar2 translation=(-0.001348473 -0.004045419 0)
      SpatialTransform: axes_held_at_zero=(translation1 translation2 translation3)
        TransformAxis rotation1: coordinates=L2_L3_IVDjnt_r3 axis=(0 0 1) LinearFunction(coefficients=1 0)
        TransformAxis rotation2: coordinates=L2_L3_IVD_bendjnt_r1 axis=(1 0 0) LinearFunction(coefficients=1 0)
        TransformAxis rotation3: coordinates=L2_L3_IVD_rotjnt_r2 axis=(0 1 0) LinearFunction(coefficients=1 0)
    CustomJoint L1_L2_IVD_jnt: socket_parent_frame=lumbar2_offset socket_child_frame=lumbar1_offset
      Coordinate L1_L2_IVDjnt_r3: default_value=-1.475422e-8 range=(-99999.9 99999.9) clamped=false
      Coordinate L1_L2_IVD_bendjnt_r1: default_value=0 range=(-99999.9 99999.9) clamped=false
      Coordinate L1_L2_IVD_rotjnt_r2: default_value=0 range=(-99999.9 99999.9) clamped=false
      PhysicalOffsetFrame lumbar2_offset: socket_parent=/bodyset/lumbar2 translation=(-0.01037287 0.02593217 0)
      PhysicalOffsetFrame lumbar1_offset: socket_parent=/bodyset/lumbar1 translation=(0.001452202 -0.00394169 0)
      SpatialTransform: axes_held_at_zero=(translation1 translation2 translation3)
        TransformAxis rotation1: coordinates=L1_L2_IVDjnt_r3 axis=(0 0 1) LinearFunction(coefficients=0.85 0)
        TransformAxis rotation2: coordinates=L1_L2_IVD_bendjnt_r1 axis=(1 0 0) LinearFunction(coefficients=1 0)
        TransformAxis rotation3: coordinates=L1_L2_IVD_rotjnt_r2 axis=(0 1 0) LinearFunction(coefficients=1 0)
    CustomJoint Torsojnt: socket_parent_frame=lumbar1_offset socket_child_frame=torso_offset
      Coordinate Torso_Rot: default_value=0 range=(-1.1 1.1) clamped=true
      PhysicalOffsetFrame lumbar1_offset: socket_parent=/bodyset/lumbar1 translation=(0.002593217 -0.09335582 0)
      PhysicalOffsetFrame torso_offset: socket_parent=/bodyset/torso translation=(0 0 0)
      SpatialTransform: axes_held_at_zero=(rotation2 rotation3 translation1 translation2 translation3)
        TransformAxis rotation1: coordinates=Torso_Rot axis=(0 1 0) LinearFunction(coefficients=1 0)
    CustomJoint Abdjnt: socket_parent_frame=sacrum_offset socket_child_frame=Abdomen_offset
      Coordinate Abs_r3: default_value=-3.224147e-8 range=(-1.7 1.7) clamped=false
      Coordinate Abs_t1: default_value=0 range=(-99999.9 99999.9) clamped=false locked=true
      Coordinate Abs_t2: default_value=0 range=(-99999.9 99999.9) clamped=false locked=true
      PhysicalOffsetFrame sacrum_offset: socket_parent=/bodyset/sacrum translation=(-0.1098526 0.07958706 0)
      PhysicalOffsetFrame Abdomen_offset: socket_parent=/bodyset/Abdomen translation=(-0.09335582 -0.09335582 0)
      SpatialTransform: axes_held_at_zero=(rotation2 rotation3 translation3)
        TransformAxis rotation1: coordinates=Abs_r3 axis=(0 0 1) LinearFunction(coefficients=1 0)
        TransformAxis translation1: coordinates=Abs_t1 axis=(1 0 0) LinearFunction(coefficients=1 0)
        TransformAxis translation2: coordinates=Abs_t2 axis=(0 1 0) LinearFunction(coefficients=1 0)
    CustomJoint LB_wrapjnt: socket_parent_frame=sacrum_offset socket_child_frame=LB_wrap_offset
      Coordinate LB_wrapjnt_r3: default_value=-3.009203e-8 range=(-99999.9 99999.9) clamped=false
      Coordinate LB_wrapjnt_t1: default_value=-1.858337e-9 range=(-99999.9 99999.9) clamped=false
      Coordinate LB_wrapjnt_t2: default_value=-6.194458e-10 range=(-99999.9 99999.9) clamped=false
      PhysicalOffsetFrame sacrum_offset: socket_parent=/bodyset/sacrum translation=(-0.1098526 0.07958706 0)
      PhysicalOffsetFrame LB_wrap_offset: socket_parent=/bodyset/LB_wrap translation=(0 0 0)
      SpatialTransform: axes_held_at_zero=(rotation2 rotation3 translation3)
        TransformAxis rotation1: coordinates=LB_wrapjnt_r3 axis=(0 0 1) LinearFunction(coefficients=1 0)
        TransformAxis translation1: coordinates=LB_wrapjnt_t1 axis=(1 0 0) LinearFunction(coefficients=1 0)
        TransformAxis translation2: coordinates=LB_wrapjnt_t2 axis=(0 1 0) LinearFunction(coefficients=1 0)
    CustomJoint acromial_r: socket_parent_frame=torso_offset socket_child_frame=humerus_r_offset
      Coordinate arm_flex_r: default_value=0 range=(-1.570796 1.570796) clamped=true
      Coordinate arm_add_r: default_value=-1.078419e-10 range=(-2.094395 1.570796) clamped=true
      Coordinate arm_rot_r: default_value=0 range=(-1.570796 1.570796) clamped=true
      PhysicalOffsetFrame torso_offset: socket_parent=/bodyset/torso translation=(0.00327264 0.3853521 0.1763388)
      PhysicalOffsetFrame humerus_r_offset: socket_parent=/bodyset/humerus_r translation=(0 0 0)
      SpatialTransform: axes_held_at_zero=(translation1 translation2 translation3)
        TransformAxis rotation1: coordinates=arm_flex_r axis=(0 0 1) LinearFunction(coefficients=1 0)
        TransformAxis rotation2: coordinates=arm_add_r axis=(1 0 0) LinearFunction(coefficients=1 0)
        TransformAxis rotation3: coordinates=arm_rot_r axis=(0 1 0) LinearFunction(coefficients=1 0)
    CustomJoint elbow_r: socket_parent_frame=humerus_r_offset socket_child_frame=ulna_r_offset
      Coordinate elbow_flex_r: default_value=0.00017178 range=(0 2.618) clamped=true
      PhysicalOffsetFrame humerus_r_offset: socket_parent=/bodyset/humerus_r
          translation=(0.01243587 -0.2708502 -0.009078073)
      PhysicalOffsetFrame ulna_r_offset: socket_parent=/bodyset/ulna_r translation=(0 0 0)
      SpatialTransform: axes_held_at_zero=(rotation2 rotation3 translation1 translation2 translation3)
        TransformAxis rotation1: coordinates=elbow_flex_r axis=(0.226047 0.022269 0.9738618)
            LinearFunction(coefficients=1 0)
    CustomJoint radioulnar_r: socket_parent_frame=ulna_r_offset socket_child_frame=radius_r_offset
      Coordinate pro_sup_r: default_value=1.997067e-5 range=(0 1.570796) clamped=true
      PhysicalOffsetFrame ulna_r_offset: socket_parent=/bodyset/ulna_r
          translation=(-0.006924414 -0.01338871 0.02684845)
      PhysicalOffsetFrame radius_r_offset: socket_parent=/bodyset/radius_r translation=(0 0 0)
      SpatialTransform: axes_held_at_zero=(rotation2 rotation3 translation1 translation2 translation3)
        TransformAxis rotation1: coordinates=pro_sup_r axis=(0.05639803 0.9984065 0.001952)
            LinearFunction(coefficients=1 0)
    CustomJoint radius_hand_r: socket_parent_frame=radius_r_offset socket_child_frame=hand_r_offset
      Coordinate wrist_flex_r: default_value=0 range=(-1.22173 1.22173) clamped=true locked=true
      Coordinate wrist_dev_r: default_value=0 range=(-0.4363323 0.6108652) clamped=true locked=true
      PhysicalOffsetFrame radius_r_offset: socket_parent=/bodyset/radius_r
          translation=(-0.009055162 -0.2427621 0.01400941)
      PhysicalOffsetFrame hand_r_offset: socket_parent=/bodyset/hand_r translation=(0 0 0)
      SpatialTransform: axes_held_at_zero=(rotation3 translation1 translation2 translation3)
        TransformAxis rotation1: coordinates=wrist_flex_r axis=(0 0 1) LinearFunction(coefficients=1 0)
        TransformAxis rotation2: coordinates=wrist_dev_r axis=(1 0 0) LinearFunction(coefficients=1 0)
    CustomJoint acromial_l: socket_parent_frame=torso_offset socket_child_frame=humerus_l_offset
      Coordinate arm_flex_l: default_value=0 range=(-1.570796 1.570796) clamped=true
      Coordinate arm_add_l: default_value=-4.198203e-12 range=(-2.094395 1.570796) clamped=true
      Coordinate arm_rot_l: default_value=0 range=(-1.570796 1.570796) clamped=true
      PhysicalOffsetFrame torso_offset: socket_parent=/bodyset/torso translation=(0.00327264 0.3853521 -0.1763388)
      PhysicalOffsetFrame humerus_l_offset: socket_parent=/bodyset/humerus_l translation=(0 0 0)
      SpatialTransform: axes_held_at_zero=(translation1 translation2 translation3)
        TransformAxis rotation1: coordinates=arm_flex_l axis=(0 0 1) LinearFunction(coefficients=1 0)
        TransformAxis rotation2: coordinates=arm_add_l axis=(-1 0 0) LinearFunction(coefficients=1 0)
        TransformAxis rotation3: coordinates=arm_rot_l axis=(0 -1 0) LinearFunction(coefficients=1 0)
    CustomJoint elbow_l: socket_parent_frame=humerus_l_offset socket_child_frame=ulna_l_offset
      Coordinate elbow_flex_l: default_value=0.00017178 range=(0 2.618) clamped=true
      PhysicalOffsetFrame humerus_l_offset: socket_parent=/bodyset/humerus_l
          translation=(0.01243587 -0.2708502 0.009078073)
      PhysicalOffsetFrame ulna_l_offset: socket_parent=/bodyset/ulna_l translation=(0 0 0)
      SpatialTransform: axes_held_at_zero=(rotation2 rotation3 translation1 translation2 translation3)
        TransformAxis rotation1: coordinates=elbow_flex_l axis=(-0.226047 -0.022269 0.9738618)
            LinearFunction(coefficients=1 0)
    CustomJoint radioulnar_l: socket_parent_frame=ulna_l_offset socket_child_frame=radius_l_offset
      Coordinate pro_sup_l: default_value=4.433749e-5 range=(0 1.570796) clamped=true
      PhysicalOffsetFrame ulna_l_offset: socket_parent=/bodyset/ulna_l
          translation=(-0.006924414 -0.01338871 -0.02684845)
      PhysicalOffsetFrame radius_l_offset: socket_parent=/bodyset/radius_l translation=(0 0 0)
      SpatialTransform: axes_held_at_zero=(rotation2 rotation3 translation1 translation2 translation3)
        TransformAxis rotation1: coordinates=pro_sup_l axis=(-0.05639803 -0.9984065 0.001952)
            LinearFunction(coefficients=1 0)
    CustomJoint radius_hand_l: socket_parent_frame=radius_l_offset socket_child_frame=hand_l_offset
      Coordinate wrist_flex_l: default_value=0 range=(-1.22173 1.22173) clamped=true locked=true
      Coordinate wrist_dev_l: default_value=0 range=(-0.4363323 0.6108652) clamped=true locked=true
      PhysicalOffsetFrame radius_l_offset: socket_parent=/bodyset/radius_l
          translation=(-0.009055162 -0.2427621 -0.01400941)
      PhysicalOffsetFrame hand_l_offset: socket_parent=/bodyset/hand_l translation=(0 0 0)
      SpatialTransform: axes_held_at_zero=(rotation3 translation1 translation2 translation3)
        TransformAxis rotation1: coordinates=wrist_flex_l axis=(0 0 1) LinearFunction(coefficients=1 0)
        TransformAxis rotation2: coordinates=wrist_dev_l axis=(-1 0 0) LinearFunction(coefficients=1 0)
  ConstraintSet:
    CoordinateCouplerConstraint LB_wrapjnt_r3_con: independent_coordinate_names=flex_extension
        dependent_coordinate_name=LB_wrapjnt_r3 scale_factor=1
        coupled_coordinates_function=PiecewiseLinearFunction(x=0 1, y=0 0.6)
    CoordinateCouplerConstraint LB_wrapjnt_t1_con: independent_coordinate_names=flex_extension
        dependent_coordinate_name=LB_wrapjnt_t1 scale_factor=1.120944
      coupled_coordinates_function: PiecewiseLinearFunction: x=(0 0.453786) y=(0 0.015)
    CoordinateCouplerConstraint LB_wrapjnt_t2_con: independent_coordinate_names=flex_extension
        dependent_coordinate_name=LB_wrapjnt_t2 scale_factor=1.120944
      coupled_coordinates_function: PiecewiseLinearFunction: x=(0 0.453786) y=(0 0.005)
    CoordinateCouplerConstraint Abs_r3_con: independent_coordinate_names=flex_extension
        dependent_coordinate_name=Abs_r3 scale_factor=1
      coupled_coordinates_function: PiecewiseLinearFunction: x=(-1.22173 0) y=(-0.785398 0)
    CoordinateCouplerConstraint L4_L5_IVDjnt_r3_con: independent_coordinate_names=flex_extension
        dependent_coordinate_name=L4_L5_IVDjnt_r3 scale_factor=1
        coupled_coordinates_function=LinearFunction(coefficients=0.144 0)
    CoordinateCouplerConstraint L4_L5_IVD_rotjnt_r2_con: independent_coordinate_names=axial_rotation
        dependent_coordinate_name=L4_L5_IVD_rotjnt_r2 scale_factor=1
      coupled_coordinates_function: PiecewiseLinearFunction f452: x=(-0.785398 0 0.785398) y=(-0.0331613 0 0.0331613)
    CoordinateCouplerConstraint L4_L5_IVD_bendjnt_r1_con: independent_coordinate_names=lat_bending
        dependent_coordinate_name=L4_L5_IVD_bendjnt_r1 scale_factor=1
      coupled_coordinates_function: PiecewiseLinearFunction f61: x=(-1.01875 1.01875) y=(-0.184481 0.184481)
    CoordinateCouplerConstraint L3_L4_IVDjnt_r3_con: independent_coordinate_names=flex_extension
        dependent_coordinate_name=L3_L4_IVDjnt_r3 scale_factor=1
        coupled_coordinates_function=LinearFunction(coefficients=0.204745 0)
    CoordinateCouplerConstraint L3_L4_IVD_rotjnt_r2_con: independent_coordinate_names=axial_rotation
        dependent_coordinate_name=L3_L4_IVD_rotjnt_r2 scale_factor=1
      coupled_coordinates_function: PiecewiseLinearFunction f232: x=(-0.785398 0 0.785398) y=(-0.0331613 0 0.0331613)
    CoordinateCouplerConstraint L3_L4_IVD_bendjnt_r1_con: independent_coordinate_names=lat_bending
        dependent_coordinate_name=L3_L4_IVD_bendjnt_r1 scale_factor=1
      coupled_coordinates_function: PiecewiseLinearFunction f51: x=(-1.01875 1.01875) y=(-0.249931 0.249931)
    CoordinateCouplerConstraint L2_L3_IVDjnt_r3_con: independent_coordinate_names=flex_extension
        dependent_coordinate_name=L2_L3_IVDjnt_r3 scale_factor=1
        coupled_coordinates_function=LinearFunction(coefficients=0.246618 0)
    CoordinateCouplerConstraint L2_L3_IVD_rotjnt_r2_con: independent_coordinate_names=axial_rotation
        dependent_coordinate_name=L2_L3_IVD_rotjnt_r2 scale_factor=1
      coupled_coordinates_function: PiecewiseLinearFunction f232: x=(-0.785398 0 0.785398) y=(-0.0261799 0 0.0261799)
    CoordinateCouplerConstraint L2_L3_IVD_bendjnt_r1_con: independent_coordinate_names=lat_bending
        dependent_coordinate_name=L2_L3_IVD_bendjnt_r1 scale_factor=1
      coupled_coordinates_function: PiecewiseLinearFunction f41: x=(-1.01875 1.01875) y=(-0.254818 0.254818)
    CoordinateCouplerConstraint L1_L2_IVDjnt_r3_con: independent_coordinate_names=flex_extension
        dependent_coordinate_name=L1_L2_IVDjnt_r3 scale_factor=1
        coupled_coordinates_function=LinearFunction(coefficients=0.294182 0)
    CoordinateCouplerConstraint L1_L2_IVD_rotjnt_r2_con: independent_coordinate_names=axial_rotation
        dependent_coordinate_name=L1_L2_IVD_rotjnt_r2 scale_factor=1
      coupled_coordinates_function: PiecewiseLinearFunction f32: x=(-0.785398 0 0.785398) y=(-0.0226893 0 0.0226893)
    CoordinateCouplerConstraint L1_L2_IVD_bendjnt_r1_con: independent_coordinate_names=lat_bending
        dependent_coordinate_name=L1_L2_IVD_bendjnt_r1 scale_factor=1
      coupled_coordinates_function: PiecewiseLinearFunction f31: x=(-1.01875 1.01875) y=(-0.191463 0.191463)
    CoordinateCouplerConstraint patellofemoral_knee_angle_r_con: independent_coordinate_names=knee_angle_r
        dependent_coordinate_name=knee_angle_r_beta scale_factor=1
        coupled_coordinates_function=LinearFunction(coefficients=-1 0)
    CoordinateCouplerConstraint patellofemoral_knee_angle_l_con: independent_coordinate_names=knee_angle_l
        dependent_coordinate_name=knee_angle_l_beta scale_factor=1
        coupled_coordinates_function=LinearFunction(coefficients=-1 0)
    CoordinateCouplerConstraint Torso_rot_con: independent_coordinate_names=axial_rotation
        dependent_coordinate_name=Torso_Rot scale_factor=1
      coupled_coordinates_function: PiecewiseLinearFunction f40: x=(-0.11 0 0.11) y=(-0.0226209 0 0.0226209)
  ForceSet:
    Thelen2003Muscle glut_med1_r: max_isometric_force=1228.5 optimal_fiber_length=0.0595811
        tendon_slack_length=0.0868659 pennation_angle_at_optimal=0.1396263 [radians] FmaxTendonStrain=0.033
        FmaxMuscleStrain=0.6 KshapeActive=0.5 KshapePassive=4 Af=0.3 Flen=1.8 activation_time_constant=0.01 [seconds]
        deactivation_time_constant=0.04 [seconds]
      PathPoint P1: pelvis (-0.04573453 0.03407671 0.1355222)
      PathPoint P2: femur_r (-0.02374114 -0.0127418 0.06044188)
    Thelen2003Muscle glut_med2_r: max_isometric_force=859.5 optimal_fiber_length=0.09408369
        tendon_slack_length=0.05901107 pennation_angle_at_optimal=0 FmaxTendonStrain=0.033 FmaxMuscleStrain=0.6
        KshapeActive=0.5 KshapePassive=4 Af=0.3 Flen=1.8 activation_time_constant=0.01 deactivation_time_constant=0.04
      PathPoint P1: pelvis (-0.09584075 0.04988203 0.08586435)
      PathPoint P2: femur_r (-0.02809731 -0.006316449 0.05739256)
    Thelen2003Muscle glut_med3_r: max_isometric_force=979.5 optimal_fiber_length=0.07183713
        tendon_slack_length=0.05893758 pennation_angle_at_optimal=0.3316126 FmaxTendonStrain=0.033 FmaxMuscleStrain=0.6
        KshapeActive=0.5 KshapePassive=4 Af=0.3 Flen=1.8 activation_time_constant=0.01 deactivation_time_constant=0.04
      PathPoint P1: pelvis (-0.1370915 0.01176992 0.0726372)
      PathPoint P2: femur_r (-0.03365143 -0.005118502 0.05641242)
    Thelen2003Muscle glut_min1_r: max_isometric_force=405 optimal_fiber_length=0.07533135
        tendon_slack_length=0.01772502 pennation_angle_at_optimal=0.1745329 FmaxTendonStrain=0.033 FmaxMuscleStrain=0.6
        KshapeActive=0.5 KshapePassive=4 Af=0.3 Flen=1.8 activation_time_constant=0.01 deactivation_time_constant=0.04
      PathPoint P1: pelvis (-0.05234811 -0.008967556 0.1183717)
      PathPoint P2: femur_r (-0.007841109 -0.01132605 0.06098641)
    Thelen2003Muscle glut_min2_r: max_isometric_force=427.5 optimal_fiber_length=0.06195404
        tendon_slack_length=0.02876438 pennation_angle_at_optimal=0 FmaxTendonStrain=0.033 FmaxMuscleStrain=0.6
        KshapeActive=0.5 KshapePassive=4 Af=0.3 Flen=1.8 activation_time_constant=0.01 deactivation_time_constant=0.04
      PathPoint P1: pelvis (-0.07095578 -0.007286139 0.1110856)
      PathPoint P2: femur_r (-0.01045481 -0.01132605 0.06098641)
    Thelen2003Muscle glut_min3_r: max_isometric_force=484.5 optimal_fiber_length=0.04203157
        tendon_slack_length=0.05641079 pennation_angle_at_optimal=0.01745329 FmaxTendonStrain=0.033
        FmaxMuscleStrain=0.6 KshapeActive=0.5 KshapePassive=4 Af=0.3 Flen=1.8 activation_time_constant=0.01
        deactivation_time_constant=0.04
      PathPoint P1: pelvis (-0.09348677 -0.00706195 0.09595285)
      PathPoint P2: femur_r (-0.01470208 -0.009039056 0.05989736)
    Thelen2003Muscle semimem_r: max_isometric_force=1288 optimal_fiber_length=0.08665078 tendon_slack_length=0.3888454
        pennation_angle_at_optimal=0.2617994 FmaxTendonStrain=0.033 FmaxMuscleStrain=0.6 KshapeActive=0.5
        KshapePassive=4 Af=0.3 Flen=1.8 activation_time_constant=0.01 deactivation_time_constant=0.04
      PathPoint P1: pelvis (-0.1336166 -0.1092585 0.08015874)
      ConditionalPathPoint P2: tibia_r (-0.03685257 -0.03726557 -0.02002535)
          socket_coordinate=/jointset/knee_r/knee_angle_r range=(-0.558505 0.174533) [radians]
      PathPoint P3: tibia_r (-0.02859251 -0.05052403 -0.02072428)
    Thelen2003Muscle semiten_r: max_isometric_force=615 optimal_fiber_length=0.2168812 tendon_slack_length=0.2756873
        pennation_angle_at_optimal=0.08726646 FmaxTendonStrain=0.033 FmaxMuscleStrain=0.6 KshapeActive=0.5
        KshapePassive=4 Af=0.3 Flen=1.8 activation_time_constant=0.01 deactivation_time_constant=0.04
      PathPoint P1: pelvis (-0.1416313 -0.1231694 0.06769384)
      ConditionalPathPoint P2: tibia_r (-0.04450901 -0.03027629 -0.02411302)
          socket_coordinate=/jointset/knee_r/knee_angle_r range=(-0.331613 0.174533)
      PathPoint P3: tibia_r (-0.03517938 -0.05593543 -0.02422951)
      PathPoint P4: tibia_r (-0.0119665 -0.07900005 -0.02594506)
      PathPoint P5: tibia_r (0.002859251 -0.1012387 -0.02043835)
    Thelen2003Muscle bifemlh_r: max_isometric_force=896 optimal_fiber_length=0.1179823 tendon_slack_length=0.3528646
        pennation_angle_at_optimal=0 FmaxTendonStrain=0.033 FmaxMuscleStrain=0.6 KshapeActive=0.5 KshapePassive=4
        Af=0.3 Flen=1.8 activation_time_constant=0.01 deactivation_time_constant=0.04
      PathPoint P1: pelvis (-0.1411942 -0.1149753 0.07783838)
      PathPoint P2: tibia_r (-0.03187536 -0.03812335 0.03116584)
      PathPoint P3: tibia_r (-0.02478018 -0.05962068 0.03632308)
    Thelen2003Muscle bifemsh_r: max_isometric_force=804 optimal_fiber_length=0.1870662 tendon_slack_length=0.09623635
        pennation_angle_at_optimal=0.4014257 FmaxTendonStrain=0.033 FmaxMuscleStrain=0.6 KshapeActive=0.5
        KshapePassive=4 Af=0.3 Flen=1.8 activation_time_constant=0.01 deactivation_time_constant=0.04
      PathPoint P1: femur_r (0.005445215 -0.229897 0.02548361)
      PathPoint P2: tibia_r (-0.03187536 -0.03812335 0.03116584)
      PathPoint P3: tibia_r (-0.02478018 -0.05962068 0.03632308)
    Thelen2003Muscle sar_r: max_isometric_force=156 optimal_fiber_length=0.5659709 tendon_slack_length=0.1088406
        pennation_angle_at_optimal=0 FmaxTendonStrain=0.033 FmaxMuscleStrain=0.6 KshapeActive=0.5 KshapePassive=4
        Af=0.3 Flen=1.8 activation_time_constant=0.01 deactivation_time_constant=0.04
      PathPoint P1: pelvis (-0.01715045 -0.001457228 0.1392213)
      PathPoint P2: femur_r (-0.003267129 -0.3885705 -0.04584871)
      PathPoint P3: tibia_r (-0.005930299 -0.04437134 -0.04225338)
      PathPoint P4: tibia_r (0.006353892 -0.06237404 -0.04055901)
      PathPoint P5: tibia_r (0.02573326 -0.08895448 -0.02668635)
    Thelen2003Muscle add_long_r: max_isometric_force=627 optimal_fiber_length=0.1506671 tendon_slack_length=0.120097
        pennation_angle_at_optimal=0.1047198 FmaxTendonStrain=0.033 FmaxMuscleStrain=0.6 KshapeActive=0.5
        KshapePassive=4 Af=0.3 Flen=1.8 activation_time_constant=0.01 deactivation_time_constant=0.04
      PathPoint P1: pelvis (-0.03542185 -0.09371096 0.01894396)
      PathPoint P2: femur_r (0.005445215 -0.229897 0.02548361)
    Thelen2003Muscle add_brev_r: max_isometric_force=429 optimal_fiber_length=0.1458342 tendon_slack_length=0.02192996
        pennation_angle_at_optimal=0 FmaxTendonStrain=0.033 FmaxMuscleStrain=0.6 KshapeActive=0.5 KshapePassive=4
        Af=0.3 Flen=1.8 activation_time_constant=0.01 deactivation_time_constant=0.04
      PathPoint P1: pelvis (-0.06579944 -0.1025664 0.01838349)
      PathPoint P2: femur_r (0.0009801387 -0.1302495 0.03201786)
    Thelen2003Muscle add_mag1_r: max_isometric_force=381 optimal_fiber_length=0.09512773 tendon_slack_length=0.06560533
        pennation_angle_at_optimal=0.08726646 FmaxTendonStrain=0.033 FmaxMuscleStrain=0.6 KshapeActive=0.5
        KshapePassive=4 Af=0.3 Flen=1.8 activation_time_constant=0.01 deactivation_time_constant=0.04
      PathPoint P1: pelvis (-0.08205313 -0.1315989 0.02858408)
      PathPoint P2: femur_r (-0.004900693 -0.1318831 0.03691856)
    Thelen2003Muscle add_mag2_r: max_isometric_force=343 optimal_fiber_length=0.1312445 tendon_slack_length=0.1301598
        pennation_angle_at_optimal=0.05235988 FmaxTendonStrain=0.033 FmaxMuscleStrain=0.6 KshapeActive=0.5
        KshapePassive=4 Af=0.3 Flen=1.8 activation_time_constant=0.01 deactivation_time_constant=0.04
      PathPoint P1: pelvis (-0.09315048 -0.1336166 0.03452509)
      PathPoint P2: femur_r (0.005880832 -0.2488463 0.02472127)
    Thelen2003Muscle add_mag3_r: max_isometric_force=488 optimal_fiber_length=0.1421602 tendon_slack_length=0.270213
        pennation_angle_at_optimal=0.08726646 FmaxTendonStrain=0.033 FmaxMuscleStrain=0.6 KshapeActive=0.5
        KshapePassive=4 Af=0.3 Flen=1.8 activation_time_constant=0.01 deactivation_time_constant=0.04
      PathPoint P1: pelvis (-0.1245145 -0.1279334 0.05472451)
      PathPoint P2: femur_r (0.007623301 -0.4178658 -0.02896854)
    Thelen2003Muscle tfl_r: max_isometric_force=349.5 optimal_fiber_length=0.1037151 tendon_slack_length=0.4639887
        pennation_angle_at_optimal=0.05235988 FmaxTendonStrain=0.033 FmaxMuscleStrain=0.6 KshapeActive=0.5
        KshapePassive=4 Af=0.3 Flen=1.8 activation_time_constant=0.01 deactivation_time_constant=0.04
      PathPoint P1: pelvis (-0.03486137 0.02398821 0.1391092)
      PathPoint P2: femur_r (0.03201786 -0.1083598 0.06501586)
      PathPoint P3: femur_r (0.005880832 -0.4409535 0.03887883)
      PathPoint P4: tibia_r (0.006353892 -0.05157242 0.03145176)
    Thelen2003Muscle pect_r: max_isometric_force=266 optimal_fiber_length=0.1097359 tendon_slack_length=0.03621284
        pennation_angle_at_optimal=0 FmaxTendonStrain=0.033 FmaxMuscleStrain=0.6 KshapeActive=0.5 KshapePassive=4
        Af=0.3 Flen=1.8 activation_time_constant=0.01 deactivation_time_constant=0.04
      PathPoint P1: pelvis (-0.04831271 -0.08608853 0.0505546)
      PathPoint P2: femur_r (-0.01328632 -0.08951933 0.02755279)
    Thelen2003Muscle grac_r: max_isometric_force=162 optimal_fiber_length=0.3797746 tendon_slack_length=0.135942
        pennation_angle_at_optimal=0.05235988 FmaxTendonStrain=0.033 FmaxMuscleStrain=0.6 KshapeActive=0.5
        KshapePassive=4 Af=0.3 Flen=1.8 activation_time_constant=0.01 deactivation_time_constant=0.04
      PathPoint P1: pelvis (-0.0829611 -0.1330561 0.03131919)
      ConditionalPathPoint P2: tibia_r (-0.02813715 -0.03378152 -0.03996598)
          socket_coordinate=/jointset/knee_r/knee_angle_r range=(-0.436332 0.174533)
      PathPoint P3: tibia_r (-0.02057602 -0.05456934 -0.03791155)
      PathPoint P4: tibia_r (0.006353892 -0.08853089 -0.02414479)
    Thelen2003Muscle glut_max1_r: max_isometric_force=573 optimal_fiber_length=0.1576428 tendon_slack_length=0.13877
        pennation_angle_at_optimal=0.08726646 FmaxTendonStrain=0.033 FmaxMuscleStrain=0.6 KshapeActive=0.5
        KshapePassive=4 Af=0.3 Flen=1.8 activation_time_constant=0.01 deactivation_time_constant=0.04
      PathPoint P1: pelvis (-0.1339529 0.0686018 0.07846611)
      PathPoint P2: pelvis (-0.1447139 0.001345133 0.09931568)
      PathPoint P3: femur_r (-0.04976926 -0.02700827 0.04269048)
      PathPoint P4: femur_r (-0.03016649 -0.06163983 0.05118502)
    Thelen2003Muscle glut_max2_r: max_isometric_force=819 optimal_fiber_length=0.1625731 tendon_slack_length=0.1404543
        pennation_angle_at_optimal=0 FmaxTendonStrain=0.033 FmaxMuscleStrain=0.6 KshapeActive=0.5 KshapePassive=4
        Af=0.3 Flen=1.8 activation_time_constant=0.01 deactivation_time_constant=0.04
      PathPoint P1: pelvis (-0.1512154 0.01972862 0.06310917)
      PathPoint P2: pelvis (-0.154242 -0.05828911 0.1024543)
      PathPoint P3: femur_r (-0.04639323 -0.05771928 0.03190896)
      PathPoint P4: femur_r (-0.01698907 -0.1106468 0.0456309)
    Thelen2003Muscle glut_max3_r: max_isometric_force=552 optimal_fiber_length=0.1592551 tendon_slack_length=0.160361
        pennation_angle_at_optimal=0.08726646 FmaxTendonStrain=0.033 FmaxMuscleStrain=0.6 KshapeActive=0.5
        KshapePassive=4 Af=0.3 Flen=1.8 activation_time_constant=0.01 deactivation_time_constant=0.04
      PathPoint P1: pelvis (-0.174419 -0.03519766 0.006501478)
      PathPoint P2: pelvis (-0.1713924 -0.1179234 0.04517406)
      PathPoint P3: femur_r (-0.03256238 -0.1133694 0.01470208)
      PathPoint P4: femur_r (-0.006534258 -0.1545352 0.04475967)
    Thelen2003Muscle iliacus_r: max_isometric_force=1609.5 optimal_fiber_length=0.1111603 tendon_slack_length=0.1111603
        pennation_angle_at_optimal=0.1221731 FmaxTendonStrain=0.033 FmaxMuscleStrain=0.6 KshapeActive=0.5
        KshapePassive=4 Af=0.3 Flen=1.8 activation_time_constant=0.01 deactivation_time_constant=0.04
      PathPoint P1: pelvis (-0.07555166 0.04091447 0.09572866)
      PathPoint P2: pelvis (-0.02892037 -0.06165195 0.0909086)
      ConditionalPathPoint P3: pelvis (-0.0322832 -0.09023603 0.09146907)
          socket_coordinate=/jointset/hip_r/hip_flexion_r range=(-1.5708 0.785398)
      PathPoint P4: femur_r (0.001851373 -0.05913503 0.006207545)
      PathPoint P5: femur_r (-0.02101853 -0.06762957 0.01404865)
    Thelen2003Muscle quad_fem_r: max_isometric_force=381 optimal_fiber_length=0.05990318 tendon_slack_length=0.02662364
        pennation_angle_at_optimal=0 FmaxTendonStrain=0.033 FmaxMuscleStrain=0.6 KshapeActive=0.5 KshapePassive=4
        Af=0.3 Flen=1.8 activation_time_constant=0.01 deactivation_time_constant=0.04
      PathPoint P1: pelvis (-0.128124 -0.1290207 0.05828911)
      PathPoint P2: femur_r (-0.04149254 -0.03909664 0.03985897)
    Thelen2003Muscle gem_r: max_isometric_force=164 optimal_fiber_length=0.02652653 tendon_slack_length=0.04310561
        pennation_angle_at_optimal=0 FmaxTendonStrain=0.033 FmaxMuscleStrain=0.6 KshapeActive=0.5 KshapePassive=4
        Af=0.3 Flen=1.8 activation_time_constant=0.01 deactivation_time_constant=0.04
      PathPoint P1: pelvis (-0.127003 -0.09191745 0.08003543)
      PathPoint P2: femur_r (-0.01546441 -0.003593842 0.0482446)
    Thelen2003Muscle peri_r: max_isometric_force=444 optimal_fiber_length=0.02897211 tendon_slack_length=0.1281459
        pennation_angle_at_optimal=0.1745329 FmaxTendonStrain=0.033 FmaxMuscleStrain=0.6 KshapeActive=0.5
        KshapePassive=4 Af=0.3 Flen=1.8 activation_time_constant=0.01 deactivation_time_constant=0.04
      PathPoint P1: pelvis (-0.1564838 0.0003362833 0.02634219)
      PathPoint P2: pelvis (-0.1337287 -0.03093807 0.07364605)
      PathPoint P3: femur_r (-0.01611784 -0.003920555 0.04759118)
    Thelen2003Muscle rect_fem_r: max_isometric_force=1169 optimal_fiber_length=0.1244527 tendon_slack_length=0.3384241
        pennation_angle_at_optimal=0.08726646 FmaxTendonStrain=0.033 FmaxMuscleStrain=0.6 KshapeActive=0.5
        KshapePassive=4 Af=0.3 Flen=1.8 activation_time_constant=0.01 deactivation_time_constant=0.04
      PathPoint P1: pelvis (-0.03306786 -0.03486137 0.1085074)
      ConditionalPathPoint P2: femur_r (0.03637403 -0.4388843 0.002069182)
          socket_coordinate=/jointset/knee_r/knee_angle_r range=(-2.61799 -1.45997)
      PathPoint P3: patella_r (0.01089043 0.0533631 0.0007623301)
      PathPoint P4: patella_r (0.01317742 0.04759118 -0.001089043)
    Thelen2003Muscle vas_med_r: max_isometric_force=1294 optimal_fiber_length=0.09692482 tendon_slack_length=0.1372194
        pennation_angle_at_optimal=0.08726646 FmaxTendonStrain=0.033 FmaxMuscleStrain=0.6 KshapeActive=0.5
        KshapePassive=4 Af=0.3 Flen=1.8 activation_time_constant=0.01 deactivation_time_constant=0.04
      PathPoint P1: femur_r (0.0152466 -0.2285901 0.02047401)
      PathPoint P2: femur_r (0.03876993 -0.301556 0.0009801387)
      ConditionalPathPoint P3: femur_r (0.04029459 -0.4408446 -0.01361304)
          socket_coordinate=/jointset/knee_r/knee_angle_r range=(-2.61799 -1.21004)
      ConditionalPathPoint P4: femur_r (0.02983978 -0.4633878 -0.01426646)
          socket_coordinate=/jointset/knee_r/knee_angle_r range=(-2.61799 -1.78006)
      PathPoint P5: patella_r (0.006860971 0.04846241 -0.01851373)
    Thelen2003Muscle vas_int_r: max_isometric_force=1365 optimal_fiber_length=0.09474674 tendon_slack_length=0.1481098
        pennation_angle_at_optimal=0.05235988 FmaxTendonStrain=0.033 FmaxMuscleStrain=0.6 KshapeActive=0.5
        KshapePassive=4 Af=0.3 Flen=1.8 activation_time_constant=0.01 deactivation_time_constant=0.04
      PathPoint P1: femur_r (0.03158225 -0.2095319 0.03376033)
      PathPoint P2: femur_r (0.03648294 -0.2269566 0.03103772)
      ConditionalPathPoint P3: femur_r (0.03735417 -0.4388843 0.005989736)
          socket_coordinate=/jointset/knee_r/knee_angle_r range=(-2.61799 -1.42)
      PathPoint P4: patella_r (0.006316449 0.05227406 -0.0006534258)
    Thelen2003Muscle vas_lat_r: max_isometric_force=1871 optimal_fiber_length=0.09147961 tendon_slack_length=0.1709797
        pennation_angle_at_optimal=0.08726646 FmaxTendonStrain=0.033 FmaxMuscleStrain=0.6 KshapeActive=0.5
        KshapePassive=4 Af=0.3 Flen=1.8 activation_time_constant=0.01 deactivation_time_constant=0.04
      PathPoint P1: femur_r (0.005227406 -0.2019086 0.0380076)
      PathPoint P2: femur_r (0.02929526 -0.282171 0.04454186)
      ConditionalPathPoint P3: femur_r (0.03931445 -0.4388843 0.02232538)
          socket_coordinate=/jointset/knee_r/knee_angle_r range=(-2.61799 -1.21004)
      ConditionalPathPoint P4: femur_r (0.02755279 -0.4620809 0.02003839)
          socket_coordinate=/jointset/knee_r/knee_angle_r range=(-2.61799 -1.92004)
      PathPoint P5: patella_r (0.01121714 0.04606652 0.01535551)
    Thelen2003Muscle patlig_r: max_isometric_force=1 optimal_fiber_length=0.05328414 tendon_slack_length=0.005328414
        pennation_angle_at_optimal=0 FmaxTendonStrain=0.033 FmaxMuscleStrain=0.6 KshapeActive=0.5 KshapePassive=4
        Af=0.3 Flen=1.8 activation_time_constant=0.01 deactivation_time_constant=0.04
      PathPoint P1: tibia_r (0.02986329 -0.06131505 0.006036197)
      PathPoint P2: patella_r (0.00228699 0.001633564 0.0001089043)
    Thelen2003Muscle med_gas_r: max_isometric_force=2337 optimal_fiber_length=0.06262283 tendon_slack_length=0.4070484
        pennation_angle_at_optimal=0.296706 FmaxTendonStrain=0.033 FmaxMuscleStrain=0.6 KshapeActive=0.5
        KshapePassive=4 Af=0.3 Flen=1.8 activation_time_constant=0.01 deactivation_time_constant=0.04
      PathPoint P1: femur_r (-0.02069182 -0.427885 -0.02559251)
      ConditionalPathPoint P2: femur_r (-0.03267129 -0.4380131 -0.02809731)
          socket_coordinate=/jointset/knee_r/knee_angle_r range=(-0.785398 0.174533)
      PathPoint P3: calcn_r (0 0.03991333 -0.006823893)
    Thelen2003Muscle lat_gas_r: max_isometric_force=1024.5 optimal_fiber_length=0.066796 tendon_slack_length=0.3966013
        pennation_angle_at_optimal=0.1396263 FmaxTendonStrain=0.033 FmaxMuscleStrain=0.6 KshapeActive=0.5
        KshapePassive=4 Af=0.3 Flen=1.8 activation_time_constant=0.01 deactivation_time_constant=0.04
      PathPoint P1: femur_r (-0.02395894 -0.4297363 0.02962197)
      ConditionalPathPoint P2: femur_r (-0.03267129 -0.4375775 0.02983978)
          socket_coordinate=/jointset/knee_r/knee_angle_r range=(-0.785398 0.174533)
      PathPoint P3: calcn_r (0 0.03991333 -0.006823893)
    Thelen2003Muscle soleus_r: max_isometric_force=5323.5 optimal_fiber_length=0.05175311 tendon_slack_length=0.2587656
        pennation_angle_at_optimal=0.4363323 FmaxTendonStrain=0.033 FmaxMuscleStrain=0.6 KshapeActive=0.5
        KshapePassive=4 Af=0.3 Flen=1.8 activation_time_constant=0.01 deactivation_time_constant=0.04
      PathPoint P1: tibia_r (-0.002541557 -0.1623419 0.007518772)
      PathPoint P2: calcn_r (0 0.03991333 -0.006823893)
    Thelen2003Muscle tib_post_r: max_isometric_force=2382 optimal_fiber_length=0.0333404 tendon_slack_length=0.333404
        pennation_angle_at_optimal=0.2094395 FmaxTendonStrain=0.033 FmaxMuscleStrain=0.6 KshapeActive=0.5
        KshapePassive=4 Af=0.3 Flen=1.8 activation_time_constant=0.01 deactivation_time_constant=0.04
      PathPoint P1: tibia_r (-0.00995443 -0.1427508 0.002012066)
      PathPoint P2: tibia_r (-0.01524934 -0.4289936 -0.02425069)
      PathPoint P3: calcn_r (0.05368987 0.0430034 -0.03682327)
      PathPoint P4: calcn_r (0.09939708 0.02047168 -0.03617951)
    Thelen2003Muscle flex_dig_r: max_isometric_force=465 optimal_fiber_length=0.03937566 tendon_slack_length=0.4632431
        pennation_angle_at_optimal=0.1221731 FmaxTendonStrain=0.033 FmaxMuscleStrain=0.6 KshapeActive=0.5
        KshapePassive=4 Af=0.3 Flen=1.8 activation_time_constant=0.01 deactivation_time_constant=0.04
      PathPoint P1: tibia_r (-0.00878955 -0.2166677 -0.001906168)
      PathPoint P2: tibia_r (-0.01630832 -0.4289936 -0.02075605)
      PathPoint P3: calcn_r (0.05613617 0.0405571 -0.03605075)
      PathPoint P4: calcn_r (0.09115691 0.02266047 -0.03386196)
      PathPoint P5: calcn_r (0.213472 -0.01042897 0.01493531)
      PathPoint P6: toes_r (-0.002446301 -0.01004271 0.01892665)
      PathPoint P7: toes_r (0.03669452 -0.009141441 0.02768183)
      PathPoint P8: toes_r (0.05677994 -0.007725162 0.03115815)
    Thelen2003Muscle flex_hal_r: max_isometric_force=483 optimal_fiber_length=0.049982 tendon_slack_length=0.4417014
        pennation_angle_at_optimal=0.1745329 FmaxTendonStrain=0.033 FmaxMuscleStrain=0.6 KshapeActive=0.5
        KshapePassive=4 Af=0.3 Flen=1.8 activation_time_constant=0.01 deactivation_time_constant=0.04
      PathPoint P1: tibia_r (-0.008365957 -0.2471664 0.02583916)
      PathPoint P2: tibia_r (-0.01969706 -0.4319587 -0.01842629)
      PathPoint P3: calcn_r (0.04815351 0.03553574 -0.0310294)
      PathPoint P4: calcn_r (0.1336453 0.008755183 -0.03296069)
      PathPoint P5: calcn_r (0.2222271 -0.006823893 -0.03463447)
      PathPoint P6: toes_r (0.01995667 -0.008240172 -0.03411946)
      PathPoint P7: toes_r (0.07235901 -0.01313277 -0.02330424)
    Thelen2003Muscle tib_ant_r: max_isometric_force=905 optimal_fiber_length=0.1084347 tendon_slack_length=0.2467443
        pennation_angle_at_optimal=0.08726646 FmaxTendonStrain=0.033 FmaxMuscleStrain=0.6 KshapeActive=0.5
        KshapePassive=4 Af=0.3 Flen=1.8 activation_time_constant=0.01 deactivation_time_constant=0.04
      PathPoint P1: tibia_r (0.01895578 -0.1719787 0.01217829)
      PathPoint P2: tibia_r (0.03484051 -0.4184038 -0.01874398)
      PathPoint P3: calcn_r (0.1501256 0.02291798 -0.03926957)
    Thelen2003Muscle per_brev_r: max_isometric_force=435 optimal_fiber_length=0.05568826 tendon_slack_length=0.1793162
        pennation_angle_at_optimal=0.08726646 FmaxTendonStrain=0.033 FmaxMuscleStrain=0.6 KshapeActive=0.5
        KshapePassive=4 Af=0.3 Flen=1.8 activation_time_constant=0.01 deactivation_time_constant=0.04
      PathPoint P1: tibia_r (-0.007412874 -0.2802066 0.03441691)
      PathPoint P2: tibia_r (-0.02096784 -0.443078 0.02996919)
      PathPoint P3: tibia_r (-0.01524934 -0.4548327 0.03060458)
      PathPoint P4: calcn_r (0.06064252 0.03476323 0.02999938)
      PathPoint P5: calcn_r (0.08716557 0.02819684 0.04416217)
    Thelen2003Muscle per_long_r: max_isometric_force=1414.5 optimal_fiber_length=0.05522896
        tendon_slack_length=0.3888569 pennation_angle_at_optimal=0.1745329 FmaxTendonStrain=0.033 FmaxMuscleStrain=0.6
        KshapeActive=0.5 KshapePassive=4 Af=0.3 Flen=1.8 activation_time_constant=0.01 deactivation_time_constant=0.04
      PathPoint P1: tibia_r (0.000529491 -0.1660484 0.03833515)
      PathPoint P2: tibia_r (-0.02192093 -0.4453019 0.03028688)
      PathPoint P3: tibia_r (-0.01715551 -0.4573743 0.03060458)
      PathPoint P4: calcn_r (0.05639368 0.02961312 0.02845434)
      PathPoint P5: calcn_r (0.08768058 0.01364779 0.03656576)
      PathPoint P6: calcn_r (0.1096973 0.008883936 0.01519282)
      PathPoint P7: calcn_r (0.1548895 0.01094398 -0.0236905)
    Thelen2003Muscle per_tert_r: max_isometric_force=180 optimal_fiber_length=0.08715347 tendon_slack_length=0.1103209
        pennation_angle_at_optimal=0.2268928 FmaxTendonStrain=0.033 FmaxMuscleStrain=0.6 KshapeActive=0.5
        KshapePassive=4 Af=0.3 Flen=1.8 activation_time_constant=0.01 deactivation_time_constant=0.04
      PathPoint P1: tibia_r (0.001058982 -0.2969385 0.02446248)
      PathPoint P2: tibia_r (0.02425069 -0.4308998 0.01683781)
      PathPoint P3: calcn_r (0.1103411 0.02935561 0.03849705)
    Thelen2003Muscle ext_dig_r: max_isometric_force=512 optimal_fiber_length=0.1170618 tendon_slack_length=0.3959444
        pennation_angle_at_optimal=0.1396263 FmaxTendonStrain=0.033 FmaxMuscleStrain=0.6 KshapeActive=0.5
        KshapePassive=4 Af=0.3 Flen=1.8 activation_time_constant=0.01 deactivation_time_constant=0.04
      PathPoint P1: tibia_r (0.003388742 -0.1462454 0.0292279)
      PathPoint P2: tibia_r (0.03060458 -0.4243341 0.00762467)
      PathPoint P3: calcn_r (0.11871 0.04995604 -0.0001287527)
      PathPoint P4: calcn_r (0.2080644 0.007081398 0.01673785)
      PathPoint P5: toes_r (0.0003862581 0.006051377 0.01969916)
      PathPoint P6: toes_r (0.05703744 -0.0005150108 0.03218817)
    Thelen2003Muscle ext_hal_r: max_isometric_force=162 optimal_fiber_length=0.1287551 tendon_slack_length=0.3537866
        pennation_angle_at_optimal=0.1047198 FmaxTendonStrain=0.033 FmaxMuscleStrain=0.6 KshapeActive=0.5
        KshapePassive=4 Af=0.3 Flen=1.8 activation_time_constant=0.01 deactivation_time_constant=0.04
      PathPoint P1: tibia_r (0.001270778 -0.1871221 0.02414479)
      PathPoint P2: tibia_r (0.03452281 -0.4220043 -0.009001347)
      PathPoint P3: calcn_r (0.1248901 0.0500848 -0.02716682)
      PathPoint P4: calcn_r (0.1664772 0.03978458 -0.03308944)
      PathPoint P5: calcn_r (0.2232572 0.01789662 -0.03605075)
      PathPoint P6: toes_r (0.0383683 0.00527886 -0.03154441)
      PathPoint P7: toes_r (0.07248777 0.004377592 -0.023948)
    Thelen2003Muscle glut_med1_l: max_isometric_force=1228.5 optimal_fiber_length=0.0595811
        tendon_slack_length=0.0868659 pennation_angle_at_optimal=0.1396263 FmaxTendonStrain=0.033 FmaxMuscleStrain=0.6
        KshapeActive=0.5 KshapePassive=4 Af=0.3 Flen=1.8 activation_time_constant=0.01 deactivation_time_constant=0.04
      PathPoint P1: pelvis (-0.04573453 0.03407671 -0.1355222)
      PathPoint P2: femur_l (-0.02374114 -0.0127418 -0.06044188)
    Thelen2003Muscle glut_med2_l: max_isometric_force=859.5 optimal_fiber_length=0.09408369
        tendon_slack_length=0.05901107 pennation_angle_at_optimal=0 FmaxTendonStrain=0.033 FmaxMuscleStrain=0.6
        KshapeActive=0.5 KshapePassive=4 Af=0.3 Flen=1.8 activation_time_constant=0.01 deactivation_time_constant=0.04
      PathPoint P1: pelvis (-0.09584075 0.04988203 -0.08586435)
      PathPoint P2: femur_l (-0.02809731 -0.006316449 -0.05739256)
    Thelen2003Muscle glut_med3_l: max_isometric_force=979.5 optimal_fiber_length=0.07183713
        tendon_slack_length=0.05893758 pennation_angle_at_optimal=0.3316126 FmaxTendonStrain=0.033 FmaxMuscleStrain=0.6
        KshapeActive=0.5 KshapePassive=4 Af=0.3 Flen=1.8 activation_time_constant=0.01 deactivation_time_constant=0.04
      PathPoint P1: pelvis (-0.1370915 0.01176992 -0.0726372)
      PathPoint P2: femur_l (-0.03365143 -0.005118502 -0.05641242)
    Thelen2003Muscle glut_min1_l: max_isometric_force=405 optimal_fiber_length=0.07533135
        tendon_slack_length=0.01772502 pennation_angle_at_optimal=0.1745329 FmaxTendonStrain=0.033 FmaxMuscleStrain=0.6
        KshapeActive=0.5 KshapePassive=4 Af=0.3 Flen=1.8 activation_time_constant=0.01 deactivation_time_constant=0.04
      PathPoint P1: pelvis (-0.05234811 -0.008967556 -0.1183717)
      PathPoint P2: femur_l (-0.007841109 -0.01132605 -0.06098641)
    Thelen2003Muscle glut_min2_l: max_isometric_force=427.5 optimal_fiber_length=0.06195404
        tendon_slack_length=0.02876438 pennation_angle_at_optimal=0 FmaxTendonStrain=0.033 FmaxMuscleStrain=0.6
        KshapeActive=0.5 KshapePassive=4 Af=0.3 Flen=1.8 activation_time_constant=0.01 deactivation_time_constant=0.04
      PathPoint P1: pelvis (-0.07095578 -0.007286139 -0.1110856)
      PathPoint P2: femur_l (-0.01045481 -0.01132605 -0.06098641)
    Thelen2003Muscle glut_min3_l: max_isometric_force=484.5 optimal_fiber_length=0.04203157
        tendon_slack_length=0.05641079 pennation_angle_at_optimal=0.01745329 FmaxTendonStrain=0.033
        FmaxMuscleStrain=0.6 KshapeActive=0.5 KshapePassive=4 Af=0.3 Flen=1.8 activation_time_constant=0.01
        deactivation_time_constant=0.04
      PathPoint P1: pelvis (-0.09348677 -0.00706195 -0.09595285)
      PathPoint P2: femur_l (-0.01470208 -0.009039056 -0.05989736)
    Thelen2003Muscle semimem_l: max_isometric_force=1288 optimal_fiber_length=0.08665078 tendon_slack_length=0.3888454
        pennation_angle_at_optimal=0.2617994 FmaxTendonStrain=0.033 FmaxMuscleStrain=0.6 KshapeActive=0.5
        KshapePassive=4 Af=0.3 Flen=1.8 activation_time_constant=0.01 deactivation_time_constant=0.04
      PathPoint P1: pelvis (-0.1336166 -0.1092585 -0.08015874)
      ConditionalPathPoint P2: tibia_l (-0.03685257 -0.03726557 0.02002535)
          socket_coordinate=/jointset/knee_l/knee_angle_l range=(-0.558505 0.174533)
      PathPoint P3: tibia_l (-0.02859251 -0.05052403 0.02072428)
    Thelen2003Muscle semiten_l: max_isometric_force=615 optimal_fiber_length=0.2168812 tendon_slack_length=0.2756873
        pennation_angle_at_optimal=0.08726646 FmaxTendonStrain=0.033 FmaxMuscleStrain=0.6 KshapeActive=0.5
        KshapePassive=4 Af=0.3 Flen=1.8 activation_time_constant=0.01 deactivation_time_constant=0.04
      PathPoint P1: pelvis (-0.1416313 -0.1231694 -0.06769384)
      ConditionalPathPoint P2: tibia_l (-0.04450901 -0.03027629 0.02411302)
          socket_coordinate=/jointset/knee_l/knee_angle_l range=(-0.331613 0.174533)
      PathPoint P3: tibia_l (-0.03517938 -0.05593543 0.02422951)
      PathPoint P4: tibia_l (-0.0119665 -0.07900005 0.02594506)
      PathPoint P5: tibia_l (0.002859251 -0.1012387 0.02043835)
    Thelen2003Muscle bifemlh_l: max_isometric_force=896 optimal_fiber_length=0.1179823 tendon_slack_length=0.3528646
        pennation_angle_at_optimal=0 FmaxTendonStrain=0.033 FmaxMuscleStrain=0.6 KshapeActive=0.5 KshapePassive=4
        Af=0.3 Flen=1.8 activation_time_constant=0.01 deactivation_time_constant=0.04
      PathPoint P1: pelvis (-0.1411942 -0.1149753 -0.07783838)
      PathPoint P2: tibia_l (-0.03187536 -0.03812335 -0.03116584)
      PathPoint P3: tibia_l (-0.02478018 -0.05962068 -0.03632308)
    Thelen2003Muscle bifemsh_l: max_isometric_force=804 optimal_fiber_length=0.1870662 tendon_slack_length=0.09623635
        pennation_angle_at_optimal=0.4014257 FmaxTendonStrain=0.033 FmaxMuscleStrain=0.6 KshapeActive=0.5
        KshapePassive=4 Af=0.3 Flen=1.8 activation_time_constant=0.01 deactivation_time_constant=0.04
      PathPoint P1: femur_l (0.005445215 -0.229897 -0.02548361)
      PathPoint P2: tibia_l (-0.03187536 -0.03812335 -0.03116584)
      PathPoint P3: tibia_l (-0.02478018 -0.05962068 -0.03632308)
    Thelen2003Muscle sar_l: max_isometric_force=156 optimal_fiber_length=0.5659709 tendon_slack_length=0.1088406
        pennation_angle_at_optimal=0 FmaxTendonStrain=0.033 FmaxMuscleStrain=0.6 KshapeActive=0.5 KshapePassive=4
        Af=0.3 Flen=1.8 activation_time_constant=0.01 deactivation_time_constant=0.04
      PathPoint P1: pelvis (-0.01715045 -0.001457228 -0.1392213)
      PathPoint P2: femur_l (-0.003267129 -0.3885705 0.04584871)
      PathPoint P3: tibia_l (-0.005930299 -0.04437134 0.04225338)
      PathPoint P4: tibia_l (0.006353892 -0.06237404 0.04055901)
      PathPoint P5: tibia_l (0.02573326 -0.08895448 0.02668635)
    Thelen2003Muscle add_long_l: max_isometric_force=627 optimal_fiber_length=0.1506671 tendon_slack_length=0.120097
        pennation_angle_at_optimal=0.1047198 FmaxTendonStrain=0.033 FmaxMuscleStrain=0.6 KshapeActive=0.5
        KshapePassive=4 Af=0.3 Flen=1.8 activation_time_constant=0.01 deactivation_time_constant=0.04
      PathPoint P1: pelvis (-0.03542185 -0.09371096 -0.01894396)
      PathPoint P2: femur_l (0.005445215 -0.229897 -0.02548361)
    Thelen2003Muscle add_brev_l: max_isometric_force=429 optimal_fiber_length=0.1458342 tendon_slack_length=0.02192996
        pennation_angle_at_optimal=0 FmaxTendonStrain=0.033 FmaxMuscleStrain=0.6 KshapeActive=0.5 KshapePassive=4
        Af=0.3 Flen=1.8 activation_time_constant=0.01 deactivation_time_constant=0.04
      PathPoint P1: pelvis (-0.06579944 -0.1025664 -0.01838349)
      PathPoint P2: femur_l (0.0009801387 -0.1302495 -0.03201786)
    Thelen2003Muscle add_mag1_l: max_isometric_force=381 optimal_fiber_length=0.09512773 tendon_slack_length=0.06560533
        pennation_angle_at_optimal=0.08726646 FmaxTendonStrain=0.033 FmaxMuscleStrain=0.6 KshapeActive=0.5
        KshapePassive=4 Af=0.3 Flen=1.8 activation_time_constant=0.01 deactivation_time_constant=0.04
      PathPoint P1: pelvis (-0.08205313 -0.1315989 -0.02858408)
      PathPoint P2: femur_l (-0.004900693 -0.1318831 -0.03691856)
    Thelen2003Muscle add_mag2_l: max_isometric_force=343 optimal_fiber_length=0.1312445 tendon_slack_length=0.1301598
        pennation_angle_at_optimal=0.05235988 FmaxTendonStrain=0.033 FmaxMuscleStrain=0.6 KshapeActive=0.5
        KshapePassive=4 Af=0.3 Flen=1.8 activation_time_constant=0.01 deactivation_time_constant=0.04
      PathPoint P1: pelvis (-0.09315048 -0.1336166 -0.03452509)
      PathPoint P2: femur_l (0.005880832 -0.2488463 -0.02472127)
    Thelen2003Muscle add_mag3_l: max_isometric_force=488 optimal_fiber_length=0.1421602 tendon_slack_length=0.270213
        pennation_angle_at_optimal=0.08726646 FmaxTendonStrain=0.033 FmaxMuscleStrain=0.6 KshapeActive=0.5
        KshapePassive=4 Af=0.3 Flen=1.8 activation_time_constant=0.01 deactivation_time_constant=0.04
      PathPoint P1: pelvis (-0.1245145 -0.1279334 -0.05472451)
      PathPoint P2: femur_l (0.007623301 -0.4178658 0.02896854)
    Thelen2003Muscle tfl_l: max_isometric_force=349.5 optimal_fiber_length=0.1037151 tendon_slack_length=0.4639887
        pennation_angle_at_optimal=0.05235988 FmaxTendonStrain=0.033 FmaxMuscleStrain=0.6 KshapeActive=0.5
        KshapePassive=4 Af=0.3 Flen=1.8 activation_time_constant=0.01 deactivation_time_constant=0.04
      PathPoint P1: pelvis (-0.03486137 0.02398821 -0.1391092)
      PathPoint P2: femur_l (0.03201786 -0.1083598 -0.06501586)
      PathPoint P3: femur_l (0.005880832 -0.4409535 -0.03887883)
      PathPoint P4: tibia_l (0.006353892 -0.05157242 -0.03145176)
    Thelen2003Muscle pect_l: max_isometric_force=266 optimal_fiber_length=0.1097359 tendon_slack_length=0.03621284
        pennation_angle_at_optimal=0 FmaxTendonStrain=0.033 FmaxMuscleStrain=0.6 KshapeActive=0.5 KshapePassive=4
        Af=0.3 Flen=1.8 activation_time_constant=0.01 deactivation_time_constant=0.04
      PathPoint P1: pelvis (-0.04831271 -0.08608853 -0.0505546)
      PathPoint P2: femur_l (-0.01328632 -0.08951933 -0.02755279)
    Thelen2003Muscle grac_l: max_isometric_force=162 optimal_fiber_length=0.3797746 tendon_slack_length=0.135942
        pennation_angle_at_optimal=0.05235988 FmaxTendonStrain=0.033 FmaxMuscleStrain=0.6 KshapeActive=0.5
        KshapePassive=4 Af=0.3 Flen=1.8 activation_time_constant=0.01 deactivation_time_constant=0.04
      PathPoint P1: pelvis (-0.0829611 -0.1330561 -0.03131919)
      ConditionalPathPoint P2: tibia_l (-0.02813715 -0.03378152 0.03996598)
          socket_coordinate=/jointset/knee_l/knee_angle_l range=(-0.436332 0.174533)
      PathPoint P3: tibia_l (-0.02057602 -0.05456934 0.03791155)
      PathPoint P4: tibia_l (0.006353892 -0.08853089 0.02414479)
    Thelen2003Muscle glut_max1_l: max_isometric_force=573 optimal_fiber_length=0.1576428 tendon_slack_length=0.13877
        pennation_angle_at_optimal=0.08726646 FmaxTendonStrain=0.033 FmaxMuscleStrain=0.6 KshapeActive=0.5
        KshapePassive=4 Af=0.3 Flen=1.8 activation_time_constant=0.01 deactivation_time_constant=0.04
      PathPoint P1: pelvis (-0.1339529 0.0686018 -0.07846611)
      PathPoint P2: pelvis (-0.1447139 0.001345133 -0.09931568)
      PathPoint P3: femur_l (-0.04976926 -0.02700827 -0.04269048)
      PathPoint P4: femur_l (-0.03016649 -0.06163983 -0.05118502)
    Thelen2003Muscle glut_max2_l: max_isometric_force=819 optimal_fiber_length=0.1625731 tendon_slack_length=0.1404543
        pennation_angle_at_optimal=0 FmaxTendonStrain=0.033 FmaxMuscleStrain=0.6 KshapeActive=0.5 KshapePassive=4
        Af=0.3 Flen=1.8 activation_time_constant=0.01 deactivation_time_constant=0.04
      PathPoint P1: pelvis (-0.1512154 0.01972862 -0.06310917)
      PathPoint P2: pelvis (-0.154242 -0.05828911 -0.1024543)
      PathPoint P3: femur_l (-0.04639323 -0.05771928 -0.03190896)
      PathPoint P4: femur_l (-0.01698907 -0.1106468 -0.0456309)
    Thelen2003Muscle glut_max3_l: max_isometric_force=552 optimal_fiber_length=0.1592551 tendon_slack_length=0.160361
        pennation_angle_at_optimal=0.08726646 FmaxTendonStrain=0.033 FmaxMuscleStrain=0.6 KshapeActive=0.5
        KshapePassive=4 Af=0.3 Flen=1.8 activation_time_constant=0.01 deactivation_time_constant=0.04
      PathPoint P1: pelvis (-0.174419 -0.03519766 -0.006501478)
      PathPoint P2: pelvis (-0.1713924 -0.1179234 -0.04517406)
      PathPoint P3: femur_l (-0.03256238 -0.1133694 -0.01470208)
      PathPoint P4: femur_l (-0.006534258 -0.1545352 -0.04475967)
    Thelen2003Muscle iliacus_l: max_isometric_force=1609.5 optimal_fiber_length=0.1111603 tendon_slack_length=0.1111603
        pennation_angle_at_optimal=0.1221731 FmaxTendonStrain=0.033 FmaxMuscleStrain=0.6 KshapeActive=0.5
        KshapePassive=4 Af=0.3 Flen=1.8 activation_time_constant=0.01 deactivation_time_constant=0.04
      PathPoint P1: pelvis (-0.07555166 0.04091447 -0.09572866)
      PathPoint P2: pelvis (-0.02892037 -0.06165195 -0.0909086)
      ConditionalPathPoint P3: pelvis (-0.0322832 -0.09023603 -0.09146907)
          socket_coordinate=/jointset/hip_l/hip_flexion_l range=(-1.5708 0.785398)
      PathPoint P4: femur_l (0.001851373 -0.05913503 -0.006207545)
      PathPoint P5: femur_l (-0.02101853 -0.06762957 -0.01404865)
    Thelen2003Muscle quad_fem_l: max_isometric_force=381 optimal_fiber_length=0.05990318 tendon_slack_length=0.02662364
        pennation_angle_at_optimal=0 FmaxTendonStrain=0.033 FmaxMuscleStrain=0.6 KshapeActive=0.5 KshapePassive=4
        Af=0.3 Flen=1.8 activation_time_constant=0.01 deactivation_time_constant=0.04
      PathPoint P1: pelvis (-0.128124 -0.1290207 -0.05828911)
      PathPoint P2: femur_l (-0.04149254 -0.03909664 -0.03985897)
    Thelen2003Muscle gem_l: max_isometric_force=164 optimal_fiber_length=0.02652653 tendon_slack_length=0.04310561
        pennation_angle_at_optimal=0 FmaxTendonStrain=0.033 FmaxMuscleStrain=0.6 KshapeActive=0.5 KshapePassive=4
        Af=0.3 Flen=1.8 activation_time_constant=0.01 deactivation_time_constant=0.04
      PathPoint P1: pelvis (-0.127003 -0.09191745 -0.08003543)
      PathPoint P2: femur_l (-0.01546441 -0.003593842 -0.0482446)
    Thelen2003Muscle peri_l: max_isometric_force=444 optimal_fiber_length=0.02897211 tendon_slack_length=0.1281459
        pennation_angle_at_optimal=0.1745329 FmaxTendonStrain=0.033 FmaxMuscleStrain=0.6 KshapeActive=0.5
        KshapePassive=4 Af=0.3 Flen=1.8 activation_time_constant=0.01 deactivation_time_constant=0.04
      PathPoint P1: pelvis (-0.1564838 0.0003362833 -0.02634219)
      PathPoint P2: pelvis (-0.1337287 -0.03093807 -0.07364605)
      PathPoint P3: femur_l (-0.01611784 -0.003920555 -0.04759118)
    Thelen2003Muscle rect_fem_l: max_isometric_force=1169 optimal_fiber_length=0.1244527 tendon_slack_length=0.3384241
        pennation_angle_at_optimal=0.08726646 FmaxTendonStrain=0.033 FmaxMuscleStrain=0.6 KshapeActive=0.5
        KshapePassive=4 Af=0.3 Flen=1.8 activation_time_constant=0.01 deactivation_time_constant=0.04
      PathPoint P1: pelvis (-0.03306786 -0.03486137 -0.1085074)
      ConditionalPathPoint P2: femur_l (0.03637403 -0.4388843 -0.002069182)
          socket_coordinate=/jointset/knee_l/knee_angle_l range=(-2.61799 -1.45997)
      PathPoint P3: patella_l (0.01089043 0.0533631 -0.0007623301)
      PathPoint P4: patella_l (0.01317742 0.04759118 0.001089043)
    Thelen2003Muscle vas_med_l: max_isometric_force=1294 optimal_fiber_length=0.09708914 tendon_slack_length=0.137452
        pennation_angle_at_optimal=0.08726646 FmaxTendonStrain=0.033 FmaxMuscleStrain=0.6 KshapeActive=0.5
        KshapePassive=4 Af=0.3 Flen=1.8 activation_time_constant=0.01 deactivation_time_constant=0.04
      PathPoint P1: femur_l (0.0152466 -0.2285901 -0.02047401)
      PathPoint P2: femur_l (0.03876993 -0.301556 -0.0009801387)
      ConditionalPathPoint P3: femur_l (0.04029459 -0.4408446 0.01361304)
          socket_coordinate=/jointset/knee_l/knee_angle_l range=(-2.61799 -1.21004)
      ConditionalPathPoint P4: femur_l (0.02983978 -0.4633878 0.01426646)
          socket_coordinate=/jointset/knee_l/knee_angle_l range=(-2.61799 -1.78006)
      MovingPathPoint P5: tibia_l socket_x_coordinate=/jointset/knee_l/knee_angle_l
          socket_y_coordinate=/jointset/knee_l/knee_angle_l socket_z_coordinate=/jointset/knee_l/knee_angle_l
        x_location: MultiplierFunction: scale=1.058982
          SimmSpline: x=(-2.0944 -1.99997 -1.5708 -1.45752 -1.39626 -1.0472 -0.698132 -0.526391 -0.349066 -0.174533 0 0.00017453 0.00034907 0.0279253 0.0872665 0.174533 2.0944)
              y=(0.00981097 0.0122243 0.0217371 0.0238851 0.0249902 0.0307959 0.0364187 0.0392871 0.0425654 0.0475764 0.0559586 0.0559681 0.0559776 0.0575419 0.0613368 0.0679503 0.0629332)
        y_location: MultiplierFunction: scale=1.058982
          SimmSpline: x=(-2.0944 -1.99997 -1.5708 -1.45752 -1.39626 -1.0472 -0.698132 -0.526391 -0.349066 -0.174533 0 0.00017453 0.00034907 0.0279253 0.0872665 0.174533 2.0944)
              y=(0.0224154 0.0227651 0.0241265 0.0242933 0.0243287 0.0239462 0.0233593 0.0230677 0.0228342 0.0226362 0.0217917 0.0217903 0.0217889 0.0215365 0.0206842 0.0183269 -0.0656205)
        z_location: MultiplierFunction: scale=1.058982
          SimmSpline: x=(-2.0944 2.0944) y=(0.0146 0.0146)
    Thelen2003Muscle vas_int_l: max_isometric_force=1365 optimal_fiber_length=0.09492074 tendon_slack_length=0.1483818
        pennation_angle_at_optimal=0.05235988 FmaxTendonStrain=0.033 FmaxMuscleStrain=0.6 KshapeActive=0.5
        KshapePassive=4 Af=0.3 Flen=1.8 activation_time_constant=0.01 deactivation_time_constant=0.04
      PathPoint P1: femur_l (0.03158225 -0.2095319 -0.03376033)
      PathPoint P2: femur_l (0.03648294 -0.2269566 -0.03103772)
      ConditionalPathPoint P3: femur_l (0.03735417 -0.4388843 -0.005989736)
          socket_coordinate=/jointset/knee_l/knee_angle_l range=(-2.61799 -1.42)
      MovingPathPoint P4: tibia_l socket_x_coordinate=/jointset/knee_l/knee_angle_l
          socket_y_coordinate=/jointset/knee_l/knee_angle_l socket_z_coordinate=/jointset/knee_l/knee_angle_l
        x_location: MultiplierFunction: scale=1.058982
          SimmSpline: x=(-2.0944 -1.99997 -1.5708 -1.45752 -1.39626 -1.0472 -0.698132 -0.526391 -0.349066 -0.174533 0 0.00017453 0.00034907 0.0279253 0.0872665 0.174533 2.0944)
              y=(0.0155805 0.0179938 0.0275081 0.0296564 0.0307615 0.0365695 0.0422074 0.0450902 0.048391 0.0534299 0.0617576 0.0617669 0.0617762 0.0633083 0.066994 0.0733035 0.0573481)
        y_location: MultiplierFunction: scale=1.058982
          SimmSpline: x=(-2.0944 -1.99997 -1.5708 -1.45752 -1.39626 -1.0472 -0.698132 -0.526391 -0.349066 -0.174533 0 0.00017453 0.00034907 0.0279253 0.0872665 0.174533 2.0944)
              y=(0.0234116 0.0237613 0.0251141 0.0252795 0.0253146 0.0249184 0.0242373 0.0238447 0.0234197 0.0227644 0.020984 0.0209814 0.0209788 0.0205225 0.0191754 0.0159554 -0.0673774)
        z_location: MultiplierFunction: scale=1.058982
          SimmSpline: x=(-2.0944 0.1745) y=(-0.0014 -0.0014)
    Thelen2003Muscle vas_lat_l: max_isometric_force=1871 optimal_fiber_length=0.0915865 tendon_slack_length=0.1711795
        pennation_angle_at_optimal=0.08726646 FmaxTendonStrain=0.033 FmaxMuscleStrain=0.6 KshapeActive=0.5
        KshapePassive=4 Af=0.3 Flen=1.8 activation_time_constant=0.01 deactivation_time_constant=0.04
      PathPoint P1: femur_l (0.005227406 -0.2019086 -0.0380076)
      PathPoint P2: femur_l (0.02929526 -0.282171 -0.04454186)
      ConditionalPathPoint P3: femur_l (0.03931445 -0.4388843 -0.02232538)
          socket_coordinate=/jointset/knee_l/knee_angle_l range=(-2.61799 -1.21004)
      ConditionalPathPoint P4: femur_l (0.02755279 -0.4620809 -0.02003839)
          socket_coordinate=/jointset/knee_l/knee_angle_l range=(-2.61799 -1.92004)
      MovingPathPoint P5: tibia_l socket_x_coordinate=/jointset/knee_l/knee_angle_l
          socket_y_coordinate=/jointset/knee_l/knee_angle_l socket_z_coordinate=/jointset/knee_l/knee_angle_l
        x_location: MultiplierFunction: scale=1.058982
          SimmSpline: x=(-2.0944 -1.99997 -1.5708 -1.45752 -1.39626 -1.0472 -0.698132 -0.526391 -0.349066 -0.174533 0 0.00017453 0.00034907 0.0279253 0.0872665 0.174533 2.0944)
              y=(0.0142897 0.016703 0.0262145 0.0283623 0.0294674 0.0352709 0.0408785 0.0437291 0.0469704 0.0518742 0.0599557 0.0599647 0.0599738 0.0614577 0.0650351 0.0711867 0.0583766)
        y_location: MultiplierFunction: scale=1.058982
          SimmSpline: x=(-2.0944 -1.99997 -1.5708 -1.45752 -1.39626 -1.0472 -0.698132 -0.526391 -0.349066 -0.174533 0 0.00017453 0.00034907 0.0279253 0.0872665 0.174533 2.0944)
              y=(0.0215318 0.0218815 0.0232362 0.0234019 0.0234371 0.0230439 0.0223842 0.0220151 0.0216359 0.0210971 0.0195864 0.0195842 0.019582 0.01919 0.018008 0.0151073 -0.0653421)
        z_location: MultiplierFunction: scale=1.058982
          SimmSpline: x=(-2.0944 2.0944) y=(-0.0165 -0.0165)
    Thelen2003Muscle patlig_l: max_isometric_force=1 optimal_fiber_length=0.05328414 tendon_slack_length=0.005328414
        pennation_angle_at_optimal=0 FmaxTendonStrain=0.033 FmaxMuscleStrain=0.6 KshapeActive=0.5 KshapePassive=4
        Af=0.3 Flen=1.8 activation_time_constant=0.01 deactivation_time_constant=0.04
      PathPoint P1: tibia_l (0.02986329 -0.06131505 -0.006036197)
      PathPoint P2: patella_l (0.00228699 0.001633564 -0.0001089043)
    Thelen2003Muscle med_gas_l: max_isometric_force=2337 optimal_fiber_length=0.06262283 tendon_slack_length=0.4070484
        pennation_angle_at_optimal=0.296706 FmaxTendonStrain=0.033 FmaxMuscleStrain=0.6 KshapeActive=0.5
        KshapePassive=4 Af=0.3 Flen=1.8 activation_time_constant=0.01 deactivation_time_constant=0.04
      PathPoint P1: femur_l (-0.02069182 -0.427885 0.02559251)
      ConditionalPathPoint P2: femur_l (-0.03267129 -0.4380131 0.02809731)
          socket_coordinate=/jointset/knee_l/knee_angle_l range=(-0.785398 0.174533)
      PathPoint P3: calcn_l (0 0.03991333 0.006823893)
    Thelen2003Muscle lat_gas_l: max_isometric_force=1024.5 optimal_fiber_length=0.066796 tendon_slack_length=0.3966013
        pennation_angle_at_optimal=0.1396263 FmaxTendonStrain=0.033 FmaxMuscleStrain=0.6 KshapeActive=0.5
        KshapePassive=4 Af=0.3 Flen=1.8 activation_time_constant=0.01 deactivation_time_constant=0.04
      PathPoint P1: femur_l (-0.02395894 -0.4297363 -0.02962197)
      ConditionalPathPoint P2: femur_l (-0.03267129 -0.4375775 -0.02983978)
          socket_coordinate=/jointset/knee_l/knee_angle_l range=(-0.785398 0.174533)
      PathPoint P3: calcn_l (0 0.03991333 0.006823893)
    Thelen2003Muscle soleus_l: max_isometric_force=5323.5 optimal_fiber_length=0.05175311 tendon_slack_length=0.2587656
        pennation_angle_at_optimal=0.4363323 FmaxTendonStrain=0.033 FmaxMuscleStrain=0.6 KshapeActive=0.5
        KshapePassive=4 Af=0.3 Flen=1.8 activation_time_constant=0.01 deactivation_time_constant=0.04
      PathPoint P1: tibia_l (-0.002541557 -0.1623419 -0.007518772)
      PathPoint P2: calcn_l (0 0.03991333 0.006823893)
    Thelen2003Muscle tib_post_l: max_isometric_force=2382 optimal_fiber_length=0.0333404 tendon_slack_length=0.333404
        pennation_angle_at_optimal=0.2094395 FmaxTendonStrain=0.033 FmaxMuscleStrain=0.6 KshapeActive=0.5
        KshapePassive=4 Af=0.3 Flen=1.8 activation_time_constant=0.01 deactivation_time_constant=0.04
      PathPoint P1: tibia_l (-0.00995443 -0.1427508 -0.002012066)
      PathPoint P2: tibia_l (-0.01524934 -0.4289936 0.02425069)
      PathPoint P3: calcn_l (0.05368987 0.0430034 0.03682327)
      PathPoint P4: calcn_l (0.09939708 0.02047168 0.03617951)
    Thelen2003Muscle flex_dig_l: max_isometric_force=465 optimal_fiber_length=0.03937566 tendon_slack_length=0.4632431
        pennation_angle_at_optimal=0.1221731 FmaxTendonStrain=0.033 FmaxMuscleStrain=0.6 KshapeActive=0.5
        KshapePassive=4 Af=0.3 Flen=1.8 activation_time_constant=0.01 deactivation_time_constant=0.04
      PathPoint P1: tibia_l (-0.00878955 -0.2166677 0.001906168)
      PathPoint P2: tibia_l (-0.01630832 -0.4289936 0.02075605)
      PathPoint P3: calcn_l (0.05613617 0.0405571 0.03605075)
      PathPoint P4: calcn_l (0.09115691 0.02266047 0.03386196)
      PathPoint P5: calcn_l (0.213472 -0.01042897 -0.01493531)
      PathPoint P6: toes_l (-0.002446301 -0.01004271 -0.01892665)
      PathPoint P7: toes_l (0.03669452 -0.009141441 -0.02768183)
      PathPoint P8: toes_l (0.05677994 -0.007725162 -0.03115815)
    Thelen2003Muscle flex_hal_l: max_isometric_force=483 optimal_fiber_length=0.049982 tendon_slack_length=0.4417014
        pennation_angle_at_optimal=0.1745329 FmaxTendonStrain=0.033 FmaxMuscleStrain=0.6 KshapeActive=0.5
        KshapePassive=4 Af=0.3 Flen=1.8 activation_time_constant=0.01 deactivation_time_constant=0.04
      PathPoint P1: tibia_l (-0.008365957 -0.2471664 -0.02583916)
      PathPoint P2: tibia_l (-0.01969706 -0.4319587 0.01842629)
      PathPoint P3: calcn_l (0.04815351 0.03553574 0.0310294)
      PathPoint P4: calcn_l (0.1336453 0.008755183 0.03296069)
      PathPoint P5: calcn_l (0.2222271 -0.006823893 0.03463447)
      PathPoint P6: toes_l (0.01995667 -0.008240172 0.03411946)
      PathPoint P7: toes_l (0.07235901 -0.01313277 0.02330424)
    Thelen2003Muscle tib_ant_l: max_isometric_force=905 optimal_fiber_length=0.1084347 tendon_slack_length=0.2467443
        pennation_angle_at_optimal=0.08726646 FmaxTendonStrain=0.033 FmaxMuscleStrain=0.6 KshapeActive=0.5
        KshapePassive=4 Af=0.3 Flen=1.8 activation_time_constant=0.01 deactivation_time_constant=0.04
      PathPoint P1: tibia_l (0.01895578 -0.1719787 -0.01217829)
      PathPoint P2: tibia_l (0.03484051 -0.4184038 0.01874398)
      PathPoint P3: calcn_l (0.1501256 0.02291798 0.03926957)
    Thelen2003Muscle per_brev_l: max_isometric_force=435 optimal_fiber_length=0.05568826 tendon_slack_length=0.1793162
        pennation_angle_at_optimal=0.08726646 FmaxTendonStrain=0.033 FmaxMuscleStrain=0.6 KshapeActive=0.5
        KshapePassive=4 Af=0.3 Flen=1.8 activation_time_constant=0.01 deactivation_time_constant=0.04
      PathPoint P1: tibia_l (-0.007412874 -0.2802066 -0.03441691)
      PathPoint P2: tibia_l (-0.02096784 -0.443078 -0.02996919)
      PathPoint P3: tibia_l (-0.01524934 -0.4548327 -0.03060458)
      PathPoint P4: calcn_l (0.06064252 0.03476323 -0.02999938)
      PathPoint P5: calcn_l (0.08716557 0.02819684 -0.04416217)
    Thelen2003Muscle per_long_l: max_isometric_force=943 optimal_fiber_length=0.05522896 tendon_slack_length=0.3888569
        pennation_angle_at_optimal=0.1745329 FmaxTendonStrain=0.033 FmaxMuscleStrain=0.6 KshapeActive=0.5
        KshapePassive=4 Af=0.3 Flen=1.8 activation_time_constant=0.01 deactivation_time_constant=0.04
      PathPoint P1: tibia_l (0.000529491 -0.1660484 -0.03833515)
      PathPoint P2: tibia_l (-0.02192093 -0.4453019 -0.03028688)
      PathPoint P3: tibia_l (-0.01715551 -0.4573743 -0.03060458)
      PathPoint P4: calcn_l (0.05639368 0.02961312 -0.02845434)
      PathPoint P5: calcn_l (0.08768058 0.01364779 -0.03656576)
      PathPoint P6: calcn_l (0.1096973 0.008883936 -0.01519282)
      PathPoint P7: calcn_l (0.1548895 0.01094398 0.0236905)
    Thelen2003Muscle per_tert_l: max_isometric_force=180 optimal_fiber_length=0.08715347 tendon_slack_length=0.1103209
        pennation_angle_at_optimal=0.2268928 FmaxTendonStrain=0.033 FmaxMuscleStrain=0.6 KshapeActive=0.5
        KshapePassive=4 Af=0.3 Flen=1.8 activation_time_constant=0.01 deactivation_time_constant=0.04
      PathPoint P1: tibia_l (0.001058982 -0.2969385 -0.02446248)
      PathPoint P2: tibia_l (0.02425069 -0.4308998 -0.01683781)
      PathPoint P3: calcn_l (0.1103411 0.02935561 -0.03849705)
    Thelen2003Muscle ext_dig_l: max_isometric_force=512 optimal_fiber_length=0.1170618 tendon_slack_length=0.3959444
        pennation_angle_at_optimal=0.1396263 FmaxTendonStrain=0.033 FmaxMuscleStrain=0.6 KshapeActive=0.5
        KshapePassive=4 Af=0.3 Flen=1.8 activation_time_constant=0.01 deactivation_time_constant=0.04
      PathPoint P1: tibia_l (0.003388742 -0.1462454 -0.0292279)
      PathPoint P2: tibia_l (0.03060458 -0.4243341 -0.00762467)
      PathPoint P3: calcn_l (0.11871 0.04995604 0.0001287527)
      PathPoint P4: calcn_l (0.2080644 0.007081398 -0.01673785)
      PathPoint P5: toes_l (0.0003862581 0.006051377 -0.01969916)
      PathPoint P6: toes_l (0.05703744 -0.0005150108 -0.03218817)
    Thelen2003Muscle ext_hal_l: max_isometric_force=162 optimal_fiber_length=0.1287551 tendon_slack_length=0.3537866
        pennation_angle_at_optimal=0.1047198 FmaxTendonStrain=0.033 FmaxMuscleStrain=0.6 KshapeActive=0.5
        KshapePassive=4 Af=0.3 Flen=1.8 activation_time_constant=0.01 deactivation_time_constant=0.04
      PathPoint P1: tibia_l (0.001270778 -0.1871221 -0.02414479)
      PathPoint P2: tibia_l (0.03452281 -0.4220043 0.009001347)
      PathPoint P3: calcn_l (0.1248901 0.0500848 0.02716682)
      PathPoint P4: calcn_l (0.1664772 0.03978458 0.03308944)
      PathPoint P5: calcn_l (0.2232572 0.01789662 0.03605075)
      PathPoint P6: toes_l (0.0383683 0.00527886 0.03154441)
      PathPoint P7: toes_l (0.07248777 0.004377592 0.023948)
    Thelen2003Muscle rect_abd_r: max_isometric_force=163 optimal_fiber_length=0.2379439 tendon_slack_length=0.01807438
        pennation_angle_at_optimal=0 FmaxTendonStrain=0.033 FmaxMuscleStrain=0.6 KshapeActive=0.5 KshapePassive=4
        Af=0.3 Flen=1.8 activation_time_constant=0.01 deactivation_time_constant=0.04
      PathPoint P1: pelvis (-0.02914456 -0.07846611 0.01233039)
      PathPoint P2: torso (0.09543039 0.230259 0.03215589)
    Thelen2003Muscle rect_abd_l: max_isometric_force=163 optimal_fiber_length=0.2379485 tendon_slack_length=0.01807473
        pennation_angle_at_optimal=0 FmaxTendonStrain=0.033 FmaxMuscleStrain=0.6 KshapeActive=0.5 KshapePassive=4
        Af=0.3 Flen=1.8 activation_time_constant=0.01 deactivation_time_constant=0.04
      PathPoint P1: pelvis (-0.02914456 -0.07846611 -0.01233039)
      PathPoint P2: torso (0.09543039 0.2299281 -0.03215589)
    Thelen2003Muscle Ps_L1_VB_r: max_isometric_force=160.4797 optimal_fiber_length=0.1997563
        tendon_slack_length=0.07020223 pennation_angle_at_optimal=0.18675
      PathPoint P1: lumbar1 (-0.01053832 0.02413767 0.02074574)
      PathPoint P2: pelvis (-0.02667848 -0.06389383 0.08507968)
      ConditionalPathPoint P3: pelvis (-0.0322832 -0.09023603 0.09146907)
          socket_coordinate=/jointset/hip_r/hip_flexion_r range=(-1.5708 0.785398)
      PathPoint P4: femur_r (0.001742469 -0.05521448 0.004138363)
      PathPoint P5: femur_r (-0.02047401 -0.06501586 0.01132605)
    Thelen2003Muscle Ps_L1_TP_r: max_isometric_force=46.32404 optimal_fiber_length=0.197398
        tendon_slack_length=0.06938247 pennation_angle_at_optimal=0.18675
      PathPoint P1: lumbar1 (-0.02411692 0.01520497 0.02346882)
      PathPoint P2: pelvis (-0.02667848 -0.06389383 0.08507968)
      ConditionalPathPoint P3: pelvis (-0.0322832 -0.09023603 0.09146907)
          socket_coordinate=/jointset/hip_r/hip_flexion_r range=(-1.5708 0.785398)
      PathPoint P4: femur_r (0.001742469 -0.05521448 0.004138363)
      PathPoint P5: femur_r (-0.02047401 -0.06501586 0.01132605)
    Thelen2003Muscle Ps_L1_L2_IVD_r: max_isometric_force=91.32454 optimal_fiber_length=0.1805954
        tendon_slack_length=0.06342597 pennation_angle_at_optimal=0.1867502
      PathPoint P1: lumbar1 (-0.001300364 0.003638782 0.02145462)
      PathPoint P2: pelvis (-0.02667848 -0.06389383 0.08507968)
      ConditionalPathPoint P3: pelvis (-0.0322832 -0.09023603 0.09146907)
          socket_coordinate=/jointset/hip_r/hip_flexion_r range=(-1.5708 0.785398)
      PathPoint P4: femur_r (0.001742469 -0.05521448 0.004138363)
      PathPoint P5: femur_r (-0.02047401 -0.06501586 0.01132605)
    Thelen2003Muscle Ps_L2_TP_r: max_isometric_force=160.4797 optimal_fiber_length=0.1741283
        tendon_slack_length=0.06116844 pennation_angle_at_optimal=0.1867502
      PathPoint P1: lumbar2 (-0.02242759 0.0151309 0.0230786)
      PathPoint P2: pelvis (-0.02667848 -0.06389383 0.08507968)
      ConditionalPathPoint P3: pelvis (-0.0322832 -0.09023603 0.09146907)
          socket_coordinate=/jointset/hip_r/hip_flexion_r range=(-1.5708 0.785398)
      PathPoint P4: femur_r (0.001742469 -0.05521448 0.004138363)
      PathPoint P5: femur_r (-0.02047401 -0.06501586 0.01132605)
    Thelen2003Muscle Ps_L2_L3_IVD_r: max_isometric_force=90.5635 optimal_fiber_length=0.1573646
        tendon_slack_length=0.05529618 pennation_angle_at_optimal=0.1867502
      PathPoint P1: lumbar2 (0.002035696 0.003511413 0.02224762)
      PathPoint P2: pelvis (-0.02667848 -0.06389383 0.08507968)
      ConditionalPathPoint P3: pelvis (-0.0322832 -0.09023603 0.09146907)
          socket_coordinate=/jointset/hip_r/hip_flexion_r range=(-1.5708 0.785398)
      PathPoint P4: femur_r (0.001742469 -0.05521448 0.004138363)
      PathPoint P5: femur_r (-0.02047401 -0.06501586 0.01132605)
    Thelen2003Muscle Ps_L3_TP_r: max_isometric_force=76.86482 optimal_fiber_length=0.1526899
        tendon_slack_length=0.05367148 pennation_angle_at_optimal=0.1867502
      PathPoint P1: lumbar3 (-0.02542027 0.02150119 0.02931362)
      PathPoint P2: pelvis (-0.02667848 -0.06389383 0.08507968)
      ConditionalPathPoint P3: pelvis (-0.0322832 -0.09023603 0.09146907)
          socket_coordinate=/jointset/hip_r/hip_flexion_r range=(-1.5708 0.785398)
      PathPoint P4: femur_r (0.001742469 -0.05521448 0.004138363)
      PathPoint P5: femur_r (-0.02047401 -0.06501586 0.01132605)
    Thelen2003Muscle Ps_L3_L4_IVD_r: max_isometric_force=27.39736 optimal_fiber_length=0.1357533
        tendon_slack_length=0.04770601 pennation_angle_at_optimal=0.1867502
      PathPoint P1: lumbar3 (0.001194882 0.006442205 0.02194204)
      PathPoint P2: pelvis (-0.02667848 -0.06389383 0.08507968)
      ConditionalPathPoint P3: pelvis (-0.0322832 -0.09023603 0.09146907)
          socket_coordinate=/jointset/hip_r/hip_flexion_r range=(-1.5708 0.785398)
      PathPoint P4: femur_r (0.001742469 -0.05521448 0.004138363)
      PathPoint P5: femur_r (-0.02047401 -0.06501586 0.01132605)
    Thelen2003Muscle Ps_L4_TP_r: max_isometric_force=122.4278 optimal_fiber_length=0.131647
        tendon_slack_length=0.04626922 pennation_angle_at_optimal=0.1867502
      PathPoint P1: lumbar4 (-0.0162325 0.02587657 0.02684166)
      PathPoint P2: pelvis (-0.02667848 -0.06389383 0.08507968)
      ConditionalPathPoint P3: pelvis (-0.0322832 -0.09023603 0.09146907)
          socket_coordinate=/jointset/hip_r/hip_flexion_r range=(-1.5708 0.785398)
      PathPoint P4: femur_r (0.001742469 -0.05521448 0.004138363)
      PathPoint P5: femur_r (-0.02047401 -0.06501586 0.01132605)
    Thelen2003Muscle Ps_L4_L5_IVD_r: max_isometric_force=60.12199 optimal_fiber_length=0.1105633
        tendon_slack_length=0.0388855 pennation_angle_at_optimal=0.1867502
      PathPoint P1: lumbar4 (0.005621711 0.004094731 0.02136458)
      PathPoint P2: pelvis (-0.02667848 -0.06389383 0.08507968)
      ConditionalPathPoint P3: pelvis (-0.0322832 -0.09023603 0.09146907)
          socket_coordinate=/jointset/hip_r/hip_flexion_r range=(-1.5708 0.785398)
      PathPoint P4: femur_r (0.001742469 -0.05521448 0.004138363)
      PathPoint P5: femur_r (-0.02047401 -0.06501586 0.01132605)
    Thelen2003Muscle Ps_L5_TP_r: max_isometric_force=131.6595 optimal_fiber_length=0.1145954
        tendon_slack_length=0.0402303 pennation_angle_at_optimal=0.1867502
      PathPoint P1: lumbar5 (-0.005829563 0.03022633 0.02623101)
      PathPoint P2: pelvis (-0.02667848 -0.06389383 0.08507968)
      ConditionalPathPoint P3: pelvis (-0.0322832 -0.09023603 0.09146907)
          socket_coordinate=/jointset/hip_r/hip_flexion_r range=(-1.5708 0.785398)
      PathPoint P4: femur_r (0.001742469 -0.05521448 0.004138363)
      PathPoint P5: femur_r (-0.02047401 -0.06501586 0.01132605)
    Thelen2003Muscle Ps_L5_VB_r: max_isometric_force=145.3582 optimal_fiber_length=0.1005988
        tendon_slack_length=0.0353154 pennation_angle_at_optimal=0.1867502
      PathPoint P1: lumbar5 (0.01037287 0.01287273 0.01970845)
      PathPoint P2: pelvis (-0.02667848 -0.06389383 0.08507968)
      ConditionalPathPoint P3: pelvis (-0.0322832 -0.09023603 0.09146907)
          socket_coordinate=/jointset/hip_r/hip_flexion_r range=(-1.5708 0.785398)
      PathPoint P4: femur_r (0.001742469 -0.05521448 0.004138363)
      PathPoint P5: femur_r (-0.02047401 -0.06501586 0.01132605)
    Thelen2003Muscle Ps_L1_VB_l: max_isometric_force=160.4797 optimal_fiber_length=0.1997563
        tendon_slack_length=0.07020223 pennation_angle_at_optimal=0.18675
      PathPoint P1: lumbar1 (-0.01053832 0.02413767 -0.02074574)
      PathPoint P2: pelvis (-0.02667848 -0.06389383 -0.08507968)
      ConditionalPathPoint P3: pelvis (-0.0322832 -0.09023603 -0.09146907)
          socket_coordinate=/jointset/hip_l/hip_flexion_l range=(-1.5708 0.785398)
      PathPoint P4: femur_l (0.001742469 -0.05521448 -0.004138363)
      PathPoint P5: femur_l (-0.02047401 -0.06501586 -0.01132605)
    Thelen2003Muscle Ps_L1_TP_l: max_isometric_force=46.32404 optimal_fiber_length=0.197398
        tendon_slack_length=0.06938247 pennation_angle_at_optimal=0.18675
      PathPoint P1: lumbar1 (-0.02411692 0.01520497 -0.0234738)
      PathPoint P2: pelvis (-0.02667848 -0.06389383 -0.08507968)
      ConditionalPathPoint P3: pelvis (-0.0322832 -0.09023603 -0.09146907)
          socket_coordinate=/jointset/hip_l/hip_flexion_l range=(-1.5708 0.785398)
      PathPoint P4: femur_l (0.001742469 -0.05521448 -0.004138363)
      PathPoint P5: femur_l (-0.02047401 -0.06501586 -0.01132605)
    Thelen2003Muscle Ps_L1_L2_IVD_l: max_isometric_force=91.32454 optimal_fiber_length=0.1805954
        tendon_slack_length=0.06342597 pennation_angle_at_optimal=0.1867502
      PathPoint P1: lumbar1 (-0.001300364 0.003638782 -0.02145109)
      PathPoint P2: pelvis (-0.02667848 -0.06389383 -0.08507968)
      ConditionalPathPoint P3: pelvis (-0.0322832 -0.09023603 -0.09146907)
          socket_coordinate=/jointset/hip_l/hip_flexion_l range=(-1.5708 0.785398)
      PathPoint P4: femur_l (0.001742469 -0.05521448 -0.004138363)
      PathPoint P5: femur_l (-0.02047401 -0.06501586 -0.01132605)
    Thelen2003Muscle Ps_L2_TP_l: max_isometric_force=160.4797 optimal_fiber_length=0.1741283
        tendon_slack_length=0.06116844 pennation_angle_at_optimal=0.1867502
      PathPoint P1: lumbar2 (-0.02242759 0.0151309 -0.02307963)
      PathPoint P2: pelvis (-0.02667848 -0.06389383 -0.08507968)
      ConditionalPathPoint P3: pelvis (-0.0322832 -0.09023603 -0.09146907)
          socket_coordinate=/jointset/hip_l/hip_flexion_l range=(-1.5708 0.785398)
      PathPoint P4: femur_l (0.001742469 -0.05521448 -0.004138363)
      PathPoint P5: femur_l (-0.02047401 -0.06501586 -0.01132605)
    Thelen2003Muscle Ps_L2_L3_IVD_l: max_isometric_force=90.5635 optimal_fiber_length=0.1573646
        tendon_slack_length=0.05529618 pennation_angle_at_optimal=0.1867502
      PathPoint P1: lumbar2 (0.002035696 0.003511413 -0.0222498)
      PathPoint P2: pelvis (-0.02667848 -0.06389383 -0.08507968)
      ConditionalPathPoint P3: pelvis (-0.0322832 -0.09023603 -0.09146907)
          socket_coordinate=/jointset/hip_l/hip_flexion_l range=(-1.5708 0.785398)
      PathPoint P4: femur_l (0.001742469 -0.05521448 -0.004138363)
      PathPoint P5: femur_l (-0.02047401 -0.06501586 -0.01132605)
    Thelen2003Muscle Ps_L3_TP_l: max_isometric_force=76.86482 optimal_fiber_length=0.1526899
        tendon_slack_length=0.05367148 pennation_angle_at_optimal=0.1867502
      PathPoint P1: lumbar3 (-0.02542027 0.02150119 -0.02931373)
      PathPoint P2: pelvis (-0.02667848 -0.06389383 -0.08507968)
      ConditionalPathPoint P3: pelvis (-0.0322832 -0.09023603 -0.09146907)
          socket_coordinate=/jointset/hip_l/hip_flexion_l range=(-1.5708 0.785398)
      PathPoint P4: femur_l (0.001742469 -0.05521448 -0.004138363)
      PathPoint P5: femur_l (-0.02047401 -0.06501586 -0.01132605)
    Thelen2003Muscle Ps_L3_L4_IVD_l: max_isometric_force=27.39736 optimal_fiber_length=0.1357533
        tendon_slack_length=0.04770601 pennation_angle_at_optimal=0.1867502
      PathPoint P1: lumbar3 (0.001194882 0.006442205 -0.02193862)
      PathPoint P2: pelvis (-0.02667848 -0.06389383 -0.08507968)
      ConditionalPathPoint P3: pelvis (-0.0322832 -0.09023603 -0.09146907)
          socket_coordinate=/jointset/hip_l/hip_flexion_l range=(-1.5708 0.785398)
      PathPoint P4: femur_l (0.001742469 -0.05521448 -0.004138363)
      PathPoint P5: femur_l (-0.02047401 -0.06501586 -0.01132605)
    Thelen2003Muscle Ps_L4_TP_l: max_isometric_force=122.4278 optimal_fiber_length=0.131647
        tendon_slack_length=0.04626922 pennation_angle_at_optimal=0.1867502
      PathPoint P1: lumbar4 (-0.0162325 0.02587657 -0.02684498)
      PathPoint P2: pelvis (-0.02667848 -0.06389383 -0.08507968)
      ConditionalPathPoint P3: pelvis (-0.0322832 -0.09023603 -0.09146907)
          socket_coordinate=/jointset/hip_l/hip_flexion_l range=(-1.5708 0.785398)
      PathPoint P4: femur_l (0.001742469 -0.05521448 -0.004138363)
      PathPoint P5: femur_l (-0.02047401 -0.06501586 -0.01132605)
    Thelen2003Muscle Ps_L4_L5_IVD_l: max_isometric_force=60.12199 optimal_fiber_length=0.1105633
        tendon_slack_length=0.03888551 pennation_angle_at_optimal=0.1867502
      PathPoint P1: lumbar4 (0.005621711 0.004094731 -0.02136811)
      PathPoint P2: pelvis (-0.02667848 -0.06389383 -0.08507968)
      ConditionalPathPoint P3: pelvis (-0.0322832 -0.09023603 -0.09146907)
          socket_coordinate=/jointset/hip_l/hip_flexion_l range=(-1.5708 0.785398)
      PathPoint P4: femur_l (0.001742469 -0.05521448 -0.004138363)
      PathPoint P5: femur_l (-0.02047401 -0.06501586 -0.01132605)
    Thelen2003Muscle Ps_L5_TP_l: max_isometric_force=131.6595 optimal_fiber_length=0.1145954
        tendon_slack_length=0.04023031 pennation_angle_at_optimal=0.1867502
      PathPoint P1: lumbar5 (-0.005829563 0.03022633 -0.02623298)
      PathPoint P2: pelvis (-0.02667848 -0.06389383 -0.08507968)
      ConditionalPathPoint P3: pelvis (-0.0322832 -0.09023603 -0.09146907)
          socket_coordinate=/jointset/hip_l/hip_flexion_l range=(-1.5708 0.785398)
      PathPoint P4: femur_l (0.001742469 -0.05521448 -0.004138363)
      PathPoint P5: femur_l (-0.02047401 -0.06501586 -0.01132605)
    Thelen2003Muscle Ps_L5_VB_l: max_isometric_force=145.3582 optimal_fiber_length=0.1005988
        tendon_slack_length=0.0353154 pennation_angle_at_optimal=0.1867502
      PathPoint P1: lumbar5 (0.01037287 0.01287273 -0.01970845)
      PathPoint P2: pelvis (-0.02667848 -0.06389383 -0.08507968)
      ConditionalPathPoint P3: pelvis (-0.0322832 -0.09023603 -0.09146907)
          socket_coordinate=/jointset/hip_l/hip_flexion_l range=(-1.5708 0.785398)
      PathPoint P4: femur_l (0.001742469 -0.05521448 -0.004138363)
      PathPoint P5: femur_l (-0.02047401 -0.06501586 -0.01132605)
    Thelen2003Muscle QL_post_I_1-L3_r: max_isometric_force=18.2 optimal_fiber_length=0.04017777
        tendon_slack_length=0.03370893 pennation_angle_at_optimal=0.1291544
      PathPoint I_1_r-P1: pelvis (-0.1255458 0.08631272 0.06613572)
      PathPoint L3_TP_r-P2: lumbar3 (-0.03008132 0.02036194 0.03142979)
    Thelen2003Muscle QL_post_I_2-L4_r: max_isometric_force=24.2 optimal_fiber_length=0.02434393
        tendon_slack_length=0.02042442 pennation_angle_at_optimal=0.1291544
      PathPoint I_2_r-P1: pelvis (-0.1188201 0.0907965 0.0706195)
      PathPoint L4_TP_r-P2: lumbar4 (-0.02282031 0.02702132 0.03142979)
    Thelen2003Muscle QL_post_I_2-L3_r: max_isometric_force=14.1 optimal_fiber_length=0.05273813
        tendon_slack_length=0.044247 pennation_angle_at_optimal=0.1291544
      PathPoint I_2_r-P1: pelvis (-0.1188201 0.0907965 0.0706195)
      PathPoint L3_TP_r-P2: lumbar3 (-0.03008132 0.02036194 0.03142979)
    Thelen2003Muscle QL_post_I_2-L2_r: max_isometric_force=8.8 optimal_fiber_length=0.03600329
        tendon_slack_length=0.01976966 pennation_angle_at_optimal=0.1291544
      PathPoint I_2_r-P1: pelvis (-0.1188201 0.0907965 0.0706195)
      PathPoint L2_TP_r-P2: lumbar2 (-0.03215589 0.01244744 0.03142979)
    Thelen2003Muscle QL_post_I_3-L1_r: max_isometric_force=12.92 optimal_fiber_length=0.08795539
        tendon_slack_length=0.04568476 pennation_angle_at_optimal=0.1291544
      PathPoint L1_TP-P1: lumbar1 (-0.03319318 0.01452202 0.03319318)
      PathPoint I_3_r-P1: pelvis (-0.1098526 0.09976406 0.07398233)
    Thelen2003Muscle QL_post_I_3-L2_r: max_isometric_force=13.6 optimal_fiber_length=0.05212625
        tendon_slack_length=0.04373364 pennation_angle_at_optimal=0.1291544
      PathPoint L2_TP_r-P2: lumbar2 (-0.03215589 0.01244744 0.03142979)
      PathPoint I_3_r-P1: pelvis (-0.1098526 0.09976406 0.07398233)
    Thelen2003Muscle QL_post_I_3-L3_r: max_isometric_force=23.2 optimal_fiber_length=0.03798159
        tendon_slack_length=0.03186631 pennation_angle_at_optimal=0.1291544
      PathPoint L3_TP_r-P2: lumbar3 (-0.03008132 0.02036194 0.03142979)
      PathPoint I_3_r-P1: pelvis (-0.1098526 0.09976406 0.07398233)
    Thelen2003Muscle QL_post_I_1-L3_l: max_isometric_force=18.2 optimal_fiber_length=0.04011712
        tendon_slack_length=0.03365805 pennation_angle_at_optimal=0.1291544
      PathPoint I.1_l-P1: pelvis (-0.1273135 0.08911452 -0.06523572)
      PathPoint L3_TP_l-P2: lumbar3 (-0.03008132 0.02074574 -0.03142979)
    Thelen2003Muscle QL_post_I_2-L4_l: max_isometric_force=24.2 optimal_fiber_length=0.02434769
        tendon_slack_length=0.02042758 pennation_angle_at_optimal=0.1291544
      PathPoint I_2_l-P1: pelvis (-0.1188201 0.0907965 -0.0706195)
      PathPoint L4_TP_l-P2: lumbar4 (-0.02282031 0.02702132 -0.03111861)
    Thelen2003Muscle QL_post_I_2-L3_l: max_isometric_force=14.1 optimal_fiber_length=0.05273813
        tendon_slack_length=0.044247 pennation_angle_at_optimal=0.1291544
      PathPoint I_2_l-P1: pelvis (-0.1188201 0.0907965 -0.0706195)
      PathPoint L3_TP_l-P2: lumbar3 (-0.03008132 0.02036194 -0.03142979)
    Thelen2003Muscle QL_post_I_2-L2_l: max_isometric_force=8.8 optimal_fiber_length=0.03600329
        tendon_slack_length=0.01976966 pennation_angle_at_optimal=0.1291544
      PathPoint I_2_l-P1: pelvis (-0.1188201 0.0907965 -0.0706195)
      PathPoint L2_TP_l-P2: lumbar2 (-0.03215589 0.01244744 -0.03142979)
    Thelen2003Muscle QL_post_I_3-L1_l: max_isometric_force=12.92 optimal_fiber_length=0.08795395
        tendon_slack_length=0.04568401 pennation_angle_at_optimal=0.1291544
      PathPoint L1_TP_l-P1: lumbar1 (-0.03305781 0.01486245 -0.03319318)
      PathPoint I_3_l-P1: pelvis (-0.1098526 0.09976406 -0.07398233)
    Thelen2003Muscle QL_post_I_3-L2_l: max_isometric_force=13.6 optimal_fiber_length=0.05212625
        tendon_slack_length=0.04373364 pennation_angle_at_optimal=0.1291544
      PathPoint L2_TP_l-P2: lumbar2 (-0.03215589 0.01244744 -0.03142979)
      PathPoint I_3_l-P1: pelvis (-0.1098526 0.09976406 -0.07398233)
    Thelen2003Muscle QL_post_I_3-L3_l: max_isometric_force=23.2 optimal_fiber_length=0.03798159
        tendon_slack_length=0.03186631 pennation_angle_at_optimal=0.1291544
      PathPoint L3_TP_l-P2: lumbar3 (-0.03008132 0.02036194 -0.03142979)
      PathPoint I_3_l-P1: pelvis (-0.1098526 0.09976406 -0.07398233)
    Thelen2003Muscle QL_mid_L3-12_3_r: max_isometric_force=5.8 optimal_fiber_length=0.05667576
        tendon_slack_length=0.02943786 pennation_angle_at_optimal=0.1291544
      PathPoint quadratus_lumb_mid_L3_1_r-P1: torso (-0.04347425 0.1165599 0.05358624)
      PathPoint quadratus_lumb_mid_L3_1_r-P2: lumbar3 (-0.0304564 0.02254097 0.03151277)
    Thelen2003Muscle QL_mid_L3-12_2_r: max_isometric_force=6.6 optimal_fiber_length=0.06009558
        tendon_slack_length=0.03121414 pennation_angle_at_optimal=0.1291544
      PathPoint quadratus_lumb_mid_L3_2_r-P2: torso (-0.04406208 0.1236674 0.04480042)
      PathPoint quadratus_lumb_mid_L3_2_r-P3: lumbar3 (-0.03045474 0.02254024 0.03151277)
    Thelen2003Muscle QL_mid_L3-12_1_r: max_isometric_force=11 optimal_fiber_length=0.06540718
        tendon_slack_length=0.03397303 pennation_angle_at_optimal=0.1291544
      PathPoint quadratus_lumb_mid_L3_3_r-P2: torso (-0.04282387 0.1329802 0.03235298)
      PathPoint quadratus_lumb_mid_L3_3_r-P3: lumbar3 (-0.03045474 0.02254024 0.03151277)
    Thelen2003Muscle QL_mid_L2-12_1_r: max_isometric_force=9.2 optimal_fiber_length=0.04229831
        tendon_slack_length=0.02197009 pennation_angle_at_optimal=0.1291544
      PathPoint QL_mid_L2-12_1_l-P1: torso (-0.0428192 0.1329802 0.03235298)
      PathPoint QL_mid_L2-12_1_l-P1_0: lumbar2 (-0.03020725 0.0175259 0.02657529)
    Thelen2003Muscle QL_mid_L4-12_3_r: max_isometric_force=5.4 optimal_fiber_length=0.07560419
        tendon_slack_length=0.03926944 pennation_angle_at_optimal=0.1291544
      PathPoint quadratus_lumb_mid_L4_1_r-P1: torso (-0.04334044 0.1165039 0.05359661)
      PathPoint quadratus_lumb_mid_L4_1_r-P2: lumbar4 (-0.02217979 0.03184471 0.02910627)
    Thelen2003Muscle QL_mid_L3-12_3_l: max_isometric_force=5.8 optimal_fiber_length=0.05667576
        tendon_slack_length=0.02943786 pennation_angle_at_optimal=0.1291544
      PathPoint quadratus_lumb_mid_L3_1_r-P1: torso (-0.04347425 0.1165599 -0.05358624)
      PathPoint quadratus_lumb_mid_L3_1_r-P2: lumbar3 (-0.0304564 0.02254097 -0.03151277)
    Thelen2003Muscle QL_mid_L3-12_2_l: max_isometric_force=6.6 optimal_fiber_length=0.06009558
        tendon_slack_length=0.03121414 pennation_angle_at_optimal=0.1291544
      PathPoint quadratus_lumb_mid_L3_2_r-P2: torso (-0.04406208 0.1236674 -0.04480042)
      PathPoint quadratus_lumb_mid_L3_2_r-P3: lumbar3 (-0.03045474 0.02254024 -0.03151277)
    Thelen2003Muscle QL_mid_L3-12_1_l: max_isometric_force=11 optimal_fiber_length=0.06540718
        tendon_slack_length=0.03397303 pennation_angle_at_optimal=0.1291544
      PathPoint quadratus_lumb_mid_L3_3_r-P2: torso (-0.04282387 0.1329802 -0.03235298)
      PathPoint quadratus_lumb_mid_L3_3_r-P3: lumbar3 (-0.03045474 0.02254024 -0.03151277)
    Thelen2003Muscle QL_mid_L2-12_1_l: max_isometric_force=9.2 optimal_fiber_length=0.04229831
        tendon_slack_length=0.02197009 pennation_angle_at_optimal=0.1291544
      PathPoint P1: torso (-0.0428192 0.1329802 -0.03235298)
      PathPoint P1_0: lumbar2 (-0.03020725 0.0175259 -0.02657529)
    Thelen2003Muscle QL_mid_L4-12_3_l: max_isometric_force=5.4 optimal_fiber_length=0.07560419
        tendon_slack_length=0.03926944 pennation_angle_at_optimal=0.1291544
      PathPoint quadratus_lumb_mid_L4_1_r-P1: torso (-0.04334044 0.1165039 -0.05359661)
      PathPoint quadratus_lumb_mid_L4_1_r-P2: lumbar4 (-0.02217979 0.03184471 -0.02910627)
    Thelen2003Muscle QL_ant_I_2-T12_r: max_isometric_force=7.1 optimal_fiber_length=0.1080593
        tendon_slack_length=0.05612626 pennation_angle_at_optimal=0.1291544
      PathPoint I_2_r-P1: pelvis (-0.1188201 0.0907965 0.0706195)
      PathPoint T12_r-P2: torso (-0.0147303 0.1348473 0.02074574)
    Thelen2003Muscle QL_ant_I_3-T12_r: max_isometric_force=13.34 optimal_fiber_length=0.1065788
        tendon_slack_length=0.05535791 pennation_angle_at_optimal=0.1291544
      PathPoint I_3_r-P1: pelvis (-0.1098526 0.09976406 0.07398233)
      PathPoint T12_r-P2: torso (-0.01037287 0.1358846 0.01970845)
    Thelen2003Muscle QL_ant_I_2-12_1_r: max_isometric_force=4.7 optimal_fiber_length=0.1024243
        tendon_slack_length=0.05320001 pennation_angle_at_optimal=0.1291544
      PathPoint I_2_r-P2: pelvis (-0.1188201 0.0907965 0.0706195)
      PathPoint 12.1_r-P3: torso (-0.04252876 0.1223998 0.04460334)
    Thelen2003Muscle QL_ant_I_3-12_1_r: max_isometric_force=8.9 optimal_fiber_length=0.1011086
        tendon_slack_length=0.05251664 pennation_angle_at_optimal=0.1291544
      PathPoint I_3_r-P1: pelvis (-0.1098526 0.09976406 0.07398233)
      PathPoint 12.1_r-P2: torso (-0.04178264 0.1290395 0.03884639)
    Thelen2003Muscle QL_ant_I_3-12_2_r: max_isometric_force=5.9 optimal_fiber_length=0.09485736
        tendon_slack_length=0.0492697 pennation_angle_at_optimal=0.1291544
      PathPoint I_3_r-P1: pelvis (-0.1098526 0.09976406 0.07398233)
      PathPoint 12.2_r-P2: torso (-0.04174042 0.1222546 0.04779818)
    Thelen2003Muscle QL_ant_I_3-12_3_r: max_isometric_force=6.8 optimal_fiber_length=0.08845602
        tendon_slack_length=0.04589774 pennation_angle_at_optimal=0.1291544
      PathPoint I_3_r-P2: pelvis (-0.1098526 0.09976406 0.07398233)
      PathPoint 12.3_r-P3: torso (-0.03942727 0.1155112 0.05655288)
    Thelen2003Muscle QL_ant_I_2-T12_l: max_isometric_force=7.1 optimal_fiber_length=0.1081093
        tendon_slack_length=0.05615223 pennation_angle_at_optimal=0.1291544
      PathPoint I_2_l-P1: pelvis (-0.1188201 0.0907965 -0.0706195)
      PathPoint T12_l-P2: torso (-0.01037287 0.1358846 -0.01970845)
    Thelen2003Muscle QL_ant_I_3-T12_l: max_isometric_force=13.34 optimal_fiber_length=0.1065788
        tendon_slack_length=0.05535791 pennation_angle_at_optimal=0.1291544
      PathPoint I_3_l-P1: pelvis (-0.1098526 0.09976406 -0.07398233)
      PathPoint T12_l-P2: torso (-0.01037287 0.1358846 -0.01970845)
    Thelen2003Muscle QL_ant_I_2-12_1_l: max_isometric_force=4.7 optimal_fiber_length=0.1024243
        tendon_slack_length=0.05320001 pennation_angle_at_optimal=0.1291544
      PathPoint I_2_l-P2: pelvis (-0.1188201 0.0907965 -0.0706195)
      PathPoint 12.1_l-P3: torso (-0.04252876 0.1223998 -0.04460334)
    Thelen2003Muscle QL_ant_I_3-12_1_l: max_isometric_force=8.9 optimal_fiber_length=0.1011231
        tendon_slack_length=0.05252416 pennation_angle_at_optimal=0.1291544
      PathPoint I_3_l-P1: pelvis (-0.1098526 0.09976406 -0.07398233)
      PathPoint 12.1_l-P2: torso (-0.04149147 0.1286236 -0.03837961)
    Thelen2003Muscle QL_ant_I_3-12_2_l: max_isometric_force=5.9 optimal_fiber_length=0.09485736
        tendon_slack_length=0.0492697 pennation_angle_at_optimal=0.1291544
      PathPoint I_3_l-P1: pelvis (-0.1098526 0.09976406 -0.07398233)
      PathPoint 12.2_l-P2: torso (-0.04174042 0.1222546 -0.04779818)
    Thelen2003Muscle QL_ant_I_3-12_3_l: max_isometric_force=6.8 optimal_fiber_length=0.08843518
        tendon_slack_length=0.04588692 pennation_angle_at_optimal=0.1291544
      PathPoint I_3_l-P2: pelvis (-0.1098526 0.09976406 -0.07398233)
      PathPoint 12.3_l-P3: torso (-0.0394169 0.1151388 -0.05705078)
    Thelen2003Muscle MF_m1s_r: max_isometric_force=18.4 optimal_fiber_length=0.04859309 tendon_slack_length=0.02020262
        pennation_angle_at_optimal=0
      PathPoint P1: lumbar4 (-0.03423047 0.03360301 0.01812597)
      PathPoint P2: lumbar1 (-0.03837961 -0.01348473 0.003111861)
    Thelen2003Muscle MF_m1t_1_r: max_isometric_force=19.32 optimal_fiber_length=0.0779715
        tendon_slack_length=0.02338003 pennation_angle_at_optimal=0
      PathPoint P1: lumbar5 (-0.02074574 0.04045419 0.01825065)
      PathPoint P2: lumbar1 (-0.04564062 -0.01660136 0.003211814)
    Thelen2003Muscle MF_m1t_2_r: max_isometric_force=16.56 optimal_fiber_length=0.09672528
        tendon_slack_length=0.02900339 pennation_angle_at_optimal=0
      PathPoint P1: sacrum (-0.1361096 0.0941331 0.02353983)
      PathPoint P2: lumbar1 (-0.04564062 -0.01659659 0.003215589)
    Thelen2003Muscle MF_m1t_3_r: max_isometric_force=27.66 optimal_fiber_length=0.1079513
        tendon_slack_length=0.03236827 pennation_angle_at_optimal=0
      PathPoint P1: pelvis (-0.1481126 0.06088937 0.05380545)
      PathPoint P2: lumbar1 (-0.04564062 -0.01659659 0.003215589)
    Thelen2003Muscle MF_m2s_r: max_isometric_force=17.94 optimal_fiber_length=0.04709013 tendon_slack_length=0.01822066
        pennation_angle_at_optimal=0
      PathPoint P1: lumbar5 (-0.02074574 0.04149147 0.01640189)
      PathPoint P2: lumbar2 (-0.04252876 -0.01219756 0.004149147)
    Thelen2003Muscle MF_m2t_1_r: max_isometric_force=17.94 optimal_fiber_length=0.06521358
        tendon_slack_length=0.01982609 pennation_angle_at_optimal=0
      PathPoint P1: sacrum (-0.135363 0.09552476 0.02290695)
      PathPoint P2: lumbar2 (-0.04667791 -0.01907571 0.004149147)
    Thelen2003Muscle MF_m2t_2_r: max_isometric_force=45.54 optimal_fiber_length=0.08588794
        tendon_slack_length=0.02611153 pennation_angle_at_optimal=0
      PathPoint P1: pelvis (-0.1502066 0.05492628 0.05268439)
      PathPoint P2: lumbar2 (-0.04667791 -0.01907571 0.003775724)
    Thelen2003Muscle MF_m2t_3_r: max_isometric_force=45.54 optimal_fiber_length=0.09782041
        tendon_slack_length=0.02973919 pennation_angle_at_optimal=0
      PathPoint P1: pelvis (-0.1535694 0.040354 0.0504425)
      PathPoint P2: lumbar2 (-0.04564062 -0.01943699 0.002453536)
    Thelen2003Muscle MF_m3s_r: max_isometric_force=24.84 optimal_fiber_length=0.04058215 tendon_slack_length=0.01687205
        pennation_angle_at_optimal=0
      PathPoint P1: sacrum (-0.1367552 0.09415933 0.02129794)
      PathPoint P2: lumbar3 (-0.04356605 -0.006693903 0.003015735)
    Thelen2003Muscle MF_m3t_1_r: max_isometric_force=24 optimal_fiber_length=0.1119906 tendon_slack_length=0.03728978
        pennation_angle_at_optimal=0
      PathPoint P1: pelvis (-0.1725077 0.002341205 0.01834)
      PathPoint P2: lumbar3 (-0.04978977 -0.01060647 0.001724116)
    Thelen2003Muscle MF_m3t_2_r: max_isometric_force=24 optimal_fiber_length=0.09242269 tendon_slack_length=0.03077419
        pennation_angle_at_optimal=0
      PathPoint P1: pelvis (-0.1648382 0.02390616 0.02478644)
      PathPoint P2: lumbar3 (-0.04978977 -0.01061144 0.002759183)
    Thelen2003Muscle MF_m3t_3_r: max_isometric_force=24 optimal_fiber_length=0.09242488 tendon_slack_length=0.03077492
        pennation_angle_at_optimal=0
      PathPoint P1: pelvis (-0.1647788 0.02353983 0.02466078)
      PathPoint P2: lumbar3 (-0.04978977 -0.01061144 0.002759183)
    Thelen2003Muscle MF_m4s_r: max_isometric_force=24 optimal_fiber_length=0.04064526 tendon_slack_length=0.02571848
        pennation_angle_at_optimal=0
      PathPoint P1: sacrum (-0.1610674 0.06132676 0.020177)
      PathPoint P2: lumbar4 (-0.03734233 -0.0002232449 0.002326468)
    Thelen2003Muscle MF_m4t_1_r: max_isometric_force=21.4 optimal_fiber_length=0.0601891 tendon_slack_length=0.0243981
        pennation_angle_at_optimal=0
      PathPoint P1: sacrum (-0.1706447 0.0465489 0.01721625)
      PathPoint P2: lumbar4 (-0.04460334 0.000174482 0.002987573)
    Thelen2003Muscle MF_m4t_2_r: max_isometric_force=21.4 optimal_fiber_length=0.08098992
        tendon_slack_length=0.03282973 pennation_angle_at_optimal=0
      PathPoint P1: pelvis (-0.1692626 0.008967556 0.01793511)
      PathPoint P2: lumbar4 (-0.04564062 0.0001763388 0.002987386)
    Thelen2003Muscle MF_m4t_3_r: max_isometric_force=21.4 optimal_fiber_length=0.09392488 tendon_slack_length=0.0380731
        pennation_angle_at_optimal=0
      PathPoint P1: pelvis (-0.1793511 -0.004483778 0.01569322)
      PathPoint P2: lumbar4 (-0.04667791 0.0001763388 0.002987386)
    Thelen2003Muscle MF_m5s_r: max_isometric_force=10.35 optimal_fiber_length=0.01575446 tendon_slack_length=0.00697219
        pennation_angle_at_optimal=0
      PathPoint P1: sacrum (-0.1462328 0.07428533 0.01345133)
      PathPoint P2: lumbar5 (-0.03215589 0.01763388 0.004075853)
    Thelen2003Muscle MF_m5t_1_r: max_isometric_force=10.35 optimal_fiber_length=0.08519512
        tendon_slack_length=0.0345345 pennation_angle_at_optimal=0
      PathPoint P1: sacrum (-0.1951194 0.005861665 0.01124655)
      PathPoint P2: lumbar5 (-0.03683406 0.01749177 0.003035018)
    Thelen2003Muscle MF_m5t_2_r: max_isometric_force=10.35 optimal_fiber_length=0.06378655
        tendon_slack_length=0.02585714 pennation_angle_at_optimal=0
      PathPoint P1: sacrum (-0.182844 0.02876545 0.01312402)
      PathPoint P2: lumbar5 (-0.03583992 0.01652263 0.002874809)
    Thelen2003Muscle MF_m5t_3_r: max_isometric_force=10.35 optimal_fiber_length=0.04532369
        tendon_slack_length=0.007972921 pennation_angle_at_optimal=0
      PathPoint P1: sacrum (-0.1706929 0.04773475 0.01299926)
      PathPoint P2: lumbar5 (-0.03404666 0.01581551 0.002407366)
    Thelen2003Muscle MF_m1_laminar_r: max_isometric_force=8.85 optimal_fiber_length=0.03245671
        tendon_slack_length=0.01232494 pennation_angle_at_optimal=0
      PathPoint P1: lumbar3 (-0.04149147 0.02593217 0.01867116)
      PathPoint P2: lumbar1 (-0.03630504 -0.005814252 0.008298295)
    Thelen2003Muscle MF_m2_laminar_r: max_isometric_force=10.2 optimal_fiber_length=0.02792557
        tendon_slack_length=0.0106036 pennation_angle_at_optimal=0
      PathPoint P1: lumbar4 (-0.03423047 0.03526775 0.01757164)
      PathPoint P2: lumbar2 (-0.03734233 -0.006223721 0.007261008)
    Thelen2003Muscle MF_m3_laminar_r: max_isometric_force=10.615 optimal_fiber_length=0.02713542
        tendon_slack_length=0.01030337 pennation_angle_at_optimal=0
      PathPoint P1: lumbar5 (-0.02282031 0.04045419 0.01659659)
      PathPoint P2: lumbar3 (-0.0394169 0.0007161947 0.006586772)
    Thelen2003Muscle MF_m4_laminar_r: max_isometric_force=7.7 optimal_fiber_length=0.0300794
        tendon_slack_length=0.01142096 pennation_angle_at_optimal=0
      PathPoint P1: sacrum (-0.1434809 0.08685963 0.020177)
      PathPoint P2: lumbar4 (-0.03526775 0.006030205 0.007198771)
    Thelen2003Muscle MF_m5_laminar_r: max_isometric_force=16.6 optimal_fiber_length=0.0291108
        tendon_slack_length=0.01105302 pennation_angle_at_optimal=0
      PathPoint P1: pelvis (-0.1546903 0.0504425 0.01345133)
      PathPoint MF_m5_laminar_-P2: lumbar5 (-0.03008132 0.01867116 0.005850298)
    Thelen2003Muscle MF_m1s_l: max_isometric_force=18.4 optimal_fiber_length=0.04859309 tendon_slack_length=0.02020262
        pennation_angle_at_optimal=0
      PathPoint P1: lumbar4 (-0.03423047 0.03319318 -0.01763388)
      PathPoint P2: lumbar1 (-0.03837961 -0.01348473 -0.003111861)
    Thelen2003Muscle MF_m1t_1_l: max_isometric_force=19.32 optimal_fiber_length=0.0779715
        tendon_slack_length=0.02338003 pennation_angle_at_optimal=0
      PathPoint P1: lumbar5 (-0.01932953 0.03834818 -0.01824588)
      PathPoint P2: lumbar1 (-0.04564062 -0.01660136 -0.003215589)
    Thelen2003Muscle MF_m1t_2_l: max_isometric_force=16.56 optimal_fiber_length=0.09672528
        tendon_slack_length=0.02900339 pennation_angle_at_optimal=0
      PathPoint P1: sacrum (-0.1361096 0.0941331 -0.02353983)
      PathPoint P2: lumbar1 (-0.04564062 -0.01659659 -0.003215589)
    Thelen2003Muscle MF_m1t_3_l: max_isometric_force=27.66 optimal_fiber_length=0.1079634
        tendon_slack_length=0.03237192 pennation_angle_at_optimal=0
      PathPoint P1: pelvis (-0.1479647 0.060531 -0.05380533)
      PathPoint P2: lumbar1 (-0.04564062 -0.01659659 -0.003215589)
    Thelen2003Muscle MF_m2s_l: max_isometric_force=17.94 optimal_fiber_length=0.04709013 tendon_slack_length=0.01822066
        pennation_angle_at_optimal=0
      PathPoint P1: lumbar5 (-0.02074574 0.04149147 -0.01639951)
      PathPoint P2: lumbar2 (-0.04252876 -0.01244744 -0.004149147)
    Thelen2003Muscle MF_m2t_1_l: max_isometric_force=17.94 optimal_fiber_length=0.06529928
        tendon_slack_length=0.01985214 pennation_angle_at_optimal=0
      PathPoint P1: sacrum (-0.135363 0.09552476 -0.02466078)
      PathPoint P2: lumbar2 (-0.04667791 -0.01907571 -0.003775724)
    Thelen2003Muscle MF_m2t_2_l: max_isometric_force=45.54 optimal_fiber_length=0.08588794
        tendon_slack_length=0.02611153 pennation_angle_at_optimal=0
      PathPoint P1: pelvis (-0.1502066 0.05492628 -0.05268439)
      PathPoint P2: lumbar2 (-0.04667791 -0.01907571 -0.003775724)
    Thelen2003Muscle MF_m2t_3_l: max_isometric_force=45.54 optimal_fiber_length=0.09780865
        tendon_slack_length=0.02973561 pennation_angle_at_optimal=0
      PathPoint P1: pelvis (-0.1535694 0.040354 -0.0504425)
      PathPoint P2: lumbar2 (-0.04564062 -0.01943699 -0.003775724)
    Thelen2003Muscle MF_m3s_l: max_isometric_force=24.84 optimal_fiber_length=0.04077355 tendon_slack_length=0.01695162
        pennation_angle_at_optimal=0
      PathPoint P1: sacrum (-0.1362071 0.09375109 -0.02129794)
      PathPoint P2: lumbar3 (-0.03734233 -0.006223721 -0.003111861)
    Thelen2003Muscle MF_m3t_1_l: max_isometric_force=24 optimal_fiber_length=0.1119946 tendon_slack_length=0.0372911
        pennation_angle_at_optimal=0
      PathPoint P1: pelvis (-0.1726254 0.002241889 -0.01793511)
      PathPoint P2: lumbar3 (-0.04978977 -0.01060647 -0.003018505)
    Thelen2003Muscle MF_m3t_2_l: max_isometric_force=24 optimal_fiber_length=0.0924223 tendon_slack_length=0.03077406
        pennation_angle_at_optimal=0
      PathPoint P1: pelvis (-0.1647788 0.02353983 -0.02449264)
      PathPoint P2: lumbar3 (-0.04978977 -0.01061144 -0.002759183)
    Thelen2003Muscle MF_m3t_3_l: max_isometric_force=24 optimal_fiber_length=0.0924223 tendon_slack_length=0.03077406
        pennation_angle_at_optimal=0
      PathPoint P1: pelvis (-0.1647788 0.02353983 -0.02449264)
      PathPoint P2: lumbar3 (-0.04978977 -0.01061144 -0.002759183)
    Thelen2003Muscle MF_m4s_l: max_isometric_force=24 optimal_fiber_length=0.04064426 tendon_slack_length=0.02571784
        pennation_angle_at_optimal=0
      PathPoint P1: sacrum (-0.1610674 0.06132676 -0.020177)
      PathPoint P2: lumbar4 (-0.03734233 -0.0002232449 -0.002074574)
    Thelen2003Muscle MF_m4t_1_l: max_isometric_force=21.4 optimal_fiber_length=0.06018435
        tendon_slack_length=0.02439618 pennation_angle_at_optimal=0
      PathPoint P1: sacrum (-0.1703836 0.04707967 -0.01681417)
      PathPoint P2: lumbar4 (-0.04460334 0 -0.003111861)
    Thelen2003Muscle MF_m4t_2_l: max_isometric_force=21.4 optimal_fiber_length=0.08098992
        tendon_slack_length=0.03282973 pennation_angle_at_optimal=0
      PathPoint P1: pelvis (-0.1692626 0.008967556 -0.01793511)
      PathPoint P2: lumbar4 (-0.04564062 0.0001763388 -0.002987386)
    Thelen2003Muscle MF_m4t_3_l: max_isometric_force=21.4 optimal_fiber_length=0.09393059
        tendon_slack_length=0.03807542 pennation_angle_at_optimal=0
      PathPoint P1: pelvis (-0.1793511 -0.004483778 -0.01569322)
      PathPoint P2: lumbar4 (-0.04574435 0.0001763388 -0.003111861)
    Thelen2003Muscle MF_m5s_l: max_isometric_force=10.35 optimal_fiber_length=0.01575398
        tendon_slack_length=0.006971974 pennation_angle_at_optimal=0
      PathPoint P1: sacrum (-0.1462328 0.07428533 -0.01345133)
      PathPoint P2: lumbar5 (-0.03215589 0.01763388 -0.004149147)
    Thelen2003Muscle MF_m5t_1_l: max_isometric_force=10.35 optimal_fiber_length=0.08519513
        tendon_slack_length=0.03453451 pennation_angle_at_optimal=0
      PathPoint P1: sacrum (-0.1951194 0.005861665 -0.01124307)
      PathPoint P2: lumbar5 (-0.03683406 0.01749177 -0.003039251)
    Thelen2003Muscle MF_m5t_2_l: max_isometric_force=10.35 optimal_fiber_length=0.06378763
        tendon_slack_length=0.02585757 pennation_angle_at_optimal=0
      PathPoint P1: sacrum (-0.182844 0.02876545 -0.01312626)
      PathPoint P2: lumbar5 (-0.03583992 0.01652263 -0.003039251)
    Thelen2003Muscle MF_m5t_3_l: max_isometric_force=10.35 optimal_fiber_length=0.04532833
        tendon_slack_length=0.007973737 pennation_angle_at_optimal=0
      PathPoint P1: sacrum (-0.1706929 0.04773475 -0.01300296)
      PathPoint P2: lumbar5 (-0.03404666 0.01581551 -0.002873285)
    Thelen2003Muscle MF_m1_laminar_l: max_isometric_force=8.85 optimal_fiber_length=0.03245671
        tendon_slack_length=0.01232494 pennation_angle_at_optimal=0
      PathPoint P1: lumbar3 (-0.04149147 0.02621224 -0.01867116)
      PathPoint P2: lumbar1 (-0.03630504 -0.005814252 -0.008298295)
    Thelen2003Muscle MF_m2_laminar_l: max_isometric_force=10.2 optimal_fiber_length=0.02792557
        tendon_slack_length=0.0106036 pennation_angle_at_optimal=0
      PathPoint P1: lumbar4 (-0.03423047 0.03475295 -0.01757164)
      PathPoint P2: lumbar2 (-0.03734233 -0.006223721 -0.007261008)
    Thelen2003Muscle MF_m3_laminar_l: max_isometric_force=10.615 optimal_fiber_length=0.02713542
        tendon_slack_length=0.01030337 pennation_angle_at_optimal=0
      PathPoint P1: lumbar5 (-0.02282031 0.04045419 -0.01677293)
      PathPoint P2: lumbar3 (-0.0394169 0.001037287 -0.006223721)
    Thelen2003Muscle MF_m4_laminar_l: max_isometric_force=7.7 optimal_fiber_length=0.0300794
        tendon_slack_length=0.01142096 pennation_angle_at_optimal=0
      PathPoint P1: sacrum (-0.1434809 0.08685963 -0.020177)
      PathPoint P2: lumbar4 (-0.03526775 0.006030205 -0.007198771)
    Thelen2003Muscle MF_m5_laminar_l: max_isometric_force=16.6 optimal_fiber_length=0.02911307
        tendon_slack_length=0.01105389 pennation_angle_at_optimal=0
      PathPoint P1: pelvis (-0.1546903 0.0504425 -0.01387729)
      PathPoint P2: lumbar5 (-0.03008132 0.01867116 -0.005850298)
    Thelen2003Muscle IL_L1_r: max_isometric_force=97.275 optimal_fiber_length=0.05420621 tendon_slack_length=0.1146435
        pennation_angle_at_optimal=0.2408554
      PathPoint P1: pelvis (-0.1614082 0.04371695 0.05639707)
      PathPoint P2: lumbar1 (-0.03215589 0.01763388 0.03008132)
      PathWrap: wrap_object=Cylinder2 method=hybrid
    Thelen2003Muscle IL_L2_r: max_isometric_force=138.1305 optimal_fiber_length=0.0391608
        tendon_slack_length=0.08294396 pennation_angle_at_optimal=0.2408554
      PathPoint P1: pelvis (-0.1524484 0.06277289 0.06165195)
      PathPoint P2: lumbar2 (-0.03365996 0.01339449 0.03215589)
      PathWrap: wrap_object=Cylinder method=hybrid
    Thelen2003Muscle IL_L3_r: max_isometric_force=163.422 optimal_fiber_length=0.02653208
        tendon_slack_length=0.05619587 pennation_angle_at_optimal=0.2408554
      PathPoint P1: pelvis (-0.1367552 0.07622422 0.06725667)
      PathPoint P2: lumbar3 (-0.03286923 0.02275195 0.03229997)
      PathWrap: wrap_object=Cylinder method=hybrid
    Thelen2003Muscle IL_L4_r: max_isometric_force=169.2585 optimal_fiber_length=0.01795306
        tendon_slack_length=0.0380259 pennation_angle_at_optimal=0.2408554
      PathPoint P1: pelvis (-0.1311505 0.07286139 0.06277289)
      PathPoint P2: lumbar4 (-0.02465278 0.02859157 0.03215589)
      PathWrap: wrap_object=Cylinder method=hybrid
    Thelen2003Muscle IL_L1_l: max_isometric_force=97.275 optimal_fiber_length=0.05420301 tendon_slack_length=0.1146367
        pennation_angle_at_optimal=0.2408554
      PathPoint P1: pelvis (-0.161416 0.04371683 -0.05604722)
      PathPoint P2: lumbar1 (-0.03215589 0.01763388 -0.03008132)
      PathWrap: wrap_object=Cylinder2 method=hybrid
    Thelen2003Muscle IL_L2_l: max_isometric_force=138.1305 optimal_fiber_length=0.03916436
        tendon_slack_length=0.0829515 pennation_angle_at_optimal=0.2408554
      PathPoint P1: pelvis (-0.1524484 0.06277289 -0.06165195)
      PathPoint P2: lumbar2 (-0.03319318 0.01348473 -0.03215589)
      PathWrap: wrap_object=Cylinder method=hybrid
    Thelen2003Muscle IL_L3_l: max_isometric_force=163.422 optimal_fiber_length=0.02653751
        tendon_slack_length=0.05620738 pennation_angle_at_optimal=0.2408554
      PathPoint P1: pelvis (-0.1367552 0.07622422 -0.06725667)
      PathPoint P2: lumbar3 (-0.03319318 0.02282031 -0.03167781)
      PathWrap: wrap_object=Cylinder method=hybrid
    Thelen2003Muscle IL_L4_l: max_isometric_force=169.2585 optimal_fiber_length=0.01794143
        tendon_slack_length=0.03800126 pennation_angle_at_optimal=0.2408554
      PathPoint P1: pelvis (-0.1311505 0.07286139 -0.06277289)
      PathPoint P2: lumbar4 (-0.02489488 0.02904403 -0.03215589)
      PathWrap: wrap_object=Cylinder method=hybrid
    Thelen2003Muscle IL_R5_r: max_isometric_force=21.4005 optimal_fiber_length=0.1607784 tendon_slack_length=0.2250637
        pennation_angle_at_optimal=0.2408554
      PathPoint IL_r5_R-P1: pelvis (-0.1524484 0.04932156 0.05492628)
      PathPoint IL_r5_R-P2: lumbar2 (-0.05148034 0.002074574 0.05808806)
      PathPoint IL_r5_R-P2_0: torso (-0.08194566 0.1784133 0.05912535)
      PathPoint IL_r5_R-P3: torso (-0.08298295 0.2074574 0.05912535)
      PathPoint IL_r5_R-P4: torso (-0.08402024 0.245837 0.06016264)
      PathPoint IL_r5_R-P5: torso (-0.08194566 0.274881 0.06119992)
      PathPoint IL_r5_R-P6: torso (-0.0788338 0.2977013 0.06119992)
      PathPoint IL_r5_R-P7: torso (-0.07261008 0.3194844 0.06223721)
      PathWrap: wrap_object=Cylinder2 method=hybrid
    Thelen2003Muscle IL_R6_r: max_isometric_force=27.237 optimal_fiber_length=0.1534859 tendon_slack_length=0.1856304
        pennation_angle_at_optimal=0.2408554
      PathPoint IL_r6_R-P1: pelvis (-0.1446018 0.06613572 0.05941006)
      PathPoint IL_r6_R-P2: lumbar2 (-0.05104935 0.002454345 0.06016264)
      PathPoint IL_r6_R-P2_0: torso (-0.08194566 0.1773761 0.06223721)
      PathPoint IL_r6_R-P3: torso (-0.08298295 0.2095319 0.06223721)
      PathPoint IL_r6_R-P4: torso (-0.08402024 0.2489488 0.0632745)
      PathPoint IL_r6_R-P5: torso (-0.07987109 0.2779929 0.06431179)
      PathPoint IL_r6_R-P6: torso (-0.07364737 0.2925149 0.06534907)
      PathWrap: wrap_object=Cylinder2 method=hybrid
    Thelen2003Muscle IL_R7_r: max_isometric_force=35.019 optimal_fiber_length=0.1598992 tendon_slack_length=0.1584137
        pennation_angle_at_optimal=0.2408554
      PathPoint IL_r7_R-P1: pelvis (-0.1333924 0.07734517 0.06501478)
      PathPoint IL_r7_R-P2: lumbar2 (-0.05047946 0.002462384 0.0632745)
      PathPoint IL_r7_R-P2_0: torso (-0.08298295 0.1784133 0.06534907)
      PathPoint IL_r7_R-P3: torso (-0.08298295 0.2084947 0.06534907)
      PathPoint IL_r7_R-P4: torso (-0.08402024 0.2479116 0.06638636)
      PathPoint IL_r7_R-P5: torso (-0.07779651 0.2707319 0.06742365)
    Thelen2003Muscle IL_R8_r: max_isometric_force=31.128 optimal_fiber_length=0.1432982 tendon_slack_length=0.134758
        pennation_angle_at_optimal=0.2408554
      PathPoint IL_r8_R-P1: pelvis (-0.1356343 0.07958706 0.06725667)
      PathPoint IL_r8_R-P2: lumbar2 (-0.04978977 0.003111861 0.06638636)
      PathPoint IL_r8_R-P2_0: torso (-0.08194566 0.1732269 0.06742365)
      PathPoint IL_r8_R-P3: torso (-0.08413029 0.2084947 0.06742365)
      PathPoint IL_r8_R-P4: torso (-0.08194566 0.2375387 0.06846093)
    Thelen2003Muscle IL_R9_r: max_isometric_force=44.7465 optimal_fiber_length=0.159537 tendon_slack_length=0.08606171
        pennation_angle_at_optimal=0.2408554
      PathPoint IL_r9_R-P1: pelvis (-0.1333924 0.08407083 0.06725667)
      PathPoint IL_r9_R-P2: lumbar2 (-0.04978977 0.003111861 0.06846093)
      PathPoint IL_r9_R-P2_0: torso (-0.08298295 0.1753015 0.07053551)
      PathPoint IL_r9_R-P3: torso (-0.0788338 0.2001964 0.07053551)
    Thelen2003Muscle IL_R10_r: max_isometric_force=89.493 optimal_fiber_length=0.1342391 tendon_slack_length=0.07093444
        pennation_angle_at_optimal=0.2408554
      PathPoint IL_r10_R-P1: pelvis (-0.1311505 0.080708 0.06949856)
      PathPoint IL_r10_R-P2: lumbar2 (-0.04988136 0.002724787 0.07157279)
      PathPoint IL_r10_R-P2_0: torso (-0.07779651 0.1607795 0.07261008)
    Thelen2003Muscle IL_R11_r: max_isometric_force=110.8935 optimal_fiber_length=0.1181368
        tendon_slack_length=0.05150806 pennation_angle_at_optimal=0.2408554
      PathPoint IL_r11_R-P1: pelvis (-0.1266667 0.08855461 0.07174045)
      PathPoint IL_r11_R-P2: lumbar2 (-0.0497349 0.00280417 0.07468465)
      PathPoint IL_r11_R-P2_0: torso (-0.06431179 0.1296609 0.07675923)
    Thelen2003Muscle IL_R12_r: max_isometric_force=132.294 optimal_fiber_length=0.09029995
        tendon_slack_length=0.03710415 pennation_angle_at_optimal=0.2408554
      PathPoint IL_r12_R-P1: pelvis (-0.1244248 0.09191745 0.07510328)
      PathPoint IL_r12_R-P2: torso (-0.03319318 0.09854225 0.06949822)
    Thelen2003Muscle IL_R5_l: max_isometric_force=21.4005 optimal_fiber_length=0.1607819 tendon_slack_length=0.2250687
        pennation_angle_at_optimal=0.2408554
      PathPoint IL_r5_R-P1: pelvis (-0.1523453 0.04913985 -0.0549089)
      PathPoint IL_r5_R-P2: lumbar2 (-0.05148034 0.002190065 -0.05808806)
      PathPoint IL_r5_R-P2_0: torso (-0.08090838 0.1784133 -0.05912535)
      PathPoint IL_r5_R-P3: torso (-0.08298295 0.2074574 -0.05912535)
      PathPoint IL_r5_R-P4: torso (-0.08402024 0.245837 -0.06016264)
      PathPoint IL_r5_R-P5: torso (-0.08194566 0.274881 -0.06119992)
      PathPoint IL_r5_R-P6: torso (-0.0788338 0.2977013 -0.06119992)
      PathPoint IL_r5_R-P7: torso (-0.07261008 0.3194844 -0.06223721)
      PathWrap: wrap_object=Cylinder2 method=hybrid
    Thelen2003Muscle IL_R6_l: max_isometric_force=27.237 optimal_fiber_length=0.1534932 tendon_slack_length=0.1856392
        pennation_angle_at_optimal=0.2408554
      PathPoint IL_r6_R-P1: pelvis (-0.1442902 0.06575628 -0.05938237)
      PathPoint IL_r6_R-P2: lumbar2 (-0.05104935 0.002074574 -0.06016264)
      PathPoint IL_r6_R-P2_0: torso (-0.08194566 0.1783096 -0.06223721)
      PathPoint IL_r6_R-P3: torso (-0.08194566 0.2095319 -0.06223721)
      PathPoint IL_r6_R-P4: torso (-0.08298295 0.2489488 -0.0632745)
      PathPoint IL_r6_R-P5: torso (-0.07987109 0.2779929 -0.06431179)
      PathPoint IL_r6_R-P6: torso (-0.07364737 0.2925149 -0.06534907)
      PathWrap: wrap_object=Cylinder2 method=hybrid
    Thelen2003Muscle IL_R7_l: max_isometric_force=35.019 optimal_fiber_length=0.1598878 tendon_slack_length=0.1584023
        pennation_angle_at_optimal=0.2408554
      PathPoint IL_r7_R-P1: pelvis (-0.1332915 0.07764312 -0.06509896)
      PathPoint IL_r7_R-P2: lumbar2 (-0.05047946 0.002462384 -0.0632745)
      PathPoint IL_r7_R-P2_0: torso (-0.08298295 0.1784133 -0.06534907)
      PathPoint IL_r7_R-P3: torso (-0.08298295 0.2084947 -0.06534907)
      PathPoint IL_r7_R-P4: torso (-0.08402024 0.2479116 -0.06638636)
      PathPoint IL_r7_R-P5: torso (-0.07779651 0.2707319 -0.06742365)
    Thelen2003Muscle IL_R8_l: max_isometric_force=31.128 optimal_fiber_length=0.1432978 tendon_slack_length=0.1347576
        pennation_angle_at_optimal=0.2408554
      PathPoint IL_r8_R-P1: pelvis (-0.1356343 0.07958706 -0.06725667)
      PathPoint IL_r8_R-P2: lumbar2 (-0.04978977 0.002961703 -0.06638636)
      PathPoint IL_r8_R-P2_0: torso (-0.08194566 0.1732269 -0.06742365)
      PathPoint IL_r8_R-P3: torso (-0.08402024 0.2084947 -0.06742365)
      PathPoint IL_r8_R-P4: torso (-0.08194566 0.2375387 -0.06846093)
    Thelen2003Muscle IL_R9_l: max_isometric_force=44.7465 optimal_fiber_length=0.1595231 tendon_slack_length=0.08605421
        pennation_angle_at_optimal=0.2408554
      PathPoint IL_r9_R-P1: pelvis (-0.1333924 0.08407083 -0.06725667)
      PathPoint IL_r9_R-P2: lumbar2 (-0.05015531 0.002753592 -0.06846093)
      PathPoint IL_r9_R-P2_0: torso (-0.08090838 0.170115 -0.07053551)
      PathPoint IL_r9_R-P3: torso (-0.0788338 0.2001964 -0.07053551)
    Thelen2003Muscle IL_R10_l: max_isometric_force=89.493 optimal_fiber_length=0.1339408 tendon_slack_length=0.07077682
        pennation_angle_at_optimal=0.2408554
      PathPoint IL_r10_R-P1: pelvis (-0.1300296 0.08519178 -0.06949856)
      PathPoint IL_r10_R-P2: lumbar2 (-0.04988136 0.002724787 -0.07157279)
      PathPoint IL_r10_R-P2_0: torso (-0.07775243 0.1607795 -0.07261008)
    Thelen2003Muscle IL_R11_l: max_isometric_force=110.8935 optimal_fiber_length=0.1181393
        tendon_slack_length=0.05150912 pennation_angle_at_optimal=0.2408554
      PathPoint IL_r11_R-P1: pelvis (-0.1266667 0.08855461 -0.07174045)
      PathPoint IL_r11_R-P2: lumbar2 (-0.0497349 0.00280417 -0.07468465)
      PathPoint IL_r11_R-P2_0: torso (-0.06476788 0.1296609 -0.07675923)
    Thelen2003Muscle IL_R12_l: max_isometric_force=132.294 optimal_fiber_length=0.09029093
        tendon_slack_length=0.03710044 pennation_angle_at_optimal=0.2408554
      PathPoint IL_r12_R-P1: pelvis (-0.1244248 0.09185546 -0.0746132)
      PathPoint IL_r12_R-P2: torso (-0.03320583 0.09891557 -0.06949822)
    Thelen2003Muscle LTpT_T1_r: max_isometric_force=25.2915 optimal_fiber_length=0.1066175
        tendon_slack_length=0.2521126 pennation_angle_at_optimal=0.2199115
      PathPoint LTpT_t1_R-P1: lumbar1 (-0.04978977 -0.01348473 0.003329691)
      PathPoint LTpT_t1_R-P2: torso (-0.05186434 0.4201012 0.02712505)
      PathWrap: wrap_object=Chest_r method=hybrid
    Thelen2003Muscle LTpT_T2_r: max_isometric_force=50.583 optimal_fiber_length=0.1100665 tendon_slack_length=0.2650268
        pennation_angle_at_optimal=0.2199115
      PathPoint LTpT_t2_R-P1: lumbar2 (-0.04875248 -0.0155593 0.003972809)
      PathPoint LTpT_t2_R-P2: torso (-0.05705078 0.4003927 0.02752959)
      PathWrap: wrap_object=Chest_r method=hybrid
    Thelen2003Muscle LTpT_T3_r: max_isometric_force=50.583 optimal_fiber_length=0.1107096 tendon_slack_length=0.2660434
        pennation_angle_at_optimal=0.2199115
      PathPoint LTpT_t3_R-P1: lumbar3 (-0.05186434 -0.004149147 0.004149147)
      PathPoint LTpT_t3_R-P2: lumbar1 (-0.03849372 -0.01454276 0.005186434)
      PathPoint LTpT_t3_R-P2_0: torso (-0.06371275 0.3786989 0.02647612)
      PathWrap: wrap_object=Chest_r method=hybrid
    Thelen2003Muscle LTpT_T4_r: max_isometric_force=19.455 optimal_fiber_length=0.1107407 tendon_slack_length=0.2661678
        pennation_angle_at_optimal=0.2199115
      PathPoint LTpT_t4_R-P1: lumbar4 (-0.05082706 0.007261008 0.002925149)
      PathPoint LTpT_t4_R-P2: lumbar1 (-0.03849672 -0.01452202 0.006348196)
      PathPoint LTpT_t4_R-P2_0: torso (-0.07261008 0.3557894 0.02712505)
      PathWrap: wrap_object=Chest_r method=hybrid
    Thelen2003Muscle LTpT_T5_r: max_isometric_force=19.455 optimal_fiber_length=0.104517 tendon_slack_length=0.2511686
        pennation_angle_at_optimal=0.2199115
      PathPoint LTpT_t5_R-P1: lumbar4 (-0.05082706 0.004149147 -0.0004488817)
      PathPoint LTpT_t5_R-P2: lumbar2 (-0.04564062 0.004564062 0.006638636)
      PathPoint LTpT_t5_R-P2_0: torso (-0.07671639 0.3319318 0.02904403)
      PathWrap: wrap_object=Chest_r method=hybrid
    Thelen2003Muscle LTpT_T6_r: max_isometric_force=29.1825 optimal_fiber_length=0.1069546
        tendon_slack_length=0.2447686 pennation_angle_at_optimal=0.2199115
      PathPoint LTpT_t6_R-P1: lumbar5 (-0.0394169 0.01867116 0.000221523)
      PathPoint LTpT_t6_R-P2: lumbar2 (-0.04564062 0.004564062 0.009335582)
      PathPoint LTpT_t6_R-P3: torso (-0.07568937 0.1971239 0.01582143)
      PathPoint LTpT_t6_R-P2_0: torso (-0.08298295 0.3049623 0.02869135)
    Thelen2003Muscle LTpT_T7_r: max_isometric_force=35.019 optimal_fiber_length=0.1229414 tendon_slack_length=0.2324005
        pennation_angle_at_optimal=0.2199115
      PathPoint LTpT_t7_R-P1: sacrum (-0.1471991 0.06783138 0.0003103447)
      PathPoint LTpT_t7_R-P2: lumbar2 (-0.04563025 0.004564062 0.01141016)
      PathPoint LTpT_t7_R-P3: torso (-0.07537217 0.1977909 0.02017315)
      PathPoint LTpT_t7_R-P2_0: torso (-0.08298295 0.2769556 0.02745698)
    Thelen2003Muscle LTpT_T8_r: max_isometric_force=56.4195 optimal_fiber_length=0.1317318
        tendon_slack_length=0.2085319 pennation_angle_at_optimal=0.2199115
      PathPoint LTpT_t8_R-P1: sacrum (-0.1601841 0.05632253 0.0004198049)
      PathPoint LTpT_t8_R-P2: lumbar4 (-0.04872541 0.01871712 0.005868295)
      PathPoint LTpT_t8_R-P3: lumbar3 (-0.04849295 0.01405098 0.008626451)
      PathPoint LTpT_t8_R-P2_0: lumbar2 (-0.04700559 0.003217156 0.01134792)
      PathPoint LTpT_t8_R-P2_1: torso (-0.08194566 0.2499861 0.02645081)
    Thelen2003Muscle LTpT_T9_r: max_isometric_force=66.147 optimal_fiber_length=0.1310873 tendon_slack_length=0.2221718
        pennation_angle_at_optimal=0.2199115
      PathPoint LTpT_t9_R-P1: sacrum (-0.1858773 0.03008077 0)
      PathPoint LTpT_t9_R-P2: lumbar4 (-0.04846204 0.01862967 0.007758906)
      PathPoint LTpT_t9_R-P3: lumbar3 (-0.04816071 0.01436995 0.01005129)
      PathPoint LTpT_t9_R-P3_0: lumbar2 (-0.04638363 0.003602539 0.0119288)
      PathPoint LTpT_t9_R-P2_0: torso (-0.07779651 0.2302777 0.02505058)
    Thelen2003Muscle LTpT_T10_r: max_isometric_force=71.9835 optimal_fiber_length=0.118588
        tendon_slack_length=0.1812168 pennation_angle_at_optimal=0.2199115
      PathPoint LTpT_t10_R-P1: sacrum (-0.1843539 0.02753163 0.01201652)
      PathPoint LTpT_t10_R-P2: lumbar4 (-0.04846204 0.01862967 0.01302832)
      PathPoint LTpT_t10_R-P2_0: lumbar3 (-0.04781892 0.01455313 0.0149473)
      PathPoint LTpT_t10_R-P3: lumbar2 (-0.04564062 0.00350603 0.01581862)
      PathPoint LTpT_t10_R-P2_1: torso (-0.07053551 0.2001964 0.01877489)
    Thelen2003Muscle LTpT_T11_r: max_isometric_force=73.929 optimal_fiber_length=0.1035089 tendon_slack_length=0.157757
        pennation_angle_at_optimal=0.2199115
      PathPoint LTpT_t11_R-P1: sacrum (-0.1767158 0.03442353 0.0269475)
      PathPoint LTpT_t11_R-P2: lumbar4 (-0.04846204 0.01763388 0.02275807)
      PathPoint LTpT_t11_R-P3: lumbar3 (-0.05201807 0.01399176 0.02166374)
      PathPoint LTpT_t11_R-P2_0: lumbar2 (-0.0477152 0.00350603 0.0205694)
      PathPoint LTpT_t11_R-P2_1: torso (-0.06119992 0.167748 0.01827699)
    Thelen2003Muscle LTpT_T12_r: max_isometric_force=62.256 optimal_fiber_length=0.08189403
        tendon_slack_length=0.1248138 pennation_angle_at_optimal=0.2199115
      PathPoint LTpT_t12_R-P1: sacrum (-0.1622679 0.05470209 0.03130798)
      PathPoint LTpT_t12_R-P2: lumbar4 (-0.04846204 0.01763388 0.02618112)
      PathPoint LTpT_t12_R-P3: lumbar3 (-0.05120816 0.01458052 0.02478846)
      PathPoint LTpT_t12_R-P2_0: lumbar2 (-0.04751064 0.004131856 0.02339528)
      PathPoint LTpT_t12_R-P2_1: torso (-0.05290163 0.1379592 0.01851962)
    Thelen2003Muscle LTpT_R4_r: max_isometric_force=19.455 optimal_fiber_length=0.1405866 tendon_slack_length=0.2142661
        pennation_angle_at_optimal=0.2199115
      PathPoint LTpT_r4_R-P1: lumbar4 (-0.05186434 0.0073231 0.002925284)
      PathPoint LTpT_r4_R-P2: lumbar2 (-0.05186434 0.005659665 0.01190587)
      PathPoint LTpT_r4_R-P2_0: torso (-0.07572194 0.1970845 0.02696469)
      PathPoint LTpT_r4_R-P3: torso (-0.07675923 0.2230167 0.02965064)
      PathPoint LTpT_r4_R-P4: torso (-0.07675923 0.2520607 0.03228099)
      PathPoint LTpT_r4_R-P5: torso (-0.07572194 0.2831793 0.03476934)
      PathPoint LTpT_r4_R-P6: torso (-0.06742365 0.3547521 0.03982455)
    Thelen2003Muscle LTpT_R5_r: max_isometric_force=19.455 optimal_fiber_length=0.1317465 tendon_slack_length=0.2007928
        pennation_angle_at_optimal=0.2199115
      PathPoint LTpT_r5_R-P1: lumbar4 (-0.05082706 0.004149147 8.298295e-5)
      PathPoint LTpT_r5_R-P2: lumbar2 (-0.05082706 0.004805418 0.01472553)
      PathPoint LTpT_r5_R-P2_0: torso (-0.0788338 0.1950099 0.03102193)
      PathPoint LTpT_r5_R-P3: torso (-0.07779651 0.2219794 0.03316019)
      PathPoint LTpT_r5_R-P4: torso (-0.0788338 0.2520607 0.03593628)
      PathPoint LTpT_r5_R-P5: torso (-0.07675923 0.2811047 0.03837961)
      PathPoint LTpT_r5_R-P6: torso (-0.06742365 0.3246708 0.04065459)
    Thelen2003Muscle LTpT_R6_r: max_isometric_force=29.1825 optimal_fiber_length=0.140737 tendon_slack_length=0.1916253
        pennation_angle_at_optimal=0.2199115
      PathPoint LTpT_r6_R-P1: lumbar5 (-0.0394169 0.02074574 0.0002178302)
      PathPoint LTpT_r6_R-P2: lumbar3 (-0.05186434 0.01528297 0.01124834)
      PathPoint LTpT_r6_R-P2_0: lumbar2 (-0.0477152 0.004564062 0.01452202)
      PathPoint LTpT_r6_R-P2_1: torso (-0.0788338 0.1939726 0.03216346)
      PathPoint LTpT_r6_R-P3: torso (-0.0788338 0.2209421 0.03595319)
      PathPoint LTpT_r6_R-P4: torso (-0.07987109 0.2510234 0.03873924)
      PathPoint LTpT_r6_R-P5: torso (-0.07572194 0.2811047 0.04149147)
      PathPoint LTpT_r6_R-P6: torso (-0.07157279 0.3008132 0.04149147)
    Thelen2003Muscle LTpT_R7_r: max_isometric_force=35.019 optimal_fiber_length=0.1346598 tendon_slack_length=0.2018654
        pennation_angle_at_optimal=0.2199115
      PathPoint LTpT_r7_R-P1: sacrum (-0.1472024 0.06782835 0.0003138644)
      PathPoint LTpT_r7_R-P2: lumbar4 (-0.04846225 0.01953149 0.008432696)
      PathPoint LTpT_r7_R-P2_0: lumbar3 (-0.04781944 0.01469773 0.01333463)
      PathPoint LTpT_r7_R-P2_1: lumbar2 (-0.04563025 0.004476225 0.01791643)
      PathPoint LTpT_r7_R-P2_2: torso (-0.08090838 0.1918981 0.03681362)
      PathPoint LTpT_r7_R-P3: torso (-0.08194566 0.2188675 0.04106473)
      PathPoint LTpT_r7_R-P4: torso (-0.07987109 0.2520607 0.04382413)
      PathPoint LTpT_r7_R-P5: torso (-0.07675923 0.2790302 0.04494844)
    Thelen2003Muscle LTpT_R8_r: max_isometric_force=56.4195 optimal_fiber_length=0.1107725
        tendon_slack_length=0.2071821 pennation_angle_at_optimal=0.2199115
      PathPoint LTpT_r8_R-P1: sacrum (-0.160183 0.05632746 0.0004147495)
      PathPoint LTpT_r8_R-P2: lumbar4 (-0.04826371 0.01879937 0.01181822)
      PathPoint LTpT_r8_R-P2_0: lumbar3 (-0.04763719 0.01452202 0.01663756)
      PathPoint LTpT_r8_R-P2_1: lumbar2 (-0.04563025 0.004024673 0.02130732)
      PathPoint LTpT_r8_R-P2_2: torso (-0.08194566 0.1918981 0.04223096)
      PathPoint LTpT_r8_R-P3: torso (-0.08194566 0.216793 0.04534665)
      PathPoint LTpT_r8_R-P4: torso (-0.0788338 0.2468743 0.04808208)
    Thelen2003Muscle LTpT_R9_r: max_isometric_force=66.147 optimal_fiber_length=0.09652789
        tendon_slack_length=0.2193609 pennation_angle_at_optimal=0.2199115
      PathPoint LTpT_r9_R-P1: sacrum (-0.185875 0.03008615 0)
      PathPoint LTpT_r9_R-P2: lumbar4 (-0.04846225 0.01834068 0.01544531)
      PathPoint LTpT_r9_R-P2_0: lumbar3 (-0.04781944 0.01350911 0.02031226)
      PathPoint LTpT_r9_R-P2_1: lumbar2 (-0.04563077 0.004083498 0.02509031)
      PathPoint LTpT_r9_R-P2_2: torso (-0.08194566 0.1898235 0.04497572)
      PathPoint LTpT_r9_R-P3: torso (-0.07987109 0.2105692 0.04850343)
    Thelen2003Muscle LTpT_R10_r: max_isometric_force=71.9835 optimal_fiber_length=0.1133017
        tendon_slack_length=0.1750412 pennation_angle_at_optimal=0.2199115
      PathPoint LTpT_r10_R-P1: sacrum (-0.1843505 0.0275304 0.01201652)
      PathPoint LTpT_r10_R-P2: lumbar4 (-0.04840541 0.01749291 0.02016392)
      PathPoint LTpT_r10_R-P2_0: lumbar3 (-0.04776229 0.01314657 0.02432853)
      PathPoint LTpT_r10_R-P2_1: lumbar2 (-0.04557382 0.003782394 0.02835216)
      PathPoint LTpT_r10_R-P2_2: torso (-0.07987109 0.1825625 0.04863496)
    Thelen2003Muscle LTpT_R11_r: max_isometric_force=73.929 optimal_fiber_length=0.1103776 tendon_slack_length=0.138683
        pennation_angle_at_optimal=0.2199115
      PathPoint LTpT_r11_R-P1: sacrum (-0.1767169 0.0344242 0.0269475)
      PathPoint LTpT_r11_R-P2: lumbar4 (-0.04781892 0.01862967 0.03051573)
      PathPoint LTpT_r11_R-P3: lumbar3 (-0.04781892 0.01445335 0.03379201)
      PathPoint LTpT_r11_R-P4: lumbar2 (-0.04566531 0.004647045 0.03689982)
      PathPoint LTpT_r11_R-P2_0: torso (-0.06744605 0.1531616 0.0472536)
    Thelen2003Muscle LTpT_R12_r: max_isometric_force=62.256 optimal_fiber_length=0.06644018
        tendon_slack_length=0.1291018 pennation_angle_at_optimal=0.2199115
      PathPoint LTpT_r12_R-P1: sacrum (-0.1622679 0.05470209 0.03130798)
      PathPoint LTpT_r12_R-P2: lumbar4 (-0.04846204 0.01823198 0.03475658)
      PathPoint LTpT_r12_R-P2_0: lumbar3 (-0.04781892 0.01415264 0.03721121)
      PathPoint LTpT_r12_R-P2_1: lumbar2 (-0.04564062 0.004564062 0.0402626)
      PathPoint LTpT_r12_R-P2_2: torso (-0.04671432 0.1244744 0.04835292)
      PathWrap: wrap_object=Cylinder2 method=hybrid
    Thelen2003Muscle LTpT_T1_l: max_isometric_force=25.2915 optimal_fiber_length=0.1066175
        tendon_slack_length=0.2521126 pennation_angle_at_optimal=0.2199115
      PathPoint LTpT_t1_R-P1: lumbar1 (-0.04978977 -0.01348473 -0.003329691)
      PathPoint LTpT_t1_R-P2: torso (-0.05186434 0.4201012 -0.02712505)
      PathWrap: wrap_object=Chest_l method=hybrid
    Thelen2003Muscle LTpT_T2_l: max_isometric_force=50.583 optimal_fiber_length=0.1100665 tendon_slack_length=0.2650268
        pennation_angle_at_optimal=0.2199115
      PathPoint LTpT_t2_R-P1: lumbar2 (-0.04875248 -0.01452202 -0.004149147)
      PathPoint LTpT_t2_R-P2: torso (-0.05705078 0.4003927 -0.02752959)
      PathWrap: wrap_object=Chest_l method=hybrid
    Thelen2003Muscle LTpT_T3_l: max_isometric_force=50.583 optimal_fiber_length=0.1107096 tendon_slack_length=0.2660434
        pennation_angle_at_optimal=0.2199115
      PathPoint LTpT_t3_R-P1: lumbar3 (-0.05082706 -0.004149147 -0.004221758)
      PathPoint LTpT_t3_R-P2: lumbar1 (-0.03849372 -0.01454276 -0.005186434)
      PathPoint LTpT_t3_R-P2_0: torso (-0.0632745 0.3786097 -0.02694871)
      PathWrap: wrap_object=Chest_l method=hybrid
    Thelen2003Muscle LTpT_T4_l: max_isometric_force=19.455 optimal_fiber_length=0.1107407 tendon_slack_length=0.2661678
        pennation_angle_at_optimal=0.2199115
      PathPoint LTpT_t4_R-P1: lumbar4 (-0.05082706 0.0073231 -0.002925149)
      PathPoint LTpT_t4_R-P2: lumbar1 (-0.03849672 -0.01454764 -0.006348196)
      PathPoint LTpT_t4_R-P2_0: torso (-0.07261008 0.3557894 -0.02712505)
      PathWrap: wrap_object=Chest_l method=hybrid
    Thelen2003Muscle LTpT_T5_l: max_isometric_force=19.455 optimal_fiber_length=0.104517 tendon_slack_length=0.2511686
        pennation_angle_at_optimal=0.2199115
      PathPoint LTpT_t5_R-P1: lumbar4 (-0.04906377 0.004117666 -8.298295e-5)
      PathPoint LTpT_t5_R-P2: lumbar2 (-0.04564062 0.004564062 -0.006638636)
      PathPoint LTpT_t5_R-P2_0: torso (-0.07675923 0.3319318 -0.02912702)
      PathWrap: wrap_object=Chest_l method=hybrid
    Thelen2003Muscle LTpT_T6_l: max_isometric_force=29.1825 optimal_fiber_length=0.1069546
        tendon_slack_length=0.2447686 pennation_angle_at_optimal=0.2199115
      PathPoint LTpT_t6_R-P1: lumbar5 (-0.0394169 0.01867116 -0.0002178302)
      PathPoint LTpT_t6_R-P2: lumbar2 (-0.04564062 0.004564062 -0.009335582)
      PathPoint LTpT_t6_R-P3: torso (-0.07572194 0.1970845 -0.01604683)
      PathPoint LTpT_t6_R-P2_0: torso (-0.08298295 0.3049623 -0.02869135)
    Thelen2003Muscle LTpT_T7_l: max_isometric_force=35.019 optimal_fiber_length=0.1229414 tendon_slack_length=0.2324004
        pennation_angle_at_optimal=0.2199115
      PathPoint LTpT_t7_R-P1: sacrum (-0.1471991 0.06783138 -0.0003138644)
      PathPoint LTpT_t7_R-P2: lumbar2 (-0.04563025 0.004564062 -0.01141016)
      PathPoint LTpT_t7_R-P3: torso (-0.07572194 0.1981218 -0.01970845)
      PathPoint LTpT_t7_R-P2_0: torso (-0.08298295 0.2769556 -0.02696946)
    Thelen2003Muscle LTpT_T8_l: max_isometric_force=56.4195 optimal_fiber_length=0.1317318
        tendon_slack_length=0.2085319 pennation_angle_at_optimal=0.2199115
      PathPoint LTpT_t8_R-P1: sacrum (-0.1601841 0.05632253 -0.0004147495)
      PathPoint LTpT_t8_R-P2: lumbar4 (-0.04872541 0.01871712 -0.005871044)
      PathPoint LTpT_t8_R-P3: lumbar3 (-0.04849295 0.01405098 -0.008630227)
      PathPoint LTpT_t8_R-P2_0: lumbar2 (-0.04700559 0.003217156 -0.01134792)
      PathPoint LTpT_t8_R-P2_1: torso (-0.08194566 0.2499861 -0.02645081)
    Thelen2003Muscle LTpT_T9_l: max_isometric_force=66.147 optimal_fiber_length=0.1310874 tendon_slack_length=0.2221718
        pennation_angle_at_optimal=0.2199115
      PathPoint LTpT_t9_R-P1: sacrum (-0.1858773 0.03008077 0)
      PathPoint LTpT_t9_R-P2: lumbar4 (-0.04846204 0.01862967 -0.007758906)
      PathPoint LTpT_t9_R-P3: lumbar3 (-0.04816071 0.01436995 -0.01005131)
      PathPoint LTpT_t9_R-P3_0: lumbar2 (-0.04638363 0.003602539 -0.01244744)
      PathPoint LTpT_t9_R-P2_0: torso (-0.07779651 0.2302777 -0.02489488)
    Thelen2003Muscle LTpT_T10_l: max_isometric_force=71.9835 optimal_fiber_length=0.118588
        tendon_slack_length=0.1812168 pennation_angle_at_optimal=0.2199115
      PathPoint LTpT_t10_R-P1: sacrum (-0.1843539 0.02753163 -0.01201652)
      PathPoint LTpT_t10_R-P2: lumbar4 (-0.04846204 0.01862967 -0.01302832)
      PathPoint LTpT_t10_R-P2_0: lumbar3 (-0.04781892 0.01455313 -0.0149473)
      PathPoint LTpT_t10_R-P3: lumbar2 (-0.04564062 0.00350603 -0.01581862)
      PathPoint LTpT_t10_R-P2_1: torso (-0.07053551 0.2001964 -0.01867116)
    Thelen2003Muscle LTpT_T11_l: max_isometric_force=73.929 optimal_fiber_length=0.1035057
        tendon_slack_length=0.1577521 pennation_angle_at_optimal=0.2199115
      PathPoint LTpT_t11_R-P1: sacrum (-0.1767158 0.03442353 -0.0269475)
      PathPoint LTpT_t11_R-P2: lumbar4 (-0.04846204 0.01763388 -0.02275807)
      PathPoint LTpT_t11_R-P3: lumbar3 (-0.05201807 0.01399176 -0.02165855)
      PathPoint LTpT_t11_R-P2_0: lumbar2 (-0.0477152 0.00350603 -0.0205694)
      PathPoint LTpT_t11_R-P2_1: torso (-0.06314899 0.167748 -0.01827699)
    Thelen2003Muscle LTpT_T12_l: max_isometric_force=62.256 optimal_fiber_length=0.08189786
        tendon_slack_length=0.1248196 pennation_angle_at_optimal=0.2199115
      PathPoint LTpT_t12_R-P1: sacrum (-0.1622679 0.05470209 -0.03138644)
      PathPoint LTpT_t12_R-P2: lumbar4 (-0.04846204 0.01763388 -0.02593217)
      PathPoint LTpT_t12_R-P3: lumbar3 (-0.05120816 0.01458052 -0.02489488)
      PathPoint LTpT_t12_R-P2_0: lumbar2 (-0.04751064 0.004131856 -0.0238576)
      PathPoint LTpT_t12_R-P2_1: torso (-0.05290163 0.1379592 -0.01867116)
    Thelen2003Muscle LTpT_R4_l: max_isometric_force=19.455 optimal_fiber_length=0.1405866 tendon_slack_length=0.2142661
        pennation_angle_at_optimal=0.2199115
      PathPoint LTpT_r4_R-P1: lumbar4 (-0.05186434 0.007261008 -0.002925149)
      PathPoint LTpT_r4_R-P2: lumbar2 (-0.05186434 0.005186434 -0.01190805)
      PathPoint LTpT_r4_R-P2_0: torso (-0.07572194 0.1970845 -0.02696946)
      PathPoint LTpT_r4_R-P3: torso (-0.07675923 0.2230167 -0.02964566)
      PathPoint LTpT_r4_R-P4: torso (-0.07675923 0.2520607 -0.03228037)
      PathPoint LTpT_r4_R-P5: torso (-0.07572194 0.2831793 -0.03476986)
      PathPoint LTpT_r4_R-P6: torso (-0.06742365 0.3547521 -0.03982144)
    Thelen2003Muscle LTpT_R5_l: max_isometric_force=19.455 optimal_fiber_length=0.1317465 tendon_slack_length=0.2007928
        pennation_angle_at_optimal=0.2199115
      PathPoint LTpT_r5_R-P1: lumbar4 (-0.05082706 0.004117666 -8.298295e-5)
      PathPoint LTpT_r5_R-P2: lumbar2 (-0.05082706 0.01452202 -0.01472947)
      PathPoint LTpT_r5_R-P2_0: torso (-0.0788338 0.1950099 -0.03102525)
      PathPoint LTpT_r5_R-P3: torso (-0.07779651 0.2209421 -0.03316206)
      PathPoint LTpT_r5_R-P4: torso (-0.0788338 0.2520607 -0.03593162)
      PathPoint LTpT_r5_R-P5: torso (-0.07675923 0.2811047 -0.03788172)
      PathPoint LTpT_r5_R-P6: torso (-0.06742365 0.3246708 -0.04065127)
    Thelen2003Muscle LTpT_R6_l: max_isometric_force=29.1825 optimal_fiber_length=0.140737 tendon_slack_length=0.1916253
        pennation_angle_at_optimal=0.2199115
      PathPoint LTpT_r6_R-P1: lumbar5 (-0.0394169 0.02074574 -0.0002178302)
      PathPoint LTpT_r6_R-P2: lumbar3 (-0.05186434 0.01528297 -0.01124419)
      PathPoint LTpT_r6_R-P2_0: lumbar2 (-0.0477152 0.004564062 -0.01452202)
      PathPoint LTpT_r6_R-P2_1: torso (-0.0788338 0.1939726 -0.03215589)
      PathPoint LTpT_r6_R-P3: torso (-0.0788338 0.2209421 -0.03595236)
      PathPoint LTpT_r6_R-P4: torso (-0.07987109 0.2510234 -0.03874266)
      PathPoint LTpT_r6_R-P5: torso (-0.07572194 0.2811047 -0.04099358)
      PathPoint LTpT_r6_R-P6: torso (-0.07157279 0.3008132 -0.0415952)
    Thelen2003Muscle LTpT_R7_l: max_isometric_force=35.019 optimal_fiber_length=0.134644 tendon_slack_length=0.2018418
        pennation_angle_at_optimal=0.2199115
      PathPoint LTpT_r7_R-P1: sacrum (-0.1472024 0.06837761 -0.0003138644)
      PathPoint LTpT_r7_R-P2: lumbar4 (-0.04846225 0.01970845 -0.008298295)
      PathPoint LTpT_r7_R-P2_0: lumbar3 (-0.04781944 0.01452202 -0.01333951)
      PathPoint LTpT_r7_R-P2_1: lumbar2 (-0.04563025 0.004149147 -0.01791394)
      PathPoint LTpT_r7_R-P2_2: torso (-0.08090838 0.1918981 -0.03681331)
      PathPoint LTpT_r7_R-P3: torso (-0.08194566 0.2188675 -0.04106619)
      PathPoint LTpT_r7_R-P4: torso (-0.07987109 0.2520607 -0.04382537)
      PathPoint LTpT_r7_R-P5: torso (-0.07675923 0.2790302 -0.04494564)
    Thelen2003Muscle LTpT_R8_l: max_isometric_force=56.4195 optimal_fiber_length=0.1107725
        tendon_slack_length=0.2071821 pennation_angle_at_optimal=0.2199115
      PathPoint LTpT_r8_R-P1: sacrum (-0.160183 0.05632746 -0.0004147495)
      PathPoint LTpT_r8_R-P2: lumbar4 (-0.04826371 0.01879937 -0.0118147)
      PathPoint LTpT_r8_R-P2_0: lumbar3 (-0.04763719 0.01400825 -0.01663808)
      PathPoint LTpT_r8_R-P2_1: lumbar2 (-0.04563025 0.004024673 -0.02130587)
      PathPoint LTpT_r8_R-P2_2: torso (-0.08194566 0.1918981 -0.04222795)
      PathPoint LTpT_r8_R-P3: torso (-0.08194566 0.216793 -0.04535018)
      PathPoint LTpT_r8_R-P4: torso (-0.0788338 0.2468743 -0.04807825)
    Thelen2003Muscle LTpT_R9_l: max_isometric_force=66.147 optimal_fiber_length=0.09652767
        tendon_slack_length=0.2193605 pennation_angle_at_optimal=0.2199115
      PathPoint LTpT_r9_R-P1: sacrum (-0.185875 0.03008615 0)
      PathPoint LTpT_r9_R-P2: lumbar4 (-0.04846225 0.01834068 -0.0154452)
      PathPoint LTpT_r9_R-P2_0: lumbar3 (-0.04781944 0.01350911 -0.02031008)
      PathPoint LTpT_r9_R-P2_1: lumbar2 (-0.04563077 0.004083498 -0.02509197)
      PathPoint LTpT_r9_R-P2_2: torso (-0.08194566 0.1898235 -0.04497676)
      PathPoint LTpT_r9_R-P3: torso (-0.07987109 0.2105692 -0.04875248)
    Thelen2003Muscle LTpT_R10_l: max_isometric_force=71.9835 optimal_fiber_length=0.1133016
        tendon_slack_length=0.175041 pennation_angle_at_optimal=0.2199115
      PathPoint LTpT_r10_R-P1: sacrum (-0.1843505 0.0275304 -0.01201652)
      PathPoint LTpT_r10_R-P2: lumbar4 (-0.04840541 0.01749291 -0.02016486)
      PathPoint LTpT_r10_R-P2_0: lumbar3 (-0.04776229 0.01314657 -0.02432438)
      PathPoint LTpT_r10_R-P2_1: lumbar2 (-0.04557382 0.003782394 -0.02834905)
      PathPoint LTpT_r10_R-P2_2: torso (-0.07987109 0.1825625 -0.04875248)
    Thelen2003Muscle LTpT_R11_l: max_isometric_force=73.929 optimal_fiber_length=0.1103775 tendon_slack_length=0.138683
        pennation_angle_at_optimal=0.2199115
      PathPoint LTpT_r11_R-P1: sacrum (-0.1767169 0.0344242 -0.0269475)
      PathPoint LTpT_r11_R-P2: lumbar4 (-0.04781892 0.01862967 -0.03051698)
      PathPoint LTpT_r11_R-P3: lumbar3 (-0.04781892 0.01445335 -0.03379481)
      PathPoint LTpT_r11_R-P4: lumbar2 (-0.04566531 0.004647045 -0.03689629)
      PathPoint LTpT_r11_R-P2_0: torso (-0.06744605 0.1531616 -0.04725879)
    Thelen2003Muscle LTpT_R12_l: max_isometric_force=62.256 optimal_fiber_length=0.0664252
        tendon_slack_length=0.1290727 pennation_angle_at_optimal=0.2199115
      PathPoint LTpT_r12_R-P1: sacrum (-0.1622679 0.05492628 -0.03138644)
      PathPoint LTpT_r12_R-P2: lumbar4 (-0.04875248 0.01867116 -0.03526775)
      PathPoint LTpT_r12_R-P2_0: lumbar3 (-0.04781892 0.01415264 -0.03720748)
      PathPoint LTpT_r12_R-P2_1: lumbar2 (-0.04564062 0.004564062 -0.04026748)
      PathPoint LTpT_r12_R-P2_2: torso (-0.04671432 0.1244744 -0.04875248)
      PathWrap: wrap_object=Cylinder2 method=hybrid
    Thelen2003Muscle LTpL_L5_r: max_isometric_force=103.1115 optimal_fiber_length=0.05750242
        tendon_slack_length=0.001117246 pennation_angle_at_optimal=0.2199115
      PathPoint P1: sacrum (-0.1552856 0.07076354 0.05101519)
      PathPoint P2: lumbar5 (-0.01364343 0.02959794 0.02680588)
    Thelen2003Muscle LTpL_L4_r: max_isometric_force=99.2205 optimal_fiber_length=0.04243962
        tendon_slack_length=0.04585693 pennation_angle_at_optimal=0.2199115
      PathPoint P1: pelvis (-0.1490856 0.04595872 0.05380533)
      PathPoint P2: lumbar4 (-0.0238576 0.02804616 0.02641586)
    Thelen2003Muscle LTpL_L3_r: max_isometric_force=91.4385 optimal_fiber_length=0.05864608
        tendon_slack_length=0.06370275 pennation_angle_at_optimal=0.2199115
      PathPoint P1: pelvis (-0.1569322 0.04595872 0.05716817)
      PathPoint P2: lumbar3 (-0.03088065 0.02382015 0.02406692)
    Thelen2003Muscle LTpL_L2_r: max_isometric_force=81.711 optimal_fiber_length=0.07190942
        tendon_slack_length=0.07897585 pennation_angle_at_optimal=0.2199115
      PathPoint P1: pelvis (-0.1591741 0.04147495 0.05941006)
      PathPoint P2: lumbar2 (-0.03108666 0.01489046 0.02288224)
    Thelen2003Muscle LTpL_L1_r: max_isometric_force=70.038 optimal_fiber_length=0.085818 tendon_slack_length=0.09968277
        pennation_angle_at_optimal=0.2199115
      PathPoint P1: pelvis (-0.1615516 0.03759558 0.06005337)
      PathPoint P2: lumbar1 (-0.03279984 0.01727798 0.02367358)
      PathWrap: wrap_object=Cylinder2 method=hybrid
    Thelen2003Muscle LTpL_L5_l: max_isometric_force=103.1115 optimal_fiber_length=0.05747973
        tendon_slack_length=0.001116805 pennation_angle_at_optimal=0.2199115
      PathPoint P1: sacrum (-0.1558113 0.0706195 -0.05156345)
      PathPoint P2: lumbar5 (-0.01348473 0.03008132 -0.02696946)
    Thelen2003Muscle LTpL_L4_l: max_isometric_force=99.2205 optimal_fiber_length=0.04244592
        tendon_slack_length=0.04586375 pennation_angle_at_optimal=0.2199115
      PathPoint P1: pelvis (-0.1490856 0.04595872 -0.05380533)
      PathPoint P2: lumbar4 (-0.0238576 0.02800675 -0.02593217)
    Thelen2003Muscle LTpL_L3_l: max_isometric_force=91.4385 optimal_fiber_length=0.05864508
        tendon_slack_length=0.06370167 pennation_angle_at_optimal=0.2199115
      PathPoint P1: pelvis (-0.1569322 0.04595872 -0.05716817)
      PathPoint P2: lumbar3 (-0.03111861 0.0238576 -0.0238576)
    Thelen2003Muscle LTpL_L2_l: max_isometric_force=81.711 optimal_fiber_length=0.07191592
        tendon_slack_length=0.07898298 pennation_angle_at_optimal=0.2199115
      PathPoint P1: pelvis (-0.1591741 0.04147495 -0.05941006)
      PathPoint P2: lumbar2 (-0.03111861 0.01452202 -0.02282031)
    Thelen2003Muscle LTpL_L1_l: max_isometric_force=70.038 optimal_fiber_length=0.08580559
        tendon_slack_length=0.09966836 pennation_angle_at_optimal=0.2199115
      PathPoint P1: pelvis (-0.161416 0.03811211 -0.060531)
      PathPoint P2: lumbar1 (-0.03319318 0.01763388 -0.0238576)
      PathWrap: wrap_object=Cylinder2 method=hybrid
    Thelen2003Muscle EO1_r: max_isometric_force=111.744 optimal_fiber_length=0.03721526 tendon_slack_length=0.05910782
        pennation_angle_at_optimal=0
      PathPoint P1: Abdomen (0.006223721 0.04978977 0.02178302)
      PathPoint P2: torso (0.09646768 0.1804879 0.09646768)
    Thelen2003Muscle EO2_r: max_isometric_force=132.3546 optimal_fiber_length=0.03934097 tendon_slack_length=0.05722193
        pennation_angle_at_optimal=0
      PathPoint P1: torso (0.0943931 0.1462574 0.1089151)
      PathPoint P2: Abdomen (0.008298295 0.0238576 0.03423047)
    Thelen2003Muscle EO3_r: max_isometric_force=138.8978 optimal_fiber_length=0.03983389 tendon_slack_length=0.04831267
        pennation_angle_at_optimal=0
      PathPoint P1: torso (0.0814348 0.1042681 0.1178223)
      PathPoint P2: Abdomen (0.007023895 -0.008298295 0.03423047)
    Thelen2003Muscle EO4_r: max_isometric_force=134.0928 optimal_fiber_length=0.04075914 tendon_slack_length=0.04645489
        pennation_angle_at_optimal=0
      PathPoint P1: torso (0.0723074 0.0862977 0.1163379)
      PathPoint default: Abdomen (0.006223721 -0.02489488 0.03215589)
    Thelen2003Muscle EO5_r: max_isometric_force=155.945 optimal_fiber_length=0.04815825 tendon_slack_length=0.05273047
        pennation_angle_at_optimal=0
      PathPoint P1: torso (0.001037287 0.1141016 0.1161761)
      PathPoint P2: pelvis (-0.06165195 0.09191745 0.1143363)
    Thelen2003Muscle EO6_r: max_isometric_force=226.9645 optimal_fiber_length=0.05734717 tendon_slack_length=0.0579616
        pennation_angle_at_optimal=0
      PathPoint P1: torso (-0.01141016 0.09646768 0.1037287)
      PathPoint P2: pelvis (-0.07734517 0.1042478 0.1098526)
    Thelen2003Muscle IO1_r: max_isometric_force=123.9794 optimal_fiber_length=0.04731602 tendon_slack_length=0.07158184
        pennation_angle_at_optimal=0
      PathPoint P1: Abdomen (0.003183962 -0.04875248 0.04564062)
      PathPoint P2: pelvis (-0.0100885 0.02802361 0.141239)
    Thelen2003Muscle IO2_r: max_isometric_force=150.0727 optimal_fiber_length=0.04780343 tendon_slack_length=0.07247395
        pennation_angle_at_optimal=0
      PathPoint P1: Abdomen (0.003111861 -0.02282031 0.05393892)
      PathPoint P2: pelvis (-0.02690267 0.05492628 0.1434809)
    Thelen2003Muscle IO3_r: max_isometric_force=151.2072 optimal_fiber_length=0.05522787 tendon_slack_length=0.08373154
        pennation_angle_at_optimal=0
      PathPoint P1: Abdomen (0.005186434 0.007261008 0.05082706)
      PathPoint P2: pelvis (-0.04371683 0.07734517 0.1311505)
    Thelen2003Muscle IO4_r: max_isometric_force=179.0459 optimal_fiber_length=0.07003192 tendon_slack_length=0.04718817
        pennation_angle_at_optimal=0
      PathPoint P1: torso (0.06846093 0.112027 0.1255117)
      PathPoint P2: pelvis (-0.05941006 0.09191745 0.1120944)
    Thelen2003Muscle IO5_r: max_isometric_force=157.0833 optimal_fiber_length=0.05593671 tendon_slack_length=0.03769069
        pennation_angle_at_optimal=0
      PathPoint P1: torso (0.03111861 0.09957954 0.119288)
      PathPoint P2: pelvis (-0.08294989 0.1053688 0.08855461)
    Thelen2003Muscle IO6_r: max_isometric_force=138.6115 optimal_fiber_length=0.05390194 tendon_slack_length=0.03632113
        pennation_angle_at_optimal=0
      PathPoint P1: torso (0 0.08920667 0.1037287)
      PathPoint P2: pelvis (-0.100885 0.09864311 0.07398233)
    Thelen2003Muscle EO1_l: max_isometric_force=111.744 optimal_fiber_length=0.03721526 tendon_slack_length=0.05910782
        pennation_angle_at_optimal=0
      PathPoint P1: Abdomen (0.006223721 0.04978977 -0.02178302)
      PathPoint P2: torso (0.09293302 0.1770047 -0.1028352)
    Thelen2003Muscle EO2_l: max_isometric_force=132.3546 optimal_fiber_length=0.03934097 tendon_slack_length=0.05722193
        pennation_angle_at_optimal=0
      PathPoint P1: torso (0.0943931 0.1462574 -0.1086869)
      PathPoint P2: Abdomen (0.008298295 0.0238576 -0.03423047)
    Thelen2003Muscle EO3_l: max_isometric_force=138.8978 optimal_fiber_length=0.03983389 tendon_slack_length=0.04831267
        pennation_angle_at_optimal=0
      PathPoint P1: torso (0.08194566 0.104766 -0.1182507)
      PathPoint P2: Abdomen (0.0190614 -0.007915484 -0.03380528)
    Thelen2003Muscle EO4_l: max_isometric_force=134.0928 optimal_fiber_length=0.04075914 tendon_slack_length=0.04645489
        pennation_angle_at_optimal=0
      PathPoint P1: torso (0.07261008 0.08609481 -0.1161761)
      PathPoint P2: Abdomen (0.006625255 -0.0244503 -0.03178288)
    Thelen2003Muscle EO5_l: max_isometric_force=155.945 optimal_fiber_length=0.04819547 tendon_slack_length=0.05277123
        pennation_angle_at_optimal=0
      PathPoint P1: torso (0.0008353562 0.1142551 -0.1157571)
      PathPoint P2: pelvis (-0.06131903 0.09139352 -0.1145134)
    Thelen2003Muscle EO6_l: max_isometric_force=226.9645 optimal_fiber_length=0.0569537 tendon_slack_length=0.05756392
        pennation_angle_at_optimal=0
      PathPoint P1: torso (-0.01141016 0.09646768 -0.1037287)
      PathPoint P2: pelvis (-0.07734517 0.1042478 -0.09976406)
    Thelen2003Muscle IO1_l: max_isometric_force=123.9794 optimal_fiber_length=0.04731327 tendon_slack_length=0.07157767
        pennation_angle_at_optimal=0
      PathPoint P1: Abdomen (0.003111861 -0.04875248 -0.04564062)
      PathPoint P2: pelvis (-0.01013032 0.02762601 -0.1412603)
    Thelen2003Muscle IO2_l: max_isometric_force=150.0727 optimal_fiber_length=0.04777753 tendon_slack_length=0.07243469
        pennation_angle_at_optimal=0
      PathPoint P1: Abdomen (0.003111861 -0.02282031 -0.05393892)
      PathPoint P2: pelvis (-0.02712943 0.05437107 -0.1428341)
    Thelen2003Muscle IO3_l: max_isometric_force=151.2072 optimal_fiber_length=0.05522442 tendon_slack_length=0.08372632
        pennation_angle_at_optimal=0
      PathPoint P1: Abdomen (0.005186434 0.007261008 -0.05082706)
      PathPoint P2: pelvis (-0.04315984 0.07703052 -0.1308904)
    Thelen2003Muscle IO4_l: max_isometric_force=179.0459 optimal_fiber_length=0.07002449 tendon_slack_length=0.04718317
        pennation_angle_at_optimal=0
      PathPoint P1: torso (0.06810608 0.1118766 -0.1258198)
      PathPoint P2: pelvis (-0.05895944 0.09169449 -0.1117094)
    Thelen2003Muscle IO5_l: max_isometric_force=157.0833 optimal_fiber_length=0.05596535 tendon_slack_length=0.03770999
        pennation_angle_at_optimal=0
      PathPoint P1: torso (0.03142025 0.09956439 -0.1192828)
      PathPoint P2: pelvis (-0.08281067 0.1049584 -0.08859306)
    Thelen2003Muscle IO6_l: max_isometric_force=138.6115 optimal_fiber_length=0.05390194 tendon_slack_length=0.03632113
        pennation_angle_at_optimal=0
      PathPoint P1: torso (0 0.08920667 -0.1037287)
      PathPoint P2: pelvis (-0.100885 0.09864311 -0.07398233)
    Thelen2003Muscle LD_L1_r: max_isometric_force=41.4 optimal_fiber_length=0.3293565 tendon_slack_length=0.0721448
        pennation_angle_at_optimal=0
      PathPoint P1: lumbar1 (-0.04667791 -0.01348473 0.004493153)
      PathPoint P2: humerus_r (-0.008976242 -0.01443087 0.002543876)
      PathWrap: wrap_object=Chest_r method=hybrid
    Thelen2003Muscle LD_L2_r: max_isometric_force=41.4 optimal_fiber_length=0.3524422 tendon_slack_length=0.07720165
        pennation_angle_at_optimal=0
      PathPoint P1: lumbar2 (-0.04460334 -0.013915 0.004300425)
      PathPoint P2: humerus_r (-0.00897873 -0.01442841 0.002545077)
      PathWrap: wrap_object=Chest_r method=hybrid
    Thelen2003Muscle LD_L3_r: max_isometric_force=50.6 optimal_fiber_length=0.3697041 tendon_slack_length=0.08098265
        pennation_angle_at_optimal=0
      PathPoint P1: lumbar3 (-0.0477152 -0.004149147 0.004003626)
      PathPoint P2: humerus_r (-0.00897873 -0.01442841 0.004096723)
      PathWrap: wrap_object=Chest_r method=hybrid
    Thelen2003Muscle LD_L4_r: max_isometric_force=50.6 optimal_fiber_length=0.3871206 tendon_slack_length=0.08479784
        pennation_angle_at_optimal=0
      PathPoint P1: lumbar4 (-0.04667791 0.005186434 0.004795149)
      PathPoint P2: humerus_r (-0.00897873 -0.01442841 0.002545077)
      PathWrap: wrap_object=Chest_r method=hybrid
    Thelen2003Muscle LD_L5_r: max_isometric_force=50.6 optimal_fiber_length=0.4060959 tendon_slack_length=0.08339491
        pennation_angle_at_optimal=0
      PathPoint P1: lumbar5 (-0.03734233 0.02178302 0.004264006)
      PathPoint P2: humerus_r (-0.00897873 -0.01442841 0.002545077)
      PathWrap: wrap_object=Chest_r method=hybrid
    Thelen2003Muscle LD_T12_r: max_isometric_force=23 optimal_fiber_length=0.3158409 tendon_slack_length=0.06486019
        pennation_angle_at_optimal=0
      PathPoint P1: humerus_r (-0.00897873 -0.01442841 0.002545077)
      PathPoint P2: torso (-0.05393892 0.1058033 0.004526201)
      PathWrap: wrap_object=Chest_r method=hybrid range=(1 2)
    Thelen2003Muscle LD_T11_r: max_isometric_force=27.6 optimal_fiber_length=0.2967115 tendon_slack_length=0.06093137
        pennation_angle_at_optimal=0
      PathPoint P1: humerus_r (-0.00897873 -0.01442841 0.002545077)
      PathPoint P2: torso (-0.065475 0.1358846 0.003111861)
      PathWrap: wrap_object=Chest_r method=hybrid
    Thelen2003Muscle LD_T10_r: max_isometric_force=27.6 optimal_fiber_length=0.2914094 tendon_slack_length=0.04559473
        pennation_angle_at_optimal=0
      PathPoint P1: humerus_r (-0.00897873 -0.01442841 0.002545077)
      PathPoint P2: torso (-0.07157279 0.1638913 0.003972715)
      PathWrap: wrap_object=Chest_r method=hybrid
    Thelen2003Muscle LD_T9_r: max_isometric_force=18.4 optimal_fiber_length=0.2677219 tendon_slack_length=0.1458594
        pennation_angle_at_optimal=0
      PathPoint P1: humerus_r (-0.00897873 -0.01442841 0.002545077)
      PathPoint P2: torso (-0.08194566 0.2012337 0.00422849)
      PathWrap: wrap_object=Chest_r method=hybrid
    Thelen2003Muscle LD_T8_r: max_isometric_force=18.4 optimal_fiber_length=0.242224 tendon_slack_length=0.04974242
        pennation_angle_at_optimal=0
      PathPoint P1: humerus_r (-0.00897873 -0.01442841 0.002545077)
      PathPoint P2: torso (-0.08402024 0.2230167 0.004434858)
      PathWrap: wrap_object=Chest_r method=hybrid
    Thelen2003Muscle LD_T7_r: max_isometric_force=18.4 optimal_fiber_length=0.2330692 tendon_slack_length=0.04786251
        pennation_angle_at_optimal=0
      PathPoint P1: humerus_r (-0.00897873 -0.01442841 0.002545077)
      PathPoint P2: torso (-0.09335582 0.2437624 0.00422543)
      PathWrap: wrap_object=Chest_r method=hybrid
    Thelen2003Muscle LD_R12_r: max_isometric_force=18.4 optimal_fiber_length=0.2546909 tendon_slack_length=0.05230263
        pennation_angle_at_optimal=0
      PathPoint P1: humerus_r (-0.00897873 -0.01442841 0.002545077)
      PathPoint P2: torso (-0.04667791 0.1261123 0.04591675)
    Thelen2003Muscle LD_R11_r: max_isometric_force=27.6 optimal_fiber_length=0.2510014 tendon_slack_length=0.05154487
        pennation_angle_at_optimal=0
      PathPoint P1: humerus_r (-0.00897873 -0.01442841 0.004096723)
      PathPoint P2: torso (-0.07053551 0.1452202 0.06534907)
      PathWrap: wrap_object=Chest_r method=hybrid
    Thelen2003Muscle LD_Il_r: max_isometric_force=32.2 optimal_fiber_length=0.448058 tendon_slack_length=0.01937093
        pennation_angle_at_optimal=0
      PathPoint P1: pelvis (-0.1414923 0.06165195 0.05457094)
      PathPoint P2: humerus_r (-0.00897873 -0.01442841 0.002545077)
      PathWrap: wrap_object=Chest_r method=hybrid
    Thelen2003Muscle LD_L1_l: max_isometric_force=41.4 optimal_fiber_length=0.3293562 tendon_slack_length=0.07214475
        pennation_angle_at_optimal=0
      PathPoint P1: lumbar1 (-0.04667791 -0.01348473 -0.004491452)
      PathPoint P2: humerus_l (-0.008976242 -0.01442841 -0.002545077)
      PathWrap: wrap_object=Chest_l method=hybrid
    Thelen2003Muscle LD_L2_l: max_isometric_force=41.4 optimal_fiber_length=0.3524423 tendon_slack_length=0.07720167
        pennation_angle_at_optimal=0
      PathPoint P1: lumbar2 (-0.04460334 -0.01391002 -0.00430474)
      PathPoint P2: humerus_l (-0.00897873 -0.01442841 -0.002545077)
      PathWrap: wrap_object=Chest_l method=hybrid
    Thelen2003Muscle LD_L3_l: max_isometric_force=50.6 optimal_fiber_length=0.3697041 tendon_slack_length=0.08098265
        pennation_angle_at_optimal=0
      PathPoint P1: lumbar3 (-0.0477152 -0.004149147 -0.004003927)
      PathPoint P2: humerus_l (-0.00897873 -0.01442841 -0.004096723)
      PathWrap: wrap_object=Chest_l method=hybrid
    Thelen2003Muscle LD_L4_l: max_isometric_force=50.6 optimal_fiber_length=0.3871206 tendon_slack_length=0.08479784
        pennation_angle_at_optimal=0
      PathPoint P1: lumbar4 (-0.04667791 0.005186434 -0.004792265)
      PathPoint P2: humerus_l (-0.00897873 -0.01442841 -0.002545077)
      PathWrap: wrap_object=Chest_l method=hybrid
    Thelen2003Muscle LD_L5_l: max_isometric_force=50.6 optimal_fiber_length=0.4060959 tendon_slack_length=0.08339491
        pennation_angle_at_optimal=0
      PathPoint P1: lumbar5 (-0.03734233 0.02178302 -0.004263249)
      PathPoint P2: humerus_l (-0.00897873 -0.01442841 -0.002545077)
      PathWrap: wrap_object=Chest_l method=hybrid
    Thelen2003Muscle LD_T12_l: max_isometric_force=23 optimal_fiber_length=0.3158409 tendon_slack_length=0.06486018
        pennation_angle_at_optimal=0
      PathPoint P1: humerus_l (-0.00897873 -0.01442841 -0.002545077)
      PathPoint P2: torso (-0.05393892 0.1058033 -0.004522571)
      PathWrap: wrap_object=Chest_l method=hybrid
    Thelen2003Muscle LD_T11_l: max_isometric_force=27.6 optimal_fiber_length=0.2967138 tendon_slack_length=0.06093185
        pennation_angle_at_optimal=0
      PathPoint P1: humerus_l (-0.00897873 -0.01442841 -0.002545077)
      PathPoint P2: torso (-0.065475 0.1358846 -0.003589013)
      PathWrap: wrap_object=Chest_l method=hybrid
    Thelen2003Muscle LD_T10_l: max_isometric_force=27.6 optimal_fiber_length=0.2914094 tendon_slack_length=0.04559473
        pennation_angle_at_optimal=0
      PathPoint P1: humerus_l (-0.00897873 -0.01442841 -0.002545077)
      PathPoint P2: torso (-0.07157279 0.1638913 -0.003972809)
      PathWrap: wrap_object=Chest_l method=hybrid
    Thelen2003Muscle LD_T9_l: max_isometric_force=18.4 optimal_fiber_length=0.2677219 tendon_slack_length=0.1458595
        pennation_angle_at_optimal=0
      PathPoint P1: humerus_l (-0.00897873 -0.01442841 -0.002545077)
      PathPoint P2: torso (-0.08194566 0.2012337 -0.00423213)
      PathWrap: wrap_object=Chest_l method=hybrid
    Thelen2003Muscle LD_T8_l: max_isometric_force=18.4 optimal_fiber_length=0.2422241 tendon_slack_length=0.04974243
        pennation_angle_at_optimal=0
      PathPoint P1: humerus_l (-0.00897873 -0.01442841 -0.002545077)
      PathPoint P2: torso (-0.08402024 0.2230167 -0.004439588)
      PathWrap: wrap_object=Chest_l method=hybrid
    Thelen2003Muscle LD_T7_l: max_isometric_force=18.4 optimal_fiber_length=0.2330692 tendon_slack_length=0.0478625
        pennation_angle_at_optimal=0
      PathPoint P1: humerus_l (-0.00897873 -0.01442841 -0.002545077)
      PathPoint P2: torso (-0.09335582 0.2437624 -0.004221758)
      PathWrap: wrap_object=Chest_l method=hybrid
    Thelen2003Muscle LD_R12_l: max_isometric_force=18.4 optimal_fiber_length=0.2546909 tendon_slack_length=0.05230263
        pennation_angle_at_optimal=0
      PathPoint LD_l12_l-P1: humerus_l (-0.00897873 -0.01442841 -0.002545077)
      PathPoint LD_l12_l-P2: torso (-0.04667791 0.1261123 -0.04592069)
      PathWrap: wrap_object=Chest_l method=hybrid
    Thelen2003Muscle LD_R11_l: max_isometric_force=27.6 optimal_fiber_length=0.2510014 tendon_slack_length=0.05154487
        pennation_angle_at_optimal=0
      PathPoint LD_l11_l-P1: humerus_l (-0.00897873 -0.01442841 -0.004096723)
      PathPoint LD_l11_l-P2: torso (-0.07053551 0.1452202 -0.06534907)
      PathWrap: wrap_object=Chest_l method=hybrid
    Thelen2003Muscle LD_Il_l: max_isometric_force=32.2 optimal_fiber_length=0.4460288 tendon_slack_length=0.0192832
        pennation_angle_at_optimal=0
      PathPoint P1: pelvis (-0.1276442 0.08309629 -0.06032845)
      PathPoint P2: humerus_l (-0.00897873 -0.01442841 -0.002545077)
      PathWrap: wrap_object=Chest_l method=hybrid
    ObjectGroup R_hip_abd: members=(glut_max1_r glut_med1_r glut_med2_r glut_med3_r glut_min1_r glut_min2_r glut_min3_r peri_r sar_r tfl_r)
    ObjectGroup R_hip_flex: members=(add_brev_r add_long_r glut_med1_r glut_min1_r grac_r iliacus_r pect_r rect_fem_r sar_r tfl_r)
    ObjectGroup R_hip_inrot: members=(glut_med1_r glut_min1_r iliacus_r tfl_r)
    ObjectGroup R_hip_exrot: members=(gem_r glut_med3_r glut_min3_r peri_r quad_fem_r)
    ObjectGroup R_hip_ext: members=(add_long_r add_mag1_r add_mag2_r add_mag3_r bifemlh_r glut_max1_r glut_max2_r glut_max3_r glut_med3_r glut_min3_r semimem_r semiten_r)
    ObjectGroup R_hip_add: members=(add_brev_r add_long_r add_mag1_r add_mag2_r add_mag3_r bifemlh_r grac_r pect_r semimem_r semiten_r)
    ObjectGroup R_knee_bend: members=(bifemlh_r bifemsh_r grac_r lat_gas_r med_gas_r sar_r semimem_r semiten_r)
    ObjectGroup R_knee_ext: members=(rect_fem_r vas_int_r vas_lat_r vas_med_r)
    ObjectGroup R_ankle_pf: members=(flex_dig_r flex_hal_r lat_gas_r med_gas_r per_brev_r per_long_r soleus_r tib_post_r)
    ObjectGroup R_inverter: members=(ext_hal_r flex_dig_r flex_hal_r tib_ant_r tib_post_r)
    ObjectGroup R_ankle_df: members=(ext_dig_r ext_hal_r per_tert_r tib_ant_r)
    ObjectGroup R_everter: members=(ext_dig_r per_brev_r per_long_r per_tert_r)
    ObjectGroup L_hip_abd: members=(glut_max1_l glut_med1_l glut_med2_l glut_med3_l glut_min1_l glut_min2_l glut_min3_l peri_l sar_l tfl_l)
    ObjectGroup L_hip_flex: members=(add_brev_l add_long_l glut_med1_l glut_min1_l grac_l iliacus_l pect_l rect_fem_l sar_l tfl_l)
    ObjectGroup L_hip_inrot: members=(glut_med1_l glut_min1_l iliacus_l tfl_l)
    ObjectGroup L_hip_exrot: members=(gem_l glut_med3_l glut_min3_l peri_l quad_fem_l)
    ObjectGroup L_hip_ext: members=(add_long_l add_mag1_l add_mag2_l add_mag3_l bifemlh_l glut_max1_l glut_max2_l glut_max3_l glut_med3_l glut_min3_l semimem_l semiten_l)
    ObjectGroup L_hip_add: members=(add_brev_l add_long_l add_mag1_l add_mag2_l add_mag3_l bifemlh_l grac_l pect_l semimem_l semiten_l)
    ObjectGroup L_knee_bend: members=(bifemlh_l bifemsh_l grac_l lat_gas_l med_gas_l sar_l semimem_l semiten_l)
    ObjectGroup L_knee_ext: members=(rect_fem_l vas_int_l vas_lat_l vas_med_l)
    ObjectGroup L_ankle_pf: members=(flex_dig_l flex_hal_l lat_gas_l med_gas_l per_brev_l per_long_l soleus_l tib_post_l)
    ObjectGroup L_inverter: members=(ext_hal_l flex_dig_l flex_hal_l tib_ant_l tib_post_l)
    ObjectGroup L_ankle_df: members=(ext_dig_l ext_hal_l per_tert_l tib_ant_l)
    ObjectGroup L_everter: members=(ext_dig_l per_brev_l per_long_l per_tert_l)
    ObjectGroup back_ext
    ObjectGroup back_rlb: members=(EO1_r EO2_r EO3_r EO4_r EO5_r EO6_r IO1_r IO2_r IO3_r IO4_r IO5_r IO6_r)
    ObjectGroup back_introt: members=(EO1_l EO2_l EO3_l EO4_l EO5_l EO6_l IO1_r IO2_r IO3_r IO4_r IO5_r IO6_r)
    ObjectGroup back_llb: members=(EO1_l EO2_l EO3_l EO4_l EO5_l EO6_l IO1_l IO2_l IO3_l IO4_l IO5_l IO6_l)
    ObjectGroup back_extrot: members=(EO1_r EO2_r EO3_r EO4_r EO5_r EO6_r IO1_l IO2_l IO3_l IO4_l IO5_l IO6_l)
    ObjectGroup back_flex: members=(EO1_l EO2_l EO3_l EO4_l EO5_l EO6_l EO1_r EO2_r EO3_r EO4_r EO5_r EO6_r IO1_l IO2_l IO3_l IO4_l IO5_l IO6_l IO1_r IO2_r IO3_r IO4_r IO5_r IO6_r)
    ObjectGroup quadratus_lumborum: members=(QL_post_I_1-L3_r QL_post_I_2-L4_r QL_post_I_2-L3_r QL_post_I_2-L2_r QL_post_I_3-L1_r QL_post_I_3-L2_r QL_post_I_3-L3_r QL_mid_L3-12_3_r QL_mid_L3-12_2_r QL_mid_L3-12_1_r QL_mid_L2-12_1_r QL_mid_L4-12_3_r QL_ant_I_2-T12_r QL_ant_I_3-T12_r QL_ant_I_2-12_1_r QL_ant_I_3-12_1_r QL_ant_I_3-12_2_r QL_ant_I_3-12_3_r QL_post_I_1-L3_l QL_post_I_2-L4_l QL_post_I_2-L3_l QL_post_I_2-L2_l QL_post_I_3-L1_l QL_post_I_3-L2_l QL_post_I_3-L3_l QL_mid_L3-12_3_l QL_mid_L3-12_2_l QL_mid_L3-12_1_l QL_mid_L2-12_1_l QL_mid_L4-12_3_l QL_ant_I_2-T12_l QL_ant_I_3-T12_l QL_ant_I_2-12_1_l QL_ant_I_3-12_1_l QL_ant_I_3-12_2_l QL_ant_I_3-12_3_l)
    ObjectGroup Psoas_major: members=(Ps_L1_L2_IVD_r Ps_L2_L3_IVD_r Ps_L3_L4_IVD_r Ps_L4_L5_IVD_r Ps_L1_L2_IVD_l Ps_L2_L3_IVD_l Ps_L3_L4_IVD_l Ps_L4_L5_IVD_l Ps_L1_TP_r Ps_L2_TP_r Ps_L3_TP_r Ps_L4_TP_r Ps_L5_TP_r Ps_L1_TP_l Ps_L2_TP_l Ps_L3_TP_l Ps_L4_TP_l Ps_L5_TP_l Ps_L1_VB_r Ps_L1_VB_l Ps_L5_VB_r Ps_L5_VB_l)
    ObjectGroup Ext_Oblique: members=(EO1_l EO2_l EO3_l EO4_l EO5_l EO6_l EO1_r EO2_r EO3_r EO4_r EO5_r EO6_r)
    ObjectGroup Int_Oblique: members=(IO1_l IO2_l IO3_l IO4_l IO5_l IO6_l IO1_r IO2_r IO3_r IO4_r IO5_r IO6_r)
    ObjectGroup Rectus_Abdominis: members=(rect_abd_r rect_abd_l)
    ObjectGroup Multifidus_spinous_process: members=(MF_m1t_1_r MF_m1t_2_r MF_m1t_3_r MF_m2t_1_r MF_m2t_2_r MF_m2t_3_r MF_m3t_1_r MF_m3t_2_r MF_m3t_3_r MF_m4t_1_r MF_m4t_2_r MF_m4t_3_r MF_m5t_1_r MF_m5t_2_r MF_m5t_3_r MF_m1t_1_l MF_m1t_2_l MF_m1t_3_l MF_m2t_1_l MF_m2t_2_l MF_m2t_3_l MF_m3t_1_l MF_m3t_2_l MF_m3t_3_l MF_m4t_1_l MF_m4t_2_l MF_m4t_3_l MF_m5t_1_l MF_m5t_2_l MF_m5t_3_l MF_m1s_r MF_m2s_r MF_m3s_r MF_m4s_r MF_m5s_r MF_m1s_l MF_m2s_l MF_m3s_l MF_m4s_l MF_m5s_l)
    ObjectGroup Multifidus_entry_level: members=(MF_m1_laminar_r MF_m2_laminar_r MF_m3_laminar_r MF_m4_laminar_r MF_m5_laminar_r MF_m1_laminar_l MF_m2_laminar_l MF_m3_laminar_l MF_m4_laminar_l MF_m5_laminar_l)
    ObjectGroup iliocostalis_lumborum_pars_lumborum: members=(IL_L4_l IL_L4_r IL_L3_l IL_L3_r IL_L2_l IL_L2_r IL_L1_l IL_L1_r)
    ObjectGroup iliocostalis_lumborum_pars_thoracis_left: members=(IL_R12_l IL_R11_l IL_R10_l IL_R9_l IL_R8_l IL_R7_l IL_R6_l IL_R5_l)
    ObjectGroup iliocostalis_lumborum_pars_thoracis_right: members=(IL_R12_r IL_R11_r IL_R10_r IL_R9_r IL_R8_r IL_R7_r IL_R6_r IL_R5_r)
    ObjectGroup longissimus_thoracis_pars_thoracis_left: members=(LTpT_R12_l LTpT_R11_l LTpT_R10_l LTpT_R9_l LTpT_R8_l LTpT_R7_l LTpT_R6_l LTpT_R5_l LTpT_R4_l LTpT_T12_l LTpT_T11_l LTpT_T10_l LTpT_T9_l LTpT_T8_l LTpT_T7_l LTpT_T6_l LTpT_T5_l LTpT_T4_l LTpT_T3_l LTpT_T2_l LTpT_T1_l)
    ObjectGroup longissimus_thoracis_pars_thoracis_right: members=(LTpT_R12_r LTpT_R11_r LTpT_R10_r LTpT_R9_r LTpT_R8_r LTpT_R7_r LTpT_R6_r LTpT_R5_r LTpT_R4_r LTpT_T12_r LTpT_T11_r LTpT_T10_r LTpT_T9_r LTpT_T8_r LTpT_T7_r LTpT_T6_r LTpT_T5_r LTpT_T4_r LTpT_T3_r LTpT_T2_r LTpT_T1_r)
    ObjectGroup longissimus_thoracis_pars_lumborum: members=(LTpL_L5_r LTpL_L4_r LTpL_L3_r LTpL_L2_r LTpL_L1_r LTpL_L5_l LTpL_L4_l LTpL_L3_l LTpL_L2_l LTpL_L1_l)
    ObjectGroup Latissimus Dorsi: members=(LD_Il_l LD_Il_r LD_T7_l LD_T8_l LD_T9_l LD_T10_l LD_T11_l LD_T12_l LD_R11_l LD_R12_l LD_L1_l LD_L2_l LD_L3_l LD_L4_l LD_L5_l LD_T7_r LD_T8_r LD_T9_r LD_T10_r LD_T11_r LD_T12_r LD_R11_r LD_R12_r LD_L1_r LD_L2_r LD_L3_r LD_L4_r LD_L5_r)
  MarkerSet:
    Marker LFHD: torso (0.06223721 0.6223721 -0.06223721)
    Marker RFHD: torso (0.06223721 0.6223721 0.06223721)
    Marker RBHD: torso (-0.06223721 0.6223721 0.06223721)
    Marker LBHD: torso (-0.06223721 0.6223721 -0.06223721)
    Marker C7: torso (-0.07524847 0.4356605 0)
    Marker LSHO: torso (0.01082264 0.4216538 -0.1444349)
    Marker RSHO: torso (0.01082264 0.418424 0.1444349)
    Marker CLAV: torso (0.04149147 0.394169 0)
    Marker STRN: torso (0.101081 0.2393922 0)
    Marker RBAK: torso (-0.09343913 0.3158777 0.06633439)
    Marker T10: torso (-0.07277242 0.126549 0)
    Marker RUPA: humerus_r (0.003548447 -0.1391094 -0.003492836)
    Marker LUPA: humerus_l (0.002325518 -0.1054069 1.299965e-5)
    Marker RELB: humerus_r (0.002025977 -0.2623379 0.01452293)
    Marker LELB: humerus_l (0.00208117 -0.2623379 -0.01452293)
    Marker LFRA: ulna_l (-0.01429895 -0.1244354 -0.04437576)
    Marker RFRA: ulna_r (-0.01498006 -0.1511801 0.02377733) fixed=true
    Marker RWRB: radius_r (-0.0157593 -0.2395495 -0.01892968)
    Marker RWRA: radius_r (-0.003252735 -0.2296678 0.05134381)
    Marker RFIN: hand_r (-0.01168684 -0.07100497 -0.001048113)
    Marker LWRB: radius_l (-0.0157593 -0.2395495 0.01892968)
    Marker LWRA: radius_l (-0.003252735 -0.2296678 -0.05134381)
    Marker LFIN: hand_l (-0.01585336 -0.09937406 -0.000553307)
    Marker RASI: pelvis (0.0128884 0.02219179 0.1434809)
    Marker LASI: pelvis (0.0128884 0.02219179 -0.1434809)
    Marker RPSI: pelvis (-0.1749447 0.0441762 0.0621001)
    Marker LPSI: pelvis (-0.1749447 0.04432327 -0.0621001)
    Marker RANK: tibia_r (-0.00529491 -0.4341826 0.05612604)
    Marker LANK: tibia_l (-0.005294909 -0.4425484 -0.05612604)
    Marker LHEE: calcn_l (-0.01335998 0.03621633 0.008758041)
    Marker LTOE: calcn_l (0.2400633 -0.0001419035 -0.003683293)
    Marker RHEE: calcn_r (-0.01124059 0.03621633 -0.008758041)
    Marker RTOE: calcn_r (0.2400633 -0.0001549353 0.003683293)
    Marker RKNE: femur_r (0.01715232 -0.4548982 0.0543293)
    Marker LKNE: femur_l (0.01715232 -0.4548826 -0.0543293)
    Marker RTHI: femur_r (0.03563403 -0.2225016 0.06892087)
    Marker LTHI: femur_l (0.01004727 -0.2199881 -0.06646153)
    Marker RTIB: tibia_r (0.02256713 -0.2230098 0.05147965)
    Marker LTIB: tibia_l (0.01976081 -0.2243559 -0.04722922) fixed=true
  ComponentSet:
    IMU hand_l_imu: socket_frame=/bodyset/hand_l/hand_l_imu
    IMU hand_r_imu: socket_frame=/bodyset/hand_r/hand_r_imu
    IMU radius_l_imu: socket_frame=/bodyset/radius_l/radius_l_imu
    IMU radius_r_imu: socket_frame=/bodyset/radius_r/radius_r_imu
    IMU humerus_l_imu: socket_frame=/bodyset/humerus_l/humerus_l_imu
    IMU humerus_r_imu: socket_frame=/bodyset/humerus_r/humerus_r_imu
    IMU femur_l_imu: socket_frame=/bodyset/femur_l/femur_l_imu
    IMU femur_r_imu: socket_frame=/bodyset/femur_r/femur_r_imu
    IMU tibia_l_imu: socket_frame=/bodyset/tibia_l/tibia_l_imu
    IMU tibia_r_imu: socket_frame=/bodyset/tibia_r/tibia_r_imu
    IMU calcn_l_imu: socket_frame=/bodyset/calcn_l/calcn_l_imu
    IMU calcn_r_imu: socket_frame=/bodyset/calcn_r/calcn_r_imu
    IMU torso_imu: socket_frame=/bodyset/torso/torso_imu
    IMU pelvis_imu: socket_frame=/bodyset/pelvis/pelvis_imu
