# OpenSim document version 40000
XsensDataReaderSettings:
  trial_prefix: 20250225
  ExperimentalSensors:
    ExperimentalSensor _00B4D4A8: name_in_model=hand_l_imu
    ExperimentalSensor _00B4D4C5: name_in_model=hand_r_imu
    ExperimentalSensor _00B4D4A6: name_in_model=radius_l_imu
    ExperimentalSensor _00B4D4CF: name_in_model=radius_r_imu
    ExperimentalSensor _00B4D4CB: name_in_model=humerus_l_imu
    ExperimentalSensor _00B4D4CD: name_in_model=humerus_r_imu
    ExperimentalSensor _00B4D4C2: name_in_model=femur_l_imu
    ExperimentalSensor _00B4D4C3: name_in_model=femur_r_imu
    ExperimentalSensor _00B4D4C6: name_in_model=tibia_l_imu
    ExperimentalSensor _00B4D4BE: name_in_model=tibia_r_imu
    ExperimentalSensor _00B4D4CC: name_in_model=calcn_l_imu
    ExperimentalSensor _00B4D4A7: name_in_model=calcn_r_imu
    ExperimentalSensor _00B4D4C7: name_in_model=torso_imu
    ExperimentalSensor _00B4D4C4: name_in_model=pelvis_imu
